# OpenSim document version 40000
MuscleTendonPersonalizationTool:
  input_directory: preprocessed
  input_model_file: modelWithMuscleGroupsRightLegOnly.osim
  muscle_specific_electromechanical_delays: false
  muscle_specific_activation_time_constant: false
  max_iterations: 2e3
  max_function_evaluations: 1e8
  MuscleTendonPersonalizationTaskList:
    MuscleTendonPersonalizationTask: is_enabled=true optimize_electromechanical_delays=true
        optimize_activation_time_constants=true optimize_activation_nonlinearity_constants=true
        optimize_emg_scale_factors=true optimize_optimal_muscle_lengths=false optimize_tendon_slack_lengths=false
  MuscleTendonCostFunctionTerms:
    IndividualMuscles: ActivationNonlinearityConstant(is_enabled=true, max_allowable_error=0)
      InverseDynamicJointMoments: is_enabled=true max_allowable_error=0
      ActivationTimeConstant: is_enabled=true max_allowable_error=0 error_center=0
      OptimalMuscleFiberLength: is_enabled=true max_allowable_error=0
      TendonSlackLength: is_enabled=true max_allowable_error=0
      EmgScalingFactors: is_enabled=true max_allowable_error=0 error_center=0
      NormalizedMuscleFiberLength: is_enabled=true max_allowable_error=0
      PassiveMuscleForces: is_enabled=true max_allowable_error=0
    PairedMuscles:
      NormalizedMuscleFiberLength: is_enabled=true max_allowable_error=0
      EmgScalingFactors: is_enabled=true max_allowable_error=0
      ElectromechanicalDelay: is_enabled=true max_allowable_error=0
  PairedMuscles:
    PairedActivationTimeConstants: musclepairs=RAddLong musclepairs=RGasMed
    PairedNormalizedMuscleFiberLengths: musclepairs=RAddLong musclepairs=RGasMed
