# OpenSim document version 40000
MuscleTendonPersonalizationTool:
  input_directory: GCP_inputs
  input_model_file: Patient_model.osim
  toe_coordinate: mtp_angle_r
  initial_guesses: 10
  max_iterations: 400
  max_function_evaluations: 1e8
  GroundContactPersonalizationTaskList:
    GroundContactPersonalizationTask: is_enabled=true optimize_5dof_kinematics=true optimize_spring_resting_length=true
        optimize_spring_stiffness_coefficients=true optimize_spring_damping_coefficients=true
    GroundContactPersonalizationTask: is_enabled=true optimize_7dof_kinematics=true optimize_friction_coefficients=true
        optimize_spring_stiffness_coefficients=true optimize_spring_damping_coefficients=true
    GroundContactPersonalizationTask: is_enabled=true optimize_7dof_kinematics=true optimize_friction_coefficients=true
        optimize_spring_stiffness_coefficients=true optimize_spring_damping_coefficients=true
  GroundContactCostFunctionErrorCenters: marker_distance_error=0.0025 [meters] static_friction_coefficient=0.2
      dynamic_friction_coefficient=0.15 viscous_friction_coefficient=0.005
