# OpenSim document version 40000
JointModelPersonalizationTool:
  input_model_file: Rajagopal_4.0_RCNL_markers_scaled.osim
  output_model_file: Rajagopal_4.0_RCNL_markers_scaled_all_isolated.osim
  desired_error: 0.01
  accuracy: 1e-6
  diff_min_change: 1e-4
  optimality_tolerance: 1e-6
  function_tolerance: 1e-6
  step_tolerance: 1e-6
  max_function_evaluations: 3e3
  JMPTaskList:
    JMPTask [values shared by the 6 below unless stated]: is_enabled=true time_range=(0.333 1.86) index=1
    JMPTask Left Ankle: marker_file_name=trc/l_ankle.trc
      JMPJoint ankle_l:
        parent_frame_transformation: translation=(true true false) orientation=(true true false) translation_bounds=0.1
            orientation_bounds=1 [radians]
        child_frame_transformation: translation=(false false false) orientation=(false false false)
            translation_bounds=0.1 orientation_bounds=1 [radians]
      JMPJoint subtalar_l:
        parent_frame_transformation: translation=(false true true) orientation=(false true false)
            translation_bounds=0.1 orientation_bounds=1
        child_frame_transformation: translation=(true true true) orientation=(false true true) translation_bounds=0.1
            orientation_bounds=1
    JMPTask Right Ankle: marker_file_name=trc/r_ankle.trc
      JMPJoint ankle_r:
        parent_frame_transformation: translation=(true true false) orientation=(true true false) translation_bounds=0.1
            orientation_bounds=1
        child_frame_transformation: translation=(false false false) orientation=(false false false)
            translation_bounds=0.1 orientation_bounds=1
      JMPJoint subtalar_r:
        parent_frame_transformation: translation=(false true true) orientation=(false true false)
            translation_bounds=0.1 orientation_bounds=1
        child_frame_transformation: translation=(true true true) orientation=(false true true) translation_bounds=0.1
            orientation_bounds=1
    JMPTask Left Knee: marker_file_name=trc/l_knee.trc
      JMPJoint knee_l:
        parent_frame_transformation: translation=(true true false) orientation=(true true false) translation_bounds=0.1
            orientation_bounds=1
        child_frame_transformation: translation=(true true true) orientation=(true true false) translation_bounds=0.1
            orientation_bounds=1
    JMPTask Right Knee: marker_file_name=trc/r_knee.trc
      JMPJoint knee_r:
        parent_frame_transformation: translation=(true true false) orientation=(true true false) translation_bounds=0.1
            orientation_bounds=1
        child_frame_transformation: translation=(true true true) orientation=(true true false) translation_bounds=0.1
            orientation_bounds=1
    JMPTask Right Hip: marker_file_name=trc/r_hip.trc
      JMPJoint hip_r:
        parent_frame_transformation: translation=(true true true) orientation=(false false false)
            translation_bounds=0.1 orientation_bounds=1
        child_frame_transformation: translation=(false false false) orientation=(false false false)
            translation_bounds=0.1 orientation_bounds=1
    JMPTask Left Hip: marker_file_name=trc/l_hip.trc
      JMPJoint hip_l:
        parent_frame_transformation: translation=(true true true) orientation=(false false false)
            translation_bounds=0.1 orientation_bounds=1
        child_frame_transformation: translation=(false false false) orientation=(false false false)
            translation_bounds=0.1 orientation_bounds=1
