# OpenSim document version 40000
JointModelPersonalizationTool:
  input_model_file: Rajagopal_4.0_RCNL_markers_scaled.osim
  output_model_file: Rajagopal_4.0_RCNL_markers_scaled_gait.osim
  desired_error: 0.01
  accuracy: 1e-6
  diff_min_change: 1e-4
  optimality_tolerance: 1e-6
  function_tolerance: 1e-6
  step_tolerance: 1e-6
  max_function_evaluations: 3e3
  JMPTaskList:
    JMPTask Left Leg: is_enabled=true index=1 marker_file_name=gait_3_strides.trc
      JMPJoint knee_l:
        parent_frame_transformation: translation=(false false false) orientation=(true true false)
            translation_bounds=0.1 orientation_bounds=1 [radians]
        child_frame_transformation: translation=(false false false) orientation=(true true false)
            translation_bounds=0.1 orientation_bounds=1 [radians]
      JMPJoint ankle_l:
        parent_frame_transformation: translation=(true true false) orientation=(true true false) translation_bounds=0.1
            orientation_bounds=1
        child_frame_transformation: translation=(false false false) orientation=(false false false)
            translation_bounds=0.1 orientation_bounds=1
      JMPJoint subtalar_l:
        parent_frame_transformation: translation=(false true true) orientation=(false true false)
            translation_bounds=0.1 orientation_bounds=1
        child_frame_transformation: translation=(true true true) orientation=(false true true) translation_bounds=0.1
            orientation_bounds=1
      JMPBody pelvis: scale_bodies=true move_markers=true primary_body_axis=z
      JMPBody femur_l: scale_bodies=true move_markers=true primary_body_axis=y
      JMPBody tibia_l: scale_bodies=true move_markers=true primary_body_axis=y
      JMPBody calcn_l: scale_bodies=true move_markers=true primary_body_axis=x
