# OpenSim document version 40000
InverseKinematicsTool:
  results_directory: ./
  constraint_weight: Inf
  accuracy: 1e-5
  marker_file: r_knee.TRC
  time_range: 0 5.12667
  report_errors: true
  report_marker_locations: false
  IKTaskSet:
    IKMarkerTask R.Shoulder: apply=true weight=1
    IKMarkerTask L.Shoulder: apply=true weight=1
    IKMarkerTask C7: apply=true weight=1
    IKMarkerTask J.Notch: apply=true weight=1
    IKMarkerTask R.Elbow: apply=true weight=1
    IKMarkerTask R.Wrist: apply=true weight=1
    IKMarkerTask L.Wrist: apply=true weight=1
    IKMarkerTask R.ASIS: apply=true weight=1
    IKMarkerTask L.ASIS: apply=true weight=1
    IKMarkerTask R.Thigh.Superior: apply=true weight=1
    IKMarkerTask R.Thigh.Inferior: apply=true weight=1
    IKMarkerTask R.Thigh.Lateral: apply=true weight=1
    IKMarkerTask R.Knee.Lateral: apply=false weight=1
    IKMarkerTask R.Knee.Medial: apply=false weight=1
    IKMarkerTask R.Patella: apply=true weight=1
    IKMarkerTask R.Shank.Superior: apply=true weight=1
    IKMarkerTask R.Shank.Inferior: apply=true weight=1
    IKMarkerTask R.Shank.Lateral: apply=true weight=1
    IKMarkerTask R.Ankle.Lateral: apply=false weight=1
    IKMarkerTask R.Ankle.Medial: apply=false weight=1
    IKMarkerTask R.Heel: apply=true weight=1
    IKMarkerTask R.Toe: apply=true weight=1
    IKMarkerTask R.Toe.Lateral: apply=false weight=1
    IKMarkerTask L.Thigh.Superior: apply=true weight=1
    IKMarkerTask L.Thigh.Inferior: apply=true weight=1
    IKMarkerTask L.Thigh.Lateral: apply=true weight=1
    IKMarkerTask L.Knee.Lateral: apply=false weight=1
    IKMarkerTask L.Knee.Medial: apply=false weight=1
    IKMarkerTask L.Patella: apply=true weight=1
    IKMarkerTask L.Shank.Superior: apply=true weight=1
    IKMarkerTask L.Shank.Inferior: apply=true weight=1
    IKMarkerTask L.Shank.Lateral: apply=true weight=1
    IKMarkerTask L.Ankle.Lateral: apply=false weight=1
    IKMarkerTask L.Ankle.Medial: apply=false weight=1
    IKMarkerTask L.Heel: apply=true weight=1
    IKMarkerTask L.Toe: apply=true weight=1
    IKMarkerTask L.Toe.Lateral: apply=false weight=1
    IKMarkerTask Sacral: apply=true weight=1
    IKMarkerTask Lumbar: apply=false weight=1
    IKMarkerTask R.Midfoot.Superior: apply=true weight=1
    IKMarkerTask L.Midfoot.Superior: apply=true weight=1
    IKMarkerTask L.Toe.Medial: apply=false weight=1
    IKMarkerTask R.Toe.Medial: apply=false weight=1
    IKMarkerTask L.Elbow: apply=true weight=1
    IKMarkerTask R.Midfoot.Lateral: apply=true weight=1
    IKMarkerTask L.Midfoot.Lateral: apply=true weight=1
    IKMarkerTask Thoracic: apply=true weight=1
    IKMarkerTask R.PSIS: apply=true weight=1
    IKMarkerTask L.PSIS: apply=true weight=1
    IKMarkerTask Sternum: apply=true weight=1
    IKMarkerTask R.Shank.Posterior: apply=true weight=1
    IKMarkerTask L.Shank.Posterior: apply=true weight=1
