# OpenSim document version 40000
JointModelPersonalizationTool:
  input_model_file: simple_arm_translated_away.osim
  output_model_file: translation_result_from_xml.osim
  allowable_error: 0.01
  JMPTaskList:
    JMPTask Right Elbow: is_enabled=true index=1 marker_file_name=simple_arm.trc
      JMPJointSet:
        JMPJoint r_elbow:
          parent_frame_transformation: translation=(true false false) orientation=(false false false)
              translation_bounds=0.1 orientation_bounds=1 [radians]
          child_frame_transformation: translation=(false false false) orientation=(false false false)
              translation_bounds=0.1 orientation_bounds=1 [radians]
