# OpenSim document version 40000
Model arm26:
  gravity: 0 -9.8066 0
  length_units: meters
  force_units: N
  credits:
    The OpenSim Development Team (Reinbolt, J; Seth, A; Habib, A; Hamner, S) adapted from a model originally created by Kate Holzbaur (11/22/04) License: Creative Commons (CCBY 3.0). You are free to distribute, remix, tweak, and build upon this work, even commercially, as long as you credit us for the original creation. http://creativecommons.org/licenses/by/3.0/
  publications:
    Holzbaur, K.R.S., Murray, W.M., Delp, S.L. A Model of the Upper Extremity for Simulating Musculoskeletal Surgery and Analyzing Neuromuscular Control. Annals of Biomedical Engineering, vol 33, pp 829–840, 2005
  Ground
  BodySet:
    Body r_humerus: mass=1.864572 [kg] mass_center=(0 -0.180496 0) inertia=(0.01481 0.004551 0.013193 0 0 0)
        meshes=arm_r_humerus.vtp
    Body r_ulna_radius_hand: mass=1.534315 mass_center=(0 -0.181479 0) inertia=(0.019281 0.001571 0.020062 0 0 0)
        meshes=(arm_r_ulna.vtp arm_r_radius.vtp arm_r_lunate.vtp arm_r_scaphoid.vtp arm_r_pisiform.vtp arm_r_triquetrum.vtp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)
  JointSet:
    CustomJoint r_elbow: socket_parent_frame=r_humerus_offset socket_child_frame=r_ulna_radius_hand_offset
      Coordinate r_elbow_flex: default_value=0 range=(0 2.268928) clamped=false
      PhysicalOffsetFrame r_humerus_offset: socket_parent=/bodyset/r_humerus
          translation=(0.0061 -0.2904 -0.0123) [meters] orientation=(-1.467502e-9 0 0) [radians]
      PhysicalOffsetFrame r_ulna_radius_hand_offset: socket_parent=/bodyset/r_ulna_radius_hand translation=(0 0 0)
      SpatialTransform: axes_held_at_zero=(rotation2 rotation3 translation1 translation2 translation3)
        TransformAxis rotation1: coordinates=r_elbow_flex axis=(0.04940001 0.03660001 0.9981083)
            LinearFunction(coefficients=1 0)
    WeldJoint free_r_humerus: socket_parent_frame=/ground socket_child_frame=/bodyset/r_humerus
  MarkerSet:
    Marker r_humerus1: r_humerus (-0.0011 0.008951802 0.0381422)
    Marker r_humerus2: r_humerus (-0.0011 -0.2834665 -0.05844658)
    Marker r_humerus3: r_humerus (-0.0011 0.003558939 -0.03641854)
    Marker r_radius1: r_ulna_radius_hand (-0.0011 -0.2411423 0.02663963)
    Marker r_radius2: r_ulna_radius_hand (-0.04389669 0.002817308 -0.000236378)
    Marker r_radius3: r_ulna_radius_hand (-0.0011 -0.23559 0.0943)
