# OpenSim document version 40000
NeuralControlPersonalizationTool:
  input_directory: preprocessed
  mtp_results_input_directory: mtpResults
  input_model_file: model.osim
  coordinate_list: hip_flexion_l hip_adduction_l hip_rotation_l knee_angle_l ankle_angle_l subtalar_angle_l
  muscle_tendon_parameter_initialization: true
  enforce_bilateral_symmetry: false
  max_iterations: 2e3
  max_function_evaluations: 1e8
  SynergySet:
    Synergy: muscle_group_name=group1 num_synergies=6
    Synergy: muscle_group_name=group2 num_synergies=6
  NeuralControlPersonalizationTerms:
    MomentTracking: is_enabled=true max_allowable_error=5
    ActivationTracking: is_enabled=true max_allowable_error=0.01
    ActivationMinimization: is_enabled=true max_allowable_error=0.05
    GroupedMuscleActivations: is_enabled=false max_allowable_error=0.1 musclegroups=AdductorActivationGroupR
        musclegroups=BicepsFemActivationGroupR musclegroups=GastrocActivationGroupR
        musclegroups=GluteusMaxActivationGroupR musclegroups=GluteusMedActivationGroupR
        musclegroups=GluteusMinActivationGroupR musclegroups=IliopsoasActivationGroupR
        musclegroups=HamstringActivationGroupR musclegroups=QuadricepActivationGroupR
        musclegroups=AdductorActivationGroupL musclegroups=BicepsFemActivationGroupL
        musclegroups=GastrocActivationGroupL musclegroups=GluteusMaxActivationGroupL
        musclegroups=GluteusMedActivationGroupL musclegroups=GluteusMinActivationGroupL
        musclegroups=IliopsoasActivationGroupL musclegroups=HamstringActivationGroupL
        musclegroups=QuadricepActivationGroupL
