# OpenSim document version 40000
NeuralControlPersonalizationTool:
  results_directory: results
  input_model_file: optModel_MuscleGroups_LeftMusclesActive_NewSynx.osim
  coordinate_list: hip_flexion_l hip_adduction_l hip_rotation_l knee_angle_l ankle_angle_l subtalar_angle_l
  v_max_factor: 10
  activation_muscle_groups: LeftMusclesActive
  normalized_fiber_length_muscle_groups: LeftMusclesActive
  max_iterations: 2e3
  max_function_evaluations: 1e8
  mtp_results_directory_1: right_leg
  mtp_results_directory_2: left_leg
  enforce_bilateral_symmetry: false
  # MTP AND NCP SHARED SETTINGS
  MuscleTendonLengthInitialization: is_enabled=true passive_data_input_directory=thelen
      max_normalized_muscle_fiber_length=1 min_normalized_muscle_fiber_length=0.6 optimize_maximum_muscle_stress=true
      optimize_isometric_max_force=true maximum_muscle_stress=610e3
    MuscleTendonLengthInitializationCostFunctionTerms:
      IndividualMuscles:
        PassiveJointMoments: is_enabled=true max_allowable_error=2
        OptimalMuscleFiberLength: is_enabled=true max_allowable_error=0.3 error_center=1
        TendonSlackLength: is_enabled=true max_allowable_error=1 error_center=1
        MinimumNormalizedMuscleFiberLength: is_enabled=true max_allowable_error=0.3
        MaximumNormalizedMuscleFiberLength: is_enabled=true max_allowable_error=0.03
        MaximumMuscleStress: is_enabled=true max_allowable_error=0.1 error_center=1.2
        PassiveMuscleForces: is_enabled=true max_allowable_error=10
      GroupedMuscles:
        NormalizedMuscleFiberLength: is_enabled=true max_allowable_error=0.1
        MaximumNormalizedMuscleFiberLength: is_enabled=true max_allowable_error=0.1
  # END OF MTP AND NCP SHARED SETTINGS
  # NCP SPECIFIC SETTINGS
  SynergySet:
    Synergy: muscle_group_name=group1 num_synergies=6
    Synergy: muscle_group_name=group2 num_synergies=6
  NeuralControlPersonalizationCostTerms:
    MomentTracking: is_enabled=true max_allowable_error=5
    ActivationTracking: is_enabled=true max_allowable_error=0.01
    ActivationMinimization: is_enabled=true max_allowable_error=0.05
    GroupedMuscleActivations: is_enabled=false max_allowable_error=0.1
