# OpenSim document version 40000
Model platedModel.osim:
  gravity: 0 -9.80665 0
  length_units: meters
  force_units: N
  credits:
    Rajagopal, A, Dembia, C.L., DeMers, M.S., Delp, D.D., Hicks, J.L., and Delp, S.L.
  publications:
    Rajagopal, Apoorva, et al. "Full-Body Musculoskeletal Model for Muscle-Driven Simulation of Human Gait." IEEE Transactions on Biomedical Engineering 63.10 (2016): 2068-2079. (2016)
  Ground
  BodySet:
    Body pelvis: mass=9.608236 [kg] mass_center=(-0.07047871 0 0) inertia=(0.09902315 0.09902315 0.04313418 0 0 0)
        meshes=(pelvis_R_repositioned_m_dec_opt.stl pelvis_L_repositioned_m_dec_opt.stl sacrum.vtp)
      WrapCylinder Gmax1_at_pelvis_r: xyz_body_rotation=(-0.6 0.45 0) translation=(-0.07675899 -0.090684 0.06916363)
          quadrant=-x radius=0.04003234 length=0.1583857
      WrapCylinder Gmax2_at_pelvis_r: xyz_body_rotation=(-0.75 0.39 0) translation=(-0.0797496 -0.076028 0.07710044)
          quadrant=all radius=0.04051926 length=0.103243
      WrapCylinder Gmax3_at_pelvis_r: xyz_body_rotation=(-0.1 0 0) translation=(-0.08274021 -0.080608 0.07710044)
          quadrant=all radius=0.03830592 length=0.1131866
      WrapCylinder Gmax1_at_pelvis_l: xyz_body_rotation=(0.6 -0.45 0) translation=(-0.07675899 -0.090684 -0.06916363)
          quadrant=-x radius=0.04003234 length=0.1583857
      WrapCylinder Gmax2_at_pelvis_l: xyz_body_rotation=(0.75 -0.39 0) translation=(-0.0797496 -0.076028 -0.07710044)
          quadrant=all radius=0.04051926 length=0.103243
      WrapCylinder Gmax3_at_pelvis_l: xyz_body_rotation=(0.1 0 0) translation=(-0.08274021 -0.080608 -0.07710044)
          quadrant=all radius=0.03830592 length=0.1131866
      WrapCylinder PS_at_brim_r: xyz_body_rotation=(-0.25 -0.27 0.1) translation=(-0.07376838 -0.05496 0.07437925)
          quadrant=-y radius=0.0484334 length=0.1113294
      WrapCylinder PS_at_brim_l: xyz_body_rotation=(0.25 0.27 0.1) translation=(-0.07376838 -0.05496 -0.07437925)
          quadrant=-y radius=0.0484334 length=0.1113294
      WrapCylinder IL_at_brim_r: xyz_body_rotation=(-0.32 -0.24 0.9) translation=(-0.07077777 -0.05954 0.08571755)
          quadrant=-y radius=0.05336762 length=0.1107879
      WrapCylinder IL_at_brim_l: xyz_body_rotation=(0.32 0.24 0.9) translation=(-0.07077777 -0.05954 -0.08571755)
          quadrant=-y radius=0.05336762 length=0.1107879
    Body femur_r: mass=7.256526 mass_center=(0 -0.1694338 0) inertia=(0.103768 0.02720131 0.1094252 0 0 0)
        meshes=r_femur.vtp
      WrapCylinder Gastroc_at_condyles_r: translation=(0.004983347 -0.4086345 0) quadrant=all radius=0.02491674
          length=0.09966694
      WrapCylinder KnExt_at_fem_r: xyz_body_rotation=(-0.0623366 0.0507601 0)
          translation=(0.003576329 -0.4013907 0.002084145) quadrant=all radius=0.02491674 length=0.09966694
      WrapCylinder AB_at_femshaft_r: xyz_body_rotation=(1.66157 0.186644 0)
          translation=(0.01459463 -0.11222 0.02328718) quadrant=all radius=0.01644505 length=0.06976686
      WrapCylinder AL_at_femshaft_r: xyz_body_rotation=(1.77711 0.136489 0)
          translation=(0.03063034 -0.2311366 0.01506336) quadrant=all radius=0.02003306 length=0.09966694
      WrapCylinder AMprox_at_femshaft_r: xyz_body_rotation=(1.61126 0.18656 0)
          translation=(0.005165728 -0.07265202 0.02531839) quadrant=all radius=0.02102972 length=0.06976686
      WrapCylinder AMmid_at_femshaft_r: xyz_body_rotation=(1.61139 0.13656 0)
          translation=(0.02293585 -0.1601757 0.02051564) quadrant=all radius=0.02132873 length=0.1196003
      WrapCylinder AMdist_at_femshaft_r: xyz_body_rotation=(1.71188 0.186636 0)
          translation=(0.03150123 -0.2598676 0.00933341) quadrant=all radius=0.02172739 length=0.1993339
      WrapCylinder AMisch_at_condyles_r: xyz_body_rotation=(1.71115 -0.463363 0)
          translation=(-0.02257566 -0.3755759 -0.003143864) quadrant=all radius=0.03986678 length=0.2392007
      WrapCylinder PECT_at_femshaft_r: xyz_body_rotation=(1.81295 0.276344 0)
          translation=(0.006065461 -0.08422146 0.03033912) quadrant=all radius=0.01495004 length=0.04983347
    Body tibia_r: mass=3.662115 mass_center=(0 -0.2013039 0) inertia=(0.05787582 0.005856481 0.05867965 0 0 0)
        meshes=(r_tibia.vtp r_fibula.vtp)
      WrapCylinder GasLat_at_shank_r: xyz_body_rotation=(2.96723 -0.279725 -1.47812)
          translation=(-0.007978838 -0.07978838 -0.00355813) quadrant=-y radius=0.05930217 length=0.1078221
      WrapCylinder GasMed_at_shank_r: xyz_body_rotation=(2.96723 0.0279725 -1.47812)
          translation=(-0.007978838 -0.07978838 -0.00355813) quadrant=-y radius=0.05930217 length=0.1078221
      WrapCylinder GR_at_condyles_r: xyz_body_rotation=(0 -0.4 0) translation=(-0.003234664 -0.02156443 0) quadrant=all
          radius=0.03881597 length=0.1078221
      WrapCylinder SM_at_condyles_r: xyz_body_rotation=(0 -0.1 0) translation=(-0.001078221 -0.02156443 0) quadrant=all
          radius=0.03795339 length=0.1078221
      WrapCylinder ST_at_condyles_r: xyz_body_rotation=(0 -0.2 0) translation=(-0.002156443 -0.02210354 0) quadrant=all
          radius=0.04582441 length=0.1078221
      WrapCylinder BF_at_gastroc_r: translation=(-0.06253684 -0.06469328 0) quadrant=y radius=0.03234664
          length=0.1617332
    Body patella_r: mass=0.06792573 mass_center=(0.0018 0.0264 0) inertia=(2.261564e-6 1.03307e-5 1.03307e-5 0 0 0)
        meshes=r_patella.vtp
    Body talus_r: mass=0.1069889 mass_center=(0 0 0) inertia=(0.001311836 0.001311836 0.001311836 0 0 0)
        meshes=r_talus.vtp
    Body calcn_r: mass=1.337361 mass_center=(0.1107313 0.0332194 0) inertia=(0.001836571 0.005116161 0.005378528 0 0 0)
        meshes=r_foot.vtp
    Body toes_r: mass=0.2317379 mass_center=(0.03831304 0.00664388 -0.01937798)
        inertia=(0.0001311836 0.0002623672 0.001311836 0 0 0) meshes=r_bofoot.vtp
    Body femur_l: mass=7.256526 mass_center=(0 -0.1694338 0) inertia=(0.103768 0.02720131 0.1094252 0 0 0)
        meshes=l_femur.vtp
      WrapCylinder Gastroc_at_condyles_l: translation=(0.004983347 -0.4086345 0) quadrant=all radius=0.02491674
          length=0.09966694
      WrapCylinder KnExt_at_fem_l: xyz_body_rotation=(0.0623366 -0.0507601 0)
          translation=(0.003576329 -0.4013907 -0.002084145) quadrant=all radius=0.02491674 length=0.09966694
      WrapCylinder AB_at_femshaft_l: xyz_body_rotation=(-1.66157 -0.186644 0)
          translation=(0.01459463 -0.11222 -0.02328718) quadrant=all radius=0.01644505 length=0.06976686
      WrapCylinder AL_at_femshaft_l: xyz_body_rotation=(-1.77711 -0.136489 0)
          translation=(0.03063034 -0.2311366 -0.01506336) quadrant=all radius=0.02003306 length=0.09966694
      WrapCylinder AMprox_at_femshaft_l: xyz_body_rotation=(-1.61126 -0.18656 0)
          translation=(0.005165728 -0.07265202 -0.02531839) quadrant=all radius=0.02102972 length=0.06976686
      WrapCylinder AMmid_at_femshaft_l: xyz_body_rotation=(-1.61139 -0.13656 0)
          translation=(0.02293585 -0.1601757 -0.02051564) quadrant=all radius=0.02132873 length=0.1196003
      WrapCylinder AMdist_at_femshaft_l: xyz_body_rotation=(-1.71188 -0.186636 0)
          translation=(0.03150123 -0.2598676 -0.00933341) quadrant=all radius=0.02172739 length=0.1993339
      WrapCylinder AMisch_at_condyles_l: xyz_body_rotation=(-1.71115 0.463363 0)
          translation=(-0.02257566 -0.3755759 0.003143864) quadrant=all radius=0.03986678 length=0.2392007
      WrapCylinder PECT_at_femshaft_l: xyz_body_rotation=(-1.81295 -0.276344 0)
          translation=(0.006065461 -0.08422146 -0.03033912) quadrant=all radius=0.01495004 length=0.04983347
    Body tibia_l: mass=3.662115 mass_center=(0 -0.2013039 0) inertia=(0.05787582 0.005856481 0.05867965 0 0 0)
        meshes=(l_tibia.vtp l_fibula.vtp)
      WrapCylinder GasLat_at_shank_l: xyz_body_rotation=(-2.96723 0.279725 -1.47812)
          translation=(-0.007978838 -0.07978838 0.00355813) quadrant=-y radius=0.05930217 length=0.1078221
      WrapCylinder GasMed_at_shank_l: xyz_body_rotation=(-2.96723 -0.0279725 -1.47812)
          translation=(-0.007978838 -0.07978838 0.00355813) quadrant=-y radius=0.05930217 length=0.1078221
      WrapCylinder GR_at_condyles_l: xyz_body_rotation=(0 0.4 0) translation=(-0.003234664 -0.02156443 0) quadrant=all
          radius=0.03881597 length=0.1078221
      WrapCylinder SM_at_condyles_l: xyz_body_rotation=(0 0.1 0) translation=(-0.001078221 -0.02156443 0) quadrant=all
          radius=0.03795339 length=0.1078221
      WrapCylinder ST_at_condyles_l: xyz_body_rotation=(0 0.2 0) translation=(-0.002156443 -0.02210354 0) quadrant=all
          radius=0.04582441 length=0.1078221
      WrapCylinder BF_at_gastroc_l: translation=(-0.06253684 -0.06469328 0) quadrant=all radius=0.03234664
          length=0.1617332
    Body patella_l: mass=0.06792573 mass_center=(0.0018 0.0264 0) inertia=(2.261564e-6 1.03307e-5 1.03307e-5 0 0 0)
        meshes=l_patella.vtp
    Body talus_l: mass=0.1069889 mass_center=(0 0 0) inertia=(0.001311836 0.001311836 0.001311836 0 0 0)
        meshes=l_talus.vtp
    Body calcn_l: mass=1.337361 mass_center=(0.1107313 0.0332194 0) inertia=(0.001836571 0.005116161 0.005378528 0 0 0)
        meshes=l_foot.vtp
    Body toes_l: mass=0.2317379 mass_center=(0.03831304 0.00664388 0.01937798)
        inertia=(0.0001311836 0.0002623672 0.001311836 0 0 0) meshes=l_bofoot.vtp
    Body torso_lower: mass=0.09276438 mass_center=(0 0 0) inertia=(0.0009774596 0.001067658 0.001067658 0 0 0)
        meshes=hat_spine_lower.stl
    Body torso_upper: mass=24.88553 mass_center=(-0.03351644 0.3018081 0) inertia=(1.342385 0.87476 1.342385 0 0 0)
        meshes=(hat_spine_upper.stl hat_jaw.vtp hat_skull.vtp hat_ribs_scap.vtp)
    Body humerus_r: mass=2.002208 mass_center=(0 -0.1772101 0) inertia=(0.01365637 0.004711026 0.01532884 0 0 0)
        meshes=humerus_rv.vtp
    Body ulna_r: mass=0.5102065 mass_center=(0 -0.1231123 0) inertia=(0.002595573 0.0005415476 0.002815522 0 0 0)
        meshes=ulna_rv.vtp
    Body radius_r: mass=0.5102065 mass_center=(0 -0.1231123 0) inertia=(0.002595573 0.0005415476 0.002815522 0 0 0)
        meshes=radius_rv.vtp
    Body hand_r: mass=0.3605107 mass_center=(0 -0.068095 0) inertia=(0.0007028974 0.0004310368 0.001055922 0 0 0)
        meshes=(pisiform_rvs.vtp lunate_rvs.vtp scaphoid_rvs.vtp triquetrum_rvs.vtp hamate_rvs.vtp capitate_rvs.vtp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)
    Body humerus_l: mass=2.002208 mass_center=(0 -0.1772101 0) inertia=(0.01365637 0.004711026 0.01532884 0 0 0)
        meshes=humerus_lv.vtp
    Body ulna_l: mass=0.5102065 mass_center=(0 -0.1231123 0) inertia=(0.002595573 0.0005415476 0.002815522 0 0 0)
        meshes=ulna_lv.vtp
    Body radius_l: mass=0.5102065 mass_center=(0 -0.1231123 0) inertia=(0.002595573 0.0005415476 0.002815522 0 0 0)
        meshes=radius_lv.vtp
    Body hand_l: mass=0.3605107 mass_center=(0 -0.068095 0) inertia=(0.0007028974 0.0004310368 0.001055922 0 0 0)
        meshes=(pisiform_lvs.vtp lunate_lvs.vtp scaphoid_lvs.vtp triquetrum_lvs.vtp hamate_lvs.vtp capitate_lvs.vtp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)
    Body calcn_l_markerPlate: mass=0 mass_center=(0 0 0) inertia=(0 0 0 0 0 0)
    Body calcn_r_markerPlate: mass=0 mass_center=(0 0 0) inertia=(0 0 0 0 0 0)
    Body femur_l_markerPlate: mass=0 mass_center=(0 0 0) inertia=(0 0 0 0 0 0)
    Body femur_r_markerPlate: mass=0 mass_center=(0 0 0) inertia=(0 0 0 0 0 0)
    Body humerus_l_markerPlate: mass=0 mass_center=(0 0 0) inertia=(0 0 0 0 0 0)
    Body humerus_r_markerPlate: mass=0 mass_center=(0 0 0) inertia=(0 0 0 0 0 0)
    Body patella_l_markerPlate: mass=0 mass_center=(0 0 0) inertia=(0 0 0 0 0 0)
    Body patella_r_markerPlate: mass=0 mass_center=(0 0 0) inertia=(0 0 0 0 0 0)
    Body pelvis_markerPlate: mass=0 mass_center=(0 0 0) inertia=(0 0 0 0 0 0)
    Body radius_l_markerPlate: mass=0 mass_center=(0 0 0) inertia=(0 0 0 0 0 0)
    Body radius_r_markerPlate: mass=0 mass_center=(0 0 0) inertia=(0 0 0 0 0 0)
    Body tibia_l_markerPlate: mass=0 mass_center=(0 0 0) inertia=(0 0 0 0 0 0)
    Body tibia_r_markerPlate: mass=0 mass_center=(0 0 0) inertia=(0 0 0 0 0 0)
    Body toes_l_markerPlate: mass=0 mass_center=(0 0 0) inertia=(0 0 0 0 0 0)
    Body toes_r_markerPlate: mass=0 mass_center=(0 0 0) inertia=(0 0 0 0 0 0)
    Body torso_upper_markerPlate: mass=0 mass_center=(0 0 0) inertia=(0 0 0 0 0 0)
  JointSet:
    CustomJoint ground_pelvis: socket_parent_frame=ground_offset socket_child_frame=pelvis_offset
      Coordinate pelvis_tilt: default_value=0 range=(-1.570796 1.570796) clamped=true
      Coordinate pelvis_list: default_value=0 range=(-1.570796 1.570796) clamped=true
      Coordinate pelvis_rotation: default_value=0 range=(-1.570796 1.570796) clamped=true
      Coordinate pelvis_tx: default_value=0 range=(-5 5) clamped=true
      Coordinate pelvis_ty: default_value=0.94 range=(-1 2) clamped=true
      Coordinate pelvis_tz: default_value=0 range=(-3 3) clamped=true
      PhysicalOffsetFrame ground_offset: socket_parent=/ground translation=(0 0 0) [meters]
      PhysicalOffsetFrame pelvis_offset: socket_parent=/bodyset/pelvis translation=(0 0 0)
      SpatialTransform:
        TransformAxis rotation1: coordinates=pelvis_tilt axis=(0 0 1) LinearFunction(coefficients=1 0)
        TransformAxis rotation2: coordinates=pelvis_list axis=(1 0 0) LinearFunction(coefficients=1 0)
        TransformAxis rotation3: coordinates=pelvis_rotation axis=(0 1 0) LinearFunction(coefficients=1 0)
        TransformAxis translation1: coordinates=pelvis_tx axis=(1 0 0) LinearFunction(coefficients=1 0)
        TransformAxis translation2: coordinates=pelvis_ty axis=(0 1 0) LinearFunction(coefficients=1 0)
        TransformAxis translation3: coordinates=pelvis_tz axis=(0 0 1) LinearFunction(coefficients=1 0)
    CustomJoint hip_r: socket_parent_frame=pelvis_offset socket_child_frame=femur_r_offset
      Coordinate hip_flexion_r: default_value=0 range=(-0.5235988 2.094395) clamped=true
      Coordinate hip_adduction_r: default_value=0 range=(-0.8726646 0.5235988) clamped=true
      Coordinate hip_rotation_r: default_value=0 range=(-0.6981317 0.6981317) clamped=true
      PhysicalOffsetFrame pelvis_offset: socket_parent=/bodyset/pelvis translation=(-0.05609986 -0.07189684 0.08759971)
      PhysicalOffsetFrame femur_r_offset: socket_parent=/bodyset/femur_r translation=(0 0 0)
      SpatialTransform: axes_held_at_zero=(translation1 translation2 translation3)
        TransformAxis rotation1: coordinates=hip_flexion_r axis=(0 0 1) LinearFunction(coefficients=1 0)
        TransformAxis rotation2: coordinates=hip_adduction_r axis=(1 0 0) LinearFunction(coefficients=1 0)
        TransformAxis rotation3: coordinates=hip_rotation_r axis=(0 1 0) LinearFunction(coefficients=1 0)
    CustomJoint walker_knee_r: socket_parent_frame=femur_r_offset socket_child_frame=tibia_r_offset
      Coordinate knee_angle_r: default_value=0 range=(0 2.0944) clamped=true
      Coordinate knee_adduction_r: default_value=0.08836602 range=(-1 1) clamped=true locked=true
      PhysicalOffsetFrame femur_r_offset: socket_parent=/bodyset/femur_r
          translation=(-0.008063056 -0.4066013 -0.002740841) orientation=(-1.64157 1.44618 1.5708) [radians]
      PhysicalOffsetFrame tibia_r_offset: socket_parent=/bodyset/tibia_r
          translation=(-0.008722314 -0.003811297 -0.001600878) orientation=(-1.64157 1.44618 1.5708)
      SpatialTransform: axes_held_at_zero=translation3
        TransformAxis rotation1: coordinates=knee_angle_r axis=(1 0 0) LinearFunction(coefficients=1 0)
        TransformAxis rotation2: coordinates=knee_adduction_r axis=(0 0 1) LinearFunction(coefficients=1 0)
        TransformAxis rotation3: coordinates=knee_angle_r axis=(0 1 0)
          SimmSpline: x=(0 0.174533 0.349066 0.523599 0.698132 0.872665 1.0472 1.22173 1.39626 1.5708 1.74533 1.91986 2.0944)
              y=(0 0.059461 0.109399 0.150618 0.18392 0.210107 0.229983 0.24435 0.254012 0.25977 0.262428 0.262788 0.261654)
        TransformAxis translation1: coordinates=knee_angle_r axis=(0 1 0)
          MultiplierFunction: scale=0.9966694
            SimmSpline: x=(0 0.174533 0.349066 0.523599 0.698132 0.872665 1.0472 1.22173 1.39626 1.5708 1.74533 1.91986 2.0944)
                y=(0 0.000479 0.000835 0.001086 0.001251 0.001346 0.001391 0.001403 0.0014 0.0014 0.001421 0.001481 0.001599)
        TransformAxis translation2: coordinates=knee_angle_r axis=(0 0 1)
          MultiplierFunction: scale=0.9966694
            SimmSpline: x=(0 0.174533 0.349066 0.523599 0.698132 0.872665 1.0472 1.22173 1.39626 1.5708 1.74533 1.91986 2.0944)
                y=(0 0.000988 0.001899 0.002734 0.003492 0.004173 0.004777 0.005305 0.005756 0.00613 0.006427 0.006648 0.006792)
    CustomJoint patellofemoral_r: socket_parent_frame=femur_r_offset socket_child_frame=patella_r_offset
      Coordinate knee_angle_r_beta: default_value=0 range=(-99999.9 99999.9) clamped=false
      PhysicalOffsetFrame femur_r_offset: socket_parent=/bodyset/femur_r
          translation=(-0.008063056 -0.4066013 -0.002740841)
      PhysicalOffsetFrame patella_r_offset: socket_parent=/bodyset/patella_r translation=(0 0 0)
      SpatialTransform: axes_held_at_zero=(rotation2 rotation3)
        TransformAxis rotation1: coordinates=knee_angle_r_beta axis=(0 0 1)
          SimmSpline: x=(0 0.174533 0.349066 0.523599 0.698132 0.872665 1.0472 1.22173 1.39626 1.5708 1.74533 1.91986 2.0944)
              y=(0.00113686 -0.00629212 -0.105582 -0.253683 -0.414245 -0.579047 -0.747244 -0.91799 -1.09044 -1.26379 -1.43763 -1.61186 -1.78634)
        TransformAxis translation1: coordinates=knee_angle_r_beta axis=(1 0 0)
          MultiplierFunction: scale=0.9966694
            SimmSpline: x=(0 0.174533 0.349066 0.523599 0.698132 0.872665 1.0472 1.22173 1.39626 1.5708 1.74533 1.91986 2.0944)
                y=(0.0524 0.0488 0.0437 0.0371 0.0296 0.0216 0.0136 0.0057 -0.0019 -0.0088 -0.0148 -0.0196 -0.0227)
        TransformAxis translation2: coordinates=knee_angle_r_beta axis=(0 1 0)
          MultiplierFunction: scale=0.9966694
            SimmSpline: x=(0 0.174533 0.349066 0.523599 0.698132 0.872665 1.0472 1.22173 1.39626 1.5708 1.74533 1.91986 2.0944)
                y=(-0.0108 -0.019 -0.0263 -0.0322 -0.0367 -0.0395 -0.0408 -0.0404 -0.0384 -0.0349 -0.0301 -0.0245 -0.0187)
        TransformAxis translation3: axis=(0 0 1) MultiplierFunction(scale=0.9966694, Constant(value=0.00275))
    PinJoint ankle_r: socket_parent_frame=tibia_r_offset socket_child_frame=talus_r_offset
      Coordinate ankle_angle_r: default_value=0 range=(-0.6981317 0.5235988) clamped=true
      PhysicalOffsetFrame tibia_r_offset: socket_parent=/bodyset/tibia_r translation=(-0.01078221 -0.4312885 0)
          orientation=(0.175895 -0.105208 0.0186622)
      PhysicalOffsetFrame talus_r_offset: socket_parent=/bodyset/talus_r translation=(0 0 0)
          orientation=(0.175895 -0.105208 0.0186622)
    PinJoint subtalar_r: socket_parent_frame=talus_r_offset socket_child_frame=calcn_r_offset
      Coordinate subtalar_angle_r: default_value=0 range=(-0.3490659 0.3490659) clamped=true
      PhysicalOffsetFrame talus_r_offset: socket_parent=/bodyset/talus_r
          translation=(-0.05400367 -0.04645179 0.008769921) orientation=(-1.76819 0.906223 1.8196)
      PhysicalOffsetFrame calcn_r_offset: socket_parent=/bodyset/calcn_r translation=(0 0 0)
          orientation=(-1.76819 0.906223 1.8196)
    PinJoint mtp_r: socket_parent_frame=calcn_r_offset socket_child_frame=toes_r_offset
      Coordinate mtp_angle_r: default_value=0 range=(-0.5235988 0.5235988) clamped=true
      PhysicalOffsetFrame calcn_r_offset: socket_parent=/bodyset/calcn_r
          translation=(0.1979876 -0.002214627 0.001195898) orientation=(-3.14159 0.619901 0)
      PhysicalOffsetFrame toes_r_offset: socket_parent=/bodyset/toes_r translation=(0 0 0)
          orientation=(-3.14159 0.619901 0)
    CustomJoint hip_l: socket_parent_frame=pelvis_offset socket_child_frame=femur_l_offset
      Coordinate hip_flexion_l: default_value=0 range=(-0.5235988 2.094395) clamped=true
      Coordinate hip_adduction_l: default_value=0 range=(-0.8726646 0.5235988) clamped=true
      Coordinate hip_rotation_l: default_value=0 range=(-0.6981317 0.6981317) clamped=true
      PhysicalOffsetFrame pelvis_offset: socket_parent=/bodyset/pelvis
          translation=(-0.05609986 -0.07189684 -0.08759971)
      PhysicalOffsetFrame femur_l_offset: socket_parent=/bodyset/femur_l translation=(0 0 0)
      SpatialTransform: axes_held_at_zero=(translation1 translation2 translation3)
        TransformAxis rotation1: coordinates=hip_flexion_l axis=(0 0 1) LinearFunction(coefficients=1 0)
        TransformAxis rotation2: coordinates=hip_adduction_l axis=(1 0 0) LinearFunction(coefficients=-1 0)
        TransformAxis rotation3: coordinates=hip_rotation_l axis=(0 1 0) LinearFunction(coefficients=-1 0)
    CustomJoint walker_knee_l: socket_parent_frame=femur_l_offset socket_child_frame=tibia_l_offset
      Coordinate knee_angle_l: default_value=0 range=(0 2.0944) clamped=true
      Coordinate knee_adduction_l: default_value=0.08836602 range=(-1 1) clamped=true locked=true
      PhysicalOffsetFrame femur_l_offset: socket_parent=/bodyset/femur_l
          translation=(-0.008063056 -0.4066013 0.002740841) orientation=(1.64157 -1.44618 1.5708)
      PhysicalOffsetFrame tibia_l_offset: socket_parent=/bodyset/tibia_l
          translation=(-0.008722314 -0.003811297 0.001600878) orientation=(1.64157 -1.44618 1.5708)
      SpatialTransform: axes_held_at_zero=translation3
        TransformAxis rotation1: coordinates=knee_angle_l axis=(-1 0 0) LinearFunction(coefficients=1 0)
        TransformAxis rotation2: coordinates=knee_adduction_l axis=(0 0 1) LinearFunction(coefficients=1 0)
        TransformAxis rotation3: coordinates=knee_angle_l axis=(0 1 0)
          SimmSpline: x=(0 0.174533 0.349066 0.523599 0.698132 0.872665 1.0472 1.22173 1.39626 1.5708 1.74533 1.91986 2.0944)
              y=(0 -0.059461 -0.109399 -0.150618 -0.18392 -0.210107 -0.229983 -0.24435 -0.254012 -0.25977 -0.262428 -0.262788 -0.261654)
        TransformAxis translation1: coordinates=knee_angle_l axis=(0 1 0)
          MultiplierFunction: scale=0.9966694
            SimmSpline: x=(0 0.174533 0.349066 0.523599 0.698132 0.872665 1.0472 1.22173 1.39626 1.5708 1.74533 1.91986 2.0944)
                y=(0 0.000479 0.000835 0.001086 0.001251 0.001346 0.001391 0.001403 0.0014 0.0014 0.001421 0.001481 0.001599)
        TransformAxis translation2: coordinates=knee_angle_l axis=(0 0 1)
          MultiplierFunction: scale=0.9966694
            SimmSpline: x=(0 0.174533 0.349066 0.523599 0.698132 0.872665 1.0472 1.22173 1.39626 1.5708 1.74533 1.91986 2.0944)
                y=(0 -0.000988 -0.001899 -0.002734 -0.003492 -0.004173 -0.004777 -0.005305 -0.005756 -0.00613 -0.006427 -0.006648 -0.006792)
    CustomJoint patellofemoral_l: socket_parent_frame=femur_l_offset socket_child_frame=patella_l_offset
      Coordinate knee_angle_l_beta: default_value=0 range=(-99999.9 99999.9) clamped=false
      PhysicalOffsetFrame femur_l_offset: socket_parent=/bodyset/femur_l
          translation=(-0.008063056 -0.4066013 0.002740841)
      PhysicalOffsetFrame patella_l_offset: socket_parent=/bodyset/patella_l translation=(0 0 0)
      SpatialTransform: axes_held_at_zero=(rotation2 rotation3)
        TransformAxis rotation1: coordinates=knee_angle_l_beta axis=(0 0 1)
          SimmSpline: x=(0 0.174533 0.349066 0.523599 0.698132 0.872665 1.0472 1.22173 1.39626 1.5708 1.74533 1.91986 2.0944)
              y=(0.00113686 -0.00629212 -0.105582 -0.253683 -0.414245 -0.579047 -0.747244 -0.91799 -1.09044 -1.26379 -1.43763 -1.61186 -1.78634)
        TransformAxis translation1: coordinates=knee_angle_l_beta axis=(1 0 0)
          MultiplierFunction: scale=0.9966694
            SimmSpline: x=(0 0.174533 0.349066 0.523599 0.698132 0.872665 1.0472 1.22173 1.39626 1.5708 1.74533 1.91986 2.0944)
                y=(0.0524 0.0488 0.0437 0.0371 0.0296 0.0216 0.0136 0.0057 -0.0019 -0.0088 -0.0148 -0.0196 -0.0227)
        TransformAxis translation2: coordinates=knee_angle_l_beta axis=(0 1 0)
          MultiplierFunction: scale=0.9966694
            SimmSpline: x=(0 0.174533 0.349066 0.523599 0.698132 0.872665 1.0472 1.22173 1.39626 1.5708 1.74533 1.91986 2.0944)
                y=(-0.0108 -0.019 -0.0263 -0.0322 -0.0367 -0.0395 -0.0408 -0.0404 -0.0384 -0.0349 -0.0301 -0.0245 -0.0187)
        TransformAxis translation3: axis=(0 0 1) MultiplierFunction(scale=0.9966694, Constant(value=-0.00275))
    PinJoint ankle_l: socket_parent_frame=tibia_l_offset socket_child_frame=talus_l_offset
      Coordinate ankle_angle_l: default_value=0 range=(-0.6981317 0.5235988) clamped=true
      PhysicalOffsetFrame tibia_l_offset: socket_parent=/bodyset/tibia_l translation=(-0.01078221 -0.4312885 0)
          orientation=(-0.175895 0.105208 0.0186622)
      PhysicalOffsetFrame talus_l_offset: socket_parent=/bodyset/talus_l translation=(0 0 0)
          orientation=(-0.175895 0.105208 0.0186622)
    PinJoint subtalar_l: socket_parent_frame=talus_l_offset socket_child_frame=calcn_l_offset
      Coordinate subtalar_angle_l: default_value=0 range=(-0.3490659 0.3490659) clamped=true
      PhysicalOffsetFrame talus_l_offset: socket_parent=/bodyset/talus_l
          translation=(-0.05400367 -0.04645179 -0.008769921) orientation=(1.76819 -0.906223 1.8196)
      PhysicalOffsetFrame calcn_l_offset: socket_parent=/bodyset/calcn_l translation=(0 0 0)
          orientation=(1.76819 -0.906223 1.8196)
    PinJoint mtp_l: socket_parent_frame=calcn_l_offset socket_child_frame=toes_l_offset
      Coordinate mtp_angle_l: default_value=0 range=(-0.5235988 0.5235988) clamped=true
      PhysicalOffsetFrame calcn_l_offset: socket_parent=/bodyset/calcn_l
          translation=(0.1979876 -0.002214627 -0.001195898) orientation=(-3.14159 -0.619901 0)
      PhysicalOffsetFrame toes_l_offset: socket_parent=/bodyset/toes_l translation=(0 0 0)
          orientation=(-3.14159 -0.619901 0)
    CustomJoint back_lower: socket_parent_frame=pelvis_offset socket_child_frame=torso_lower_offset
      Coordinate lumbar_extension: default_value=0 range=(-1.570796 1.570796) clamped=true
      Coordinate lumbar_bending: default_value=0 range=(-1.570796 1.570796) clamped=true
      Coordinate lumbar_rotation: default_value=0 range=(-1.570796 1.570796) clamped=true
      PhysicalOffsetFrame pelvis_offset: socket_parent=/bodyset/pelvis translation=(-0.1003848 0.074654 0)
      PhysicalOffsetFrame torso_lower_offset: socket_parent=/bodyset/torso_lower translation=(0 0 0)
      SpatialTransform: axes_held_at_zero=(translation1 translation2 translation3)
        TransformAxis rotation1: coordinates=lumbar_extension axis=(0 0 1) LinearFunction(coefficients=1 0)
        TransformAxis rotation2: coordinates=lumbar_bending axis=(1 0 0) LinearFunction(coefficients=1 0)
        TransformAxis rotation3: coordinates=lumbar_rotation axis=(0 1 0) LinearFunction(coefficients=1 0)
    CustomJoint back_upper: socket_parent_frame=torso_lower_offset socket_child_frame=torso_upper_offset
      Coordinate thoracic_extension: default_value=0 range=(-1.570796 1.570796) clamped=true locked=true
      Coordinate thoracic_bending: default_value=0 range=(-1.570796 1.570796) clamped=true locked=true
      Coordinate thoracic_rotation: default_value=0 range=(-1.570796 1.570796) clamped=true locked=true
      PhysicalOffsetFrame torso_lower_offset: socket_parent=/bodyset/torso_lower translation=(-0.04692301 0.2263561 0)
      PhysicalOffsetFrame torso_upper_offset: socket_parent=/bodyset/torso_upper translation=(-0.04692301 0.2263561 0)
      SpatialTransform: axes_held_at_zero=(translation1 translation2 translation3)
        TransformAxis rotation1: coordinates=thoracic_extension axis=(0 0 1) LinearFunction(coefficients=1 0)
        TransformAxis rotation2: coordinates=thoracic_bending axis=(1 0 0) LinearFunction(coefficients=1 0)
        TransformAxis rotation3: coordinates=thoracic_rotation axis=(0 1 0) LinearFunction(coefficients=1 0)
    CustomJoint acromial_r: socket_parent_frame=torso_upper_offset socket_child_frame=humerus_r_offset
      Coordinate arm_flex_r: default_value=0 range=(-1.570796 1.570796) clamped=true
      Coordinate arm_add_r: default_value=0 range=(-2.094395 1.570796) clamped=true
      Coordinate arm_rot_r: default_value=0 range=(-1.570796 1.570796) clamped=true
      PhysicalOffsetFrame torso_upper_offset: socket_parent=/bodyset/torso_upper
          translation=(0.003524812 0.3503804 0.1899265)
      PhysicalOffsetFrame humerus_r_offset: socket_parent=/bodyset/humerus_r translation=(0 0 0)
      SpatialTransform: axes_held_at_zero=(translation1 translation2 translation3)
        TransformAxis rotation1: coordinates=arm_flex_r axis=(0 0 1) LinearFunction(coefficients=1 0)
        TransformAxis rotation2: coordinates=arm_add_r axis=(1 0 0) LinearFunction(coefficients=1 0)
        TransformAxis rotation3: coordinates=arm_rot_r axis=(0 1 0) LinearFunction(coefficients=1 0)
    PinJoint elbow_r: socket_parent_frame=humerus_r_offset socket_child_frame=ulna_r_offset
      Coordinate elbow_flex_r: default_value=0 range=(0 2.618) clamped=true
      PhysicalOffsetFrame humerus_r_offset: socket_parent=/bodyset/humerus_r
          translation=(0.0141594 -0.3083881 -0.01033623) orientation=(-0.0228627 0.228018 0.0051689)
      PhysicalOffsetFrame ulna_r_offset: socket_parent=/bodyset/ulna_r translation=(0 0 0)
          orientation=(-0.0228627 0.228018 0.0051689)
    PinJoint radioulnar_r: socket_parent_frame=ulna_r_offset socket_child_frame=radius_r_offset
      Coordinate pro_sup_r: default_value=1.570781 range=(0 1.570796) clamped=true locked=true
      PhysicalOffsetFrame ulna_r_offset: socket_parent=/bodyset/ulna_r
          translation=(-0.006871407 -0.01328622 0.02664292) orientation=(-1.56884 0.056428 1.53614)
      PhysicalOffsetFrame radius_r_offset: socket_parent=/bodyset/radius_r translation=(0 0 0)
          orientation=(-1.56884 0.056428 1.53614)
    UniversalJoint radius_hand_r: socket_parent_frame=radius_r_offset socket_child_frame=hand_r_offset
      Coordinate wrist_flex_r: default_value=0 range=(-1.22173 1.22173) clamped=true locked=true
      Coordinate wrist_dev_r: default_value=0 range=(-0.4363323 0.6108652) clamped=true locked=true
      PhysicalOffsetFrame radius_r_offset: socket_parent=/bodyset/radius_r
          translation=(-0.008985843 -0.2409037 0.01390216) orientation=(-1.5708 0 -1.5708)
      PhysicalOffsetFrame hand_r_offset: socket_parent=/bodyset/hand_r translation=(0 0 0)
          orientation=(-1.5708 0 -1.5708)
    CustomJoint acromial_l: socket_parent_frame=torso_upper_offset socket_child_frame=humerus_l_offset
      Coordinate arm_flex_l: default_value=0 range=(-1.570796 1.570796) clamped=true
      Coordinate arm_add_l: default_value=0 range=(-2.094395 1.570796) clamped=true
      Coordinate arm_rot_l: default_value=0 range=(-1.570796 1.570796) clamped=true
      PhysicalOffsetFrame torso_upper_offset: socket_parent=/bodyset/torso_upper
          translation=(0.003524812 0.3503804 -0.1899265)
      PhysicalOffsetFrame humerus_l_offset: socket_parent=/bodyset/humerus_l translation=(0 0 0)
      SpatialTransform: axes_held_at_zero=(translation1 translation2 translation3)
        TransformAxis rotation1: coordinates=arm_flex_l axis=(0 0 1) LinearFunction(coefficients=1 0)
        TransformAxis rotation2: coordinates=arm_add_l axis=(-1 0 0) LinearFunction(coefficients=1 0)
        TransformAxis rotation3: coordinates=arm_rot_l axis=(0 -1 0) LinearFunction(coefficients=1 0)
    PinJoint elbow_l: socket_parent_frame=humerus_l_offset socket_child_frame=ulna_l_offset
      Coordinate elbow_flex_l: default_value=0 range=(0 2.618) clamped=true
      PhysicalOffsetFrame humerus_l_offset: socket_parent=/bodyset/humerus_l
          translation=(0.0141594 -0.3083881 0.01033623) orientation=(0.0228627 -0.228018 0.0051689)
      PhysicalOffsetFrame ulna_l_offset: socket_parent=/bodyset/ulna_l translation=(0 0 0)
          orientation=(0.0228627 -0.228018 0.0051689)
    PinJoint radioulnar_l: socket_parent_frame=ulna_l_offset socket_child_frame=radius_l_offset
      Coordinate pro_sup_l: default_value=1.570787 range=(0 1.570796) clamped=true locked=true
      PhysicalOffsetFrame ulna_l_offset: socket_parent=/bodyset/ulna_l
          translation=(-0.006871407 -0.01328622 -0.02664292) orientation=(1.56884 -0.056428 1.53614)
      PhysicalOffsetFrame radius_l_offset: socket_parent=/bodyset/radius_l translation=(0 0 0)
          orientation=(1.56884 -0.056428 1.53614)
    UniversalJoint radius_hand_l: socket_parent_frame=radius_l_offset socket_child_frame=hand_l_offset
      Coordinate wrist_flex_l: default_value=0 range=(-1.22173 1.22173) clamped=true locked=true
      Coordinate wrist_dev_l: default_value=0 range=(-0.4363323 0.6108652) clamped=true locked=true
      PhysicalOffsetFrame radius_l_offset: socket_parent=/bodyset/radius_l
          translation=(-0.008985843 -0.2409037 -0.01390216) orientation=(1.5708 0 1.5708)
      PhysicalOffsetFrame hand_l_offset: socket_parent=/bodyset/hand_l translation=(0 0 0)
          orientation=(1.5708 0 1.5708)
    WeldJoint calcn_l_markerPlate_jnt: socket_parent_frame=calcn_l_offset socket_child_frame=calcn_l_markerPlate_offset
      PhysicalOffsetFrame calcn_l_offset: socket_parent=/bodyset/calcn_l translation=(0.0665607 0.03234467 -0.01758915)
      PhysicalOffsetFrame calcn_l_markerPlate_offset: socket_parent=/bodyset/calcn_l_markerPlate translation=(0 0 0)
    WeldJoint calcn_r_markerPlate_jnt: socket_parent_frame=calcn_r_offset socket_child_frame=calcn_r_markerPlate_offset
      PhysicalOffsetFrame calcn_r_offset: socket_parent=/bodyset/calcn_r translation=(0.06739357 0.03522067 0.01772231)
      PhysicalOffsetFrame calcn_r_markerPlate_offset: socket_parent=/bodyset/calcn_r_markerPlate translation=(0 0 0)
    WeldJoint femur_l_markerPlate_jnt: socket_parent_frame=femur_l_offset socket_child_frame=femur_l_markerPlate_offset
      PhysicalOffsetFrame femur_l_offset: socket_parent=/bodyset/femur_l
          translation=(0.06712047 -0.2250507 -0.04034033)
      PhysicalOffsetFrame femur_l_markerPlate_offset: socket_parent=/bodyset/femur_l_markerPlate translation=(0 0 0)
    WeldJoint femur_r_markerPlate_jnt: socket_parent_frame=femur_r_offset socket_child_frame=femur_r_markerPlate_offset
      PhysicalOffsetFrame femur_r_offset: socket_parent=/bodyset/femur_r translation=(0.06545367 -0.233292 0.04708637)
      PhysicalOffsetFrame femur_r_markerPlate_offset: socket_parent=/bodyset/femur_r_markerPlate translation=(0 0 0)
    WeldJoint humerus_l_markerPlate_jnt: socket_parent_frame=humerus_l_offset
        socket_child_frame=humerus_l_markerPlate_offset
      PhysicalOffsetFrame humerus_l_offset: socket_parent=/bodyset/humerus_l
          translation=(-0.1064927 -0.1064927 -0.1064927)
      PhysicalOffsetFrame humerus_l_markerPlate_offset: socket_parent=/bodyset/humerus_l_markerPlate
          translation=(0 0 0)
    WeldJoint humerus_r_markerPlate_jnt: socket_parent_frame=humerus_r_offset
        socket_child_frame=humerus_r_markerPlate_offset
      PhysicalOffsetFrame humerus_r_offset: socket_parent=/bodyset/humerus_r
          translation=(-0.1008636 -0.1008636 -0.1008636)
      PhysicalOffsetFrame humerus_r_markerPlate_offset: socket_parent=/bodyset/humerus_r_markerPlate
          translation=(0 0 0)
    WeldJoint patella_l_markerPlate_jnt: socket_parent_frame=patella_l_offset
        socket_child_frame=patella_l_markerPlate_offset
      PhysicalOffsetFrame patella_l_offset: socket_parent=/bodyset/patella_l
          translation=(0.01696042 0.01696042 0.01696042)
      PhysicalOffsetFrame patella_l_markerPlate_offset: socket_parent=/bodyset/patella_l_markerPlate
          translation=(0 0 0)
    WeldJoint patella_r_markerPlate_jnt: socket_parent_frame=patella_r_offset
        socket_child_frame=patella_r_markerPlate_offset
      PhysicalOffsetFrame patella_r_offset: socket_parent=/bodyset/patella_r
          translation=(0.01449885 0.01449885 0.01449885)
      PhysicalOffsetFrame patella_r_markerPlate_offset: socket_parent=/bodyset/patella_r_markerPlate
          translation=(0 0 0)
    WeldJoint pelvis_markerPlate_jnt: socket_parent_frame=pelvis_offset socket_child_frame=pelvis_markerPlate_offset
      PhysicalOffsetFrame pelvis_offset: socket_parent=/bodyset/pelvis
          translation=(-0.04004687 0.01833534 -0.001280313)
      PhysicalOffsetFrame pelvis_markerPlate_offset: socket_parent=/bodyset/pelvis_markerPlate translation=(0 0 0)
    WeldJoint radius_l_markerPlate_jnt: socket_parent_frame=radius_l_offset
        socket_child_frame=radius_l_markerPlate_offset
      PhysicalOffsetFrame radius_l_offset: socket_parent=/bodyset/radius_l
          translation=(-0.08094583 -0.08094583 -0.08094583)
      PhysicalOffsetFrame radius_l_markerPlate_offset: socket_parent=/bodyset/radius_l_markerPlate translation=(0 0 0)
    WeldJoint radius_r_markerPlate_jnt: socket_parent_frame=radius_r_offset
        socket_child_frame=radius_r_markerPlate_offset
      PhysicalOffsetFrame radius_r_offset: socket_parent=/bodyset/radius_r
          translation=(-0.07966835 -0.07966835 -0.07966835)
      PhysicalOffsetFrame radius_r_markerPlate_offset: socket_parent=/bodyset/radius_r_markerPlate translation=(0 0 0)
    WeldJoint tibia_l_markerPlate_jnt: socket_parent_frame=tibia_l_offset socket_child_frame=tibia_l_markerPlate_offset
      PhysicalOffsetFrame tibia_l_offset: socket_parent=/bodyset/tibia_l
          translation=(-0.0006771333 -0.1672521 -0.0449302)
      PhysicalOffsetFrame tibia_l_markerPlate_offset: socket_parent=/bodyset/tibia_l_markerPlate translation=(0 0 0)
    WeldJoint tibia_r_markerPlate_jnt: socket_parent_frame=tibia_r_offset socket_child_frame=tibia_r_markerPlate_offset
      PhysicalOffsetFrame tibia_r_offset: socket_parent=/bodyset/tibia_r
          translation=(0.005311333 -0.1651536 0.04644857)
      PhysicalOffsetFrame tibia_r_markerPlate_offset: socket_parent=/bodyset/tibia_r_markerPlate translation=(0 0 0)
    WeldJoint toes_l_markerPlate_jnt: socket_parent_frame=toes_l_offset socket_child_frame=toes_l_markerPlate_offset
      PhysicalOffsetFrame toes_l_offset: socket_parent=/bodyset/toes_l translation=(0.02819083 0.02819083 0.02819083)
      PhysicalOffsetFrame toes_l_markerPlate_offset: socket_parent=/bodyset/toes_l_markerPlate translation=(0 0 0)
    WeldJoint toes_r_markerPlate_jnt: socket_parent_frame=toes_r_offset socket_child_frame=toes_r_markerPlate_offset
      PhysicalOffsetFrame toes_r_offset: socket_parent=/bodyset/toes_r translation=(0.03546167 0.03546167 0.03546167)
      PhysicalOffsetFrame toes_r_markerPlate_offset: socket_parent=/bodyset/toes_r_markerPlate translation=(0 0 0)
    WeldJoint torso_upper_markerPlate_jnt: socket_parent_frame=torso_upper_offset
        socket_child_frame=torso_upper_markerPlate_offset
      PhysicalOffsetFrame torso_upper_offset: socket_parent=/bodyset/torso_upper
          translation=(0.008920461 0.3945002 -0.001123748)
      PhysicalOffsetFrame torso_upper_markerPlate_offset: socket_parent=/bodyset/torso_upper_markerPlate
          translation=(0 0 0)
  ConstraintSet:
    CoordinateCouplerConstraint patellofemoral_knee_angle_r_con: independent_coordinate_names=knee_angle_r
        dependent_coordinate_name=knee_angle_r_beta scale_factor=1
        coupled_coordinates_function=LinearFunction(coefficients=1 0)
    CoordinateCouplerConstraint patellofemoral_knee_angle_l_con: independent_coordinate_names=knee_angle_l
        dependent_coordinate_name=knee_angle_l_beta scale_factor=1
        coupled_coordinates_function=LinearFunction(coefficients=1 0)
  ForceSet:
    Millard2012EquilibriumMuscle [values shared by the 148 below unless stated]: fiber_damping=0.01
        default_activation=0.01 minimum_activation=0.01
      ActiveForceLengthCurve: min_norm_active_fiber_length=0.25 transition_norm_fiber_length=0.77
          max_norm_active_fiber_length=1.9 shallow_ascending_slope=0.75 minimum_value=0
      ForceVelocityCurve: concentric_slope_at_vmax=0 concentric_slope_near_vmax=0.25 isometric_slope=5
          eccentric_slope_at_vmax=0 eccentric_slope_near_vmax=0.15 max_eccentric_velocity_force_multiplier=1.4
      FiberForceLengthCurve: strain_at_zero_force=0 strain_at_one_norm_force=0.7
      TendonForceLengthCurve
    Millard2012EquilibriumMuscle addbrev_r: max_isometric_force=625.8197 optimal_fiber_length=0.1025122
        tendon_slack_length=0.03524818 pennation_angle_at_optimal=0.1147809 [radians] ignore_tendon_compliance=true
      PathPoint P1: pelvis (-0.0143 -0.1036 0.0121)
      PathPoint P2: femur_r (-0.001993339 -0.117607 0.02481707)
      PathWrap: wrap_object=AB_at_femshaft_r method=hybrid
    Millard2012EquilibriumMuscle addlong_r: max_isometric_force=916.8 optimal_fiber_length=0.1034401
        tendon_slack_length=0.1260013 pennation_angle_at_optimal=0.1377704
      PathPoint P1: pelvis (-0.0049 -0.0985 0.0156)
      PathPoint P2: femur_r (0.0112225 -0.2385728 0.01577728)
      PathWrap: wrap_object=AL_at_femshaft_r method=hybrid
    Millard2012EquilibriumMuscle addmagDist_r: max_isometric_force=597.2951 optimal_fiber_length=0.1661213
        tendon_slack_length=0.08191755 pennation_angle_at_optimal=0.194705 ignore_tendon_compliance=true
      PathPoint P1: pelvis (-0.0819 -0.1374 0.0454)
      PathPoint P2: femur_r (0.01121253 -0.2616257 0.01923572)
      PathWrap: wrap_object=AMdist_at_femshaft_r method=hybrid
    Millard2012EquilibriumMuscle addmagIsch_r: max_isometric_force=597.2951 optimal_fiber_length=0.1476148
        tendon_slack_length=0.2044522 pennation_angle_at_optimal=0.1680443
      PathPoint P1: pelvis (-0.0857 -0.1402 0.0498)
      PathPoint P2: femur_r (0.00479398 -0.3866778 -0.03262099)
      PathWrap: wrap_object=AMisch_at_condyles_r method=hybrid
    Millard2012EquilibriumMuscle addmagMid_r: max_isometric_force=597.2951 optimal_fiber_length=0.1328947
        tendon_slack_length=0.04500054 pennation_angle_at_optimal=0.2073076 ignore_tendon_compliance=true
      PathPoint P1: pelvis (-0.0633 -0.1263 0.03)
      PathPoint P2: femur_r (0.00241194 -0.1618591 0.02912268)
      PathWrap: wrap_object=AMmid_at_femshaft_r method=hybrid
    Millard2012EquilibriumMuscle addmagProx_r: max_isometric_force=597.2951 optimal_fiber_length=0.1079631
        tendon_slack_length=0.04122645 pennation_angle_at_optimal=0.3114833 ignore_tendon_compliance=true
      PathPoint P1: pelvis (-0.0307 -0.1144 0.0147)
      PathPoint P2: femur_r (-0.01521914 -0.07859735 0.03191335)
      PathWrap: wrap_object=AMprox_at_femshaft_r method=hybrid
    Millard2012EquilibriumMuscle bflh_r: max_isometric_force=1313.184 optimal_fiber_length=0.09483397
        tendon_slack_length=0.3160096 pennation_angle_at_optimal=0.1759182
      PathPoint P1: pelvis (-0.1006 -0.1288 0.067)
      PathPoint P2: tibia_r (-0.03633606 -0.03773775 0.027279)
      PathPoint P3: tibia_r (-0.03094495 -0.04905907 0.03267011)
    Millard2012EquilibriumMuscle bfsh_r: max_isometric_force=557.1148 optimal_fiber_length=0.1128203
        tendon_slack_length=0.108235 pennation_angle_at_optimal=0.2642232 ignore_tendon_compliance=true
      PathPoint P1: femur_r (0.004983347 -0.2103969 0.02332206)
      PathPoint P2: tibia_r (-0.03245446 -0.04517747 0.03428744)
      PathWrap: wrap_object=BF_at_gastroc_r method=hybrid
    Millard2012EquilibriumMuscle edl_r: max_isometric_force=603.4982 optimal_fiber_length=0.07548823
        tendon_slack_length=0.4018144 pennation_angle_at_optimal=0.2182582
      PathPoint P1: tibia_r (-0.01725154 -0.1247502 0.02210354)
      PathPoint P2: tibia_r (0.01768283 -0.4054112 0.01207608)
      PathPoint P3: calcn_r (0.1017621 0.03986328 0.0008858506)
      PathPoint P4: calcn_r (0.1789418 0.006090223 0.01439507)
      PathPoint P5: toes_r (0.000332194 0.005204372 0.01694189)
      PathPoint P6: toes_r (0.04905398 -0.0004429253 0.02768283)
    Millard2012EquilibriumMuscle ehl_r: max_isometric_force=285.8675 optimal_fiber_length=0.08158811
        tendon_slack_length=0.356452 pennation_angle_at_optimal=0.1972681
      PathPoint P1: tibia_r (-0.0150951 -0.1671243 0.02037838)
      PathPoint P2: tibia_r (0.007655371 -0.3136546 0.01768283)
      PathPoint P3: tibia_r (0.02156443 -0.3981871 -0.00301902)
      PathPoint P4: calcn_r (0.1074094 0.04307449 -0.02336431)
      PathPoint P5: calcn_r (0.1431756 0.03421598 -0.02845795)
      PathPoint P6: calcn_r (0.1920081 0.01539165 -0.03100477)
      PathPoint P7: toes_r (0.03299794 0.004539984 -0.02712918)
      PathPoint P8: toes_r (0.06234174 0.003764865 -0.02059603)
    Millard2012EquilibriumMuscle fdl_r: max_isometric_force=423.177 optimal_fiber_length=0.04872675
        tendon_slack_length=0.41382 pennation_angle_at_optimal=0.2248391
      PathPoint P1: tibia_r (-0.002479909 -0.1975301 -0.001940798)
      PathPoint P2: tibia_r (-0.01897669 -0.3930117 -0.01336994)
      PathPoint P3: calcn_r (0.04827886 0.03488037 -0.03100477)
      PathPoint P4: calcn_r (0.07839778 0.01948871 -0.02912234)
      PathPoint P5: calcn_r (0.1835925 -0.008969238 0.01284483)
      PathPoint P6: toes_r (-0.002103895 -0.008637044 0.01627751)
      PathPoint P7: toes_r (0.03155843 -0.007861924 0.02380724)
      PathPoint P8: toes_r (0.04883252 -0.00664388 0.02679698)
    Millard2012EquilibriumMuscle fhl_r: max_isometric_force=907.8393 optimal_fiber_length=0.05765401
        tendon_slack_length=0.3876491 pennation_angle_at_optimal=0.2580255
      PathPoint P1: tibia_r (-0.03342486 -0.2332193 0.02156443)
      PathPoint P2: tibia_r (-0.02609296 -0.395815 -0.008194482)
      PathPoint P3: calcn_r (0.04141352 0.03056185 -0.02668625)
      PathPoint P4: calcn_r (0.1149391 0.00752973 -0.02834722)
      PathPoint P5: calcn_r (0.1911223 -0.00586876 -0.02978673)
      PathPoint P6: toes_r (0.01716336 -0.007086805 -0.0293438)
      PathPoint P7: toes_r (0.06223101 -0.0112946 -0.02004237)
    Millard2012EquilibriumMuscle gaslat_r: max_isometric_force=1575.059 optimal_fiber_length=0.06349596
        tendon_slack_length=0.4061044 pennation_angle_at_optimal=0.2102268
      PathPoint P1: femur_r (-0.002990008 -0.3801297 0.02760774)
      PathPoint P2: calcn_r (0.004872178 0.03432671 -0.00586876)
      PathWrap shank: wrap_object=GasLat_at_shank_r method=hybrid
      PathWrap condyles: wrap_object=Gastroc_at_condyles_r method=hybrid
    Millard2012EquilibriumMuscle gasmed_r: max_isometric_force=3115.515 optimal_fiber_length=0.05464916
        tendon_slack_length=0.4272454 pennation_angle_at_optimal=0.1656816
      PathPoint P1: femur_r (0.007973355 -0.3775384 -0.02073072)
      PathPoint P2: calcn_r (0.004872178 0.03432671 -0.00586876)
      PathWrap shank: wrap_object=GasMed_at_shank_r method=hybrid
      PathWrap condyles: wrap_object=Gastroc_at_condyles_r method=hybrid
    Millard2012EquilibriumMuscle gem_r: max_isometric_force=170.4 optimal_fiber_length=0.02729019
        tendon_slack_length=0.04434656 pennation_angle_at_optimal=0 ignore_tendon_compliance=true
      PathPoint P1: pelvis (-0.1066 -0.0874 0.0673)
      PathPoint P2: femur_r (-0.01415271 -0.003289009 0.04415245)
    Millard2012EquilibriumMuscle glmax1_r: max_isometric_force=983.7836 optimal_fiber_length=0.1417671
        tendon_slack_length=0.04710225 pennation_angle_at_optimal=0.3540118 ignore_tendon_compliance=true
      PathPoint P1: pelvis (-0.137 0.0294 0.0595)
      PathPoint P2: pelvis (-0.1253066 -0.0221672 0.08832536)
      PathPoint P3: femur_r (-0.04425212 -0.03249142 0.03009942)
      PathPoint P4: femur_r (-0.02760774 -0.05641149 0.04684346)
      PathWrap: wrap_object=Gmax1_at_pelvis_r method=hybrid
    Millard2012EquilibriumMuscle glmax2_r: max_isometric_force=1406.046 optimal_fiber_length=0.1573653
        tendon_slack_length=0.06804513 pennation_angle_at_optimal=0.3673821 ignore_tendon_compliance=true
      PathPoint P1: pelvis (-0.1405 0.0085 0.0444)
      PathPoint P2: pelvis (-0.1339793 -0.0557844 0.09218038)
      PathPoint P3: femur_r (-0.04485012 -0.05820549 0.02511607)
      PathPoint P4: femur_r (-0.01554804 -0.1012616 0.04176045)
      PathWrap: wrap_object=Gmax2_at_pelvis_r method=hybrid
    Millard2012EquilibriumMuscle glmax3_r: max_isometric_force=947.7541 optimal_fiber_length=0.1679944
        tendon_slack_length=0.07013173 pennation_angle_at_optimal=0.3824161 ignore_tendon_compliance=true
      PathPoint P1: pelvis (-0.1295931 -0.04809 0.01020447)
      PathPoint P2: pelvis (-0.1269016 -0.1156908 0.0493216)
      PathPoint P3: femur_r (-0.02800641 -0.1121253 0.009368692)
      PathPoint P4: femur_r (-0.005980016 -0.1414274 0.04096311)
      PathWrap: wrap_object=Gmax3_at_pelvis_r method=hybrid
    Millard2012EquilibriumMuscle glmed1_r: max_isometric_force=1093.467 optimal_fiber_length=0.07410332
        tendon_slack_length=0.05666044 pennation_angle_at_optimal=0.3165559 ignore_tendon_compliance=true
      PathPoint P1: pelvis (-0.0542 0.0333 0.1155)
      PathPoint P2: femur_r (-0.02172739 -0.01166103 0.05531515)
    Millard2012EquilibriumMuscle glmed2_r: max_isometric_force=765.0917 optimal_fiber_length=0.07528416
        tendon_slack_length=0.06729044 pennation_angle_at_optimal=0.3165559 ignore_tendon_compliance=true
      PathPoint P1: pelvis (-0.0907 0.0426 0.0777)
      PathPoint P2: femur_r (-0.02571407 -0.005780683 0.05252448)
    Millard2012EquilibriumMuscle glmed3_r: max_isometric_force=871.1993 optimal_fiber_length=0.07976811
        tendon_slack_length=0.04942655 pennation_angle_at_optimal=0.3165559 ignore_tendon_compliance=true
      PathPoint P1: pelvis (-0.1324 -0.0035 0.0533)
      PathPoint P2: femur_r (-0.03079708 -0.004684346 0.05162748)
    Millard2012EquilibriumMuscle glmin1_r: max_isometric_force=374.0459 optimal_fiber_length=0.071402
        tendon_slack_length=0.01694515 pennation_angle_at_optimal=0.1745329 ignore_tendon_compliance=true
      PathPoint P1: pelvis (-0.0478 -0.0072 0.1058)
      PathPoint P2: femur_r (-0.00717602 -0.01036536 0.05581349)
    Millard2012EquilibriumMuscle glmin2_r: max_isometric_force=394.8197 optimal_fiber_length=0.05937648
        tendon_slack_length=0.02767267 pennation_angle_at_optimal=0 ignore_tendon_compliance=true
      PathPoint P1: pelvis (-0.0658 -0.0098 0.0933)
      PathPoint P2: femur_r (-0.009568026 -0.01036536 0.05581349)
    Millard2012EquilibriumMuscle glmin3_r: max_isometric_force=446.7738 optimal_fiber_length=0.04090963
        tendon_slack_length=0.05476777 pennation_angle_at_optimal=0.01745329
      PathPoint P1: pelvis (-0.0874 -0.0109 0.0787)
      PathPoint P2: femur_r (-0.01345504 -0.008272356 0.05481682)
    Millard2012EquilibriumMuscle grac_r: max_isometric_force=281.3115 optimal_fiber_length=0.2235067
        tendon_slack_length=0.1687719 pennation_angle_at_optimal=0.1720016 ignore_tendon_compliance=true
      PathPoint P1: pelvis (-0.0477 -0.1332 0.0202)
      PathPoint P2: tibia_r (-0.01986084 -0.05126942 -0.03192613)
      PathPoint P3: tibia_r (0.001919234 -0.07506577 -0.01696042)
      PathWrap: wrap_object=GR_at_condyles_r method=hybrid
    Millard2012EquilibriumMuscle iliacus_r: max_isometric_force=1021.141 optimal_fiber_length=0.1043532
        tendon_slack_length=0.09409482 pennation_angle_at_optimal=0.279914 ignore_tendon_compliance=true
      PathPoint P1: pelvis (-0.0608 0.0324 0.1011)
      PathPoint P2: pelvis (-0.01345775 -0.0510212 0.08571755)
      PathPoint P3: femur_r (-0.00229234 -0.05631182 0.0138537)
      PathPoint P4: femur_r (-0.01215937 -0.06348784 0.01953472)
      PathWrap: wrap_object=IL_at_brim_r method=hybrid range=(2 3)
    Millard2012EquilibriumMuscle pect_r: max_isometric_force=319.6 optimal_fiber_length=0.09847959
        tendon_slack_length=0.03249827 pennation_angle_at_optimal=0 ignore_tendon_compliance=true
      PathPoint P1: pelvis (-0.024 -0.0799 0.0527)
      PathPoint P2: femur_r (-0.01275737 -0.08159732 0.02539514)
      PathWrap: wrap_object=PECT_at_femshaft_r method=hybrid
    Millard2012EquilibriumMuscle perbrev_r: max_isometric_force=521.2016 optimal_fiber_length=0.0492244
        tendon_slack_length=0.1599549 pennation_angle_at_optimal=0.2052361
      PathPoint P1: tibia_r (-0.02620078 -0.2730056 0.02706335)
      PathPoint P2: tibia_r (-0.0365517 -0.4197516 0.02684771)
      PathPoint P3: tibia_r (-0.03072931 -0.4317198 0.02749464)
      PathPoint P4: calcn_r (0.05215446 0.02989746 0.0258004)
      PathPoint P5: calcn_r (0.07496511 0.02425016 0.03798085)
    Millard2012EquilibriumMuscle perlong_r: max_isometric_force=1115.371 optimal_fiber_length=0.05523058
        tendon_slack_length=0.3611958 pennation_angle_at_optimal=0.2479525
      PathPoint P1: tibia_r (-0.02156443 -0.1480398 0.03040584)
      PathPoint P2: tibia_r (-0.03417962 -0.4205063 0.02555384)
      PathPoint P3: tibia_r (-0.02932762 -0.432798 0.02587731)
      PathPoint P4: calcn_r (0.04850032 0.02546821 0.02447162)
      PathPoint P5: calcn_r (0.07540803 0.01173752 0.0314477)
      PathPoint P6: calcn_r (0.09434309 0.007640462 0.0130663)
      PathPoint P7: calcn_r (0.1332098 0.009412163 -0.02037456)
    Millard2012EquilibriumMuscle piri_r: max_isometric_force=1029.787 optimal_fiber_length=0.02675456
        tendon_slack_length=0.118241 pennation_angle_at_optimal=0.1745329
      PathPoint P1: pelvis (-0.1014913 -0.00598148 0.01531804)
      PathPoint P2: pelvis (-0.1017007 -0.02808456 0.06907292)
      PathPoint P3: femur_r (-0.01475071 -0.00358801 0.04355445)
    Millard2012EquilibriumMuscle Ps_L1_TP_r: max_isometric_force=492.9124 optimal_fiber_length=0.1903289
        tendon_slack_length=0.1620696 pennation_angle_at_optimal=0.2155251 ignore_tendon_compliance=true
      PathPoint P1: torso_lower (-0.02372416 0.1205375 0.01779857)
      PathPoint P2: pelvis (-0.02043584 -0.0599064 0.07437925)
      PathPoint P3: femur_r (-0.01315604 -0.04654446 0.004584679)
      PathPoint P4: femur_r (-0.02342173 -0.05222548 0.008770691)
      PathWrap: wrap_object=PS_at_brim_r method=hybrid range=(2 3)
    Millard2012EquilibriumMuscle Ps_L3_L4_IVD_r: max_isometric_force=541.0976 optimal_fiber_length=0.1526396
        tendon_slack_length=0.1299763 pennation_angle_at_optimal=0.2155251 ignore_tendon_compliance=true
      PathPoint P1: torso_lower (0.01818323 0.05624666 0.02178055)
      PathPoint P2: pelvis (-0.02043584 -0.0599064 0.07437925)
      PathPoint P3: femur_r (-0.01315604 -0.04654446 0.004584679)
      PathPoint P4: femur_r (-0.02342173 -0.05222548 0.008770691)
      PathWrap: wrap_object=PS_at_brim_r method=hybrid range=(2 3)
    Millard2012EquilibriumMuscle Ps_L5_TP_r: max_isometric_force=394.071 optimal_fiber_length=0.1394462
        tendon_slack_length=0.1187418 pennation_angle_at_optimal=0.2155251 ignore_tendon_compliance=true
      PathPoint P1: torso_lower (-0.001587093 0.01839879 0.02050826)
      PathPoint P2: pelvis (-0.02043584 -0.0599064 0.07437925)
      PathPoint P3: femur_r (-0.01315604 -0.04654446 0.004584679)
      PathPoint P4: femur_r (-0.02342173 -0.05222548 0.008770691)
      PathWrap: wrap_object=PS_at_brim_r method=hybrid range=(2 3)
    Millard2012EquilibriumMuscle quadfem_r: max_isometric_force=397 optimal_fiber_length=0.05492179
        tendon_slack_length=0.02440969 pennation_angle_at_optimal=0 ignore_tendon_compliance=true
      PathPoint P1: pelvis (-0.1118 -0.12 0.0616)
      PathPoint P2: femur_r (-0.0379731 -0.03578043 0.0364781)
    Millard2012EquilibriumMuscle recfem_r: max_isometric_force=2191.741 optimal_fiber_length=0.07512309
        tendon_slack_length=0.4439028 pennation_angle_at_optimal=0.2170149
      PathPoint P1: pelvis (-0.0144 -0.0395 0.0988)
      PathPoint P2: patella_r (0.01 0.049 0.0007)
      PathPoint P3: patella_r (0.0121 0.0437 -0.001)
      PathPoint P4: patella_r (0.005 0.00247 3e-5)
      PathPoint P5: tibia_r (0.03515001 -0.06805733 -0.000506764)
      PathWrap: wrap_object=KnExt_at_fem_r method=hybrid
    Millard2012EquilibriumMuscle sart_r: max_isometric_force=249.4131 optimal_fiber_length=0.3959532
        tendon_slack_length=0.1218316 pennation_angle_at_optimal=0.02613542 ignore_tendon_compliance=true
      PathPoint P1: pelvis (-0.014 -0.022 0.1049)
      PathPoint P2: femur_r (-0.002990008 -0.3556116 -0.04195978)
      PathPoint P3: tibia_r (-0.02706335 -0.04323667 -0.03935508)
      PathPoint P4: tibia_r (-0.01714372 -0.06458546 -0.02846504)
      PathPoint P5: tibia_r (0.01466381 -0.08733593 -0.002803375)
    Millard2012EquilibriumMuscle semimem_r: max_isometric_force=2200.987 optimal_fiber_length=0.06590705
        tendon_slack_length=0.3320053 pennation_angle_at_optimal=0.2545615
      PathPoint P1: pelvis (-0.0981 -0.1256 0.0688)
      PathPoint P2: tibia_r (-0.03126842 -0.04496183 -0.02113314)
      PathWrap: wrap_object=SM_at_condyles_r method=hybrid
    Millard2012EquilibriumMuscle semiten_r: max_isometric_force=591.2951 optimal_fiber_length=0.1884224
        tendon_slack_length=0.2413359 pennation_angle_at_optimal=0.241295
      PathPoint P1: pelvis (-0.1015 -0.133 0.064)
      PathPoint P2: tibia_r (-0.0336405 -0.05477364 -0.02469127)
      PathPoint P3: tibia_r (0.00204862 -0.08334651 -0.01261519)
      PathWrap: wrap_object=ST_at_condyles_r method=hybrid
    Millard2012EquilibriumMuscle soleus_r: max_isometric_force=6194.843 optimal_fiber_length=0.04751024
        tendon_slack_length=0.2988349 pennation_angle_at_optimal=0.3814289
      PathPoint P1: tibia_r (-0.008194482 -0.09876507 0.01056657)
      PathPoint P2: calcn_r (0.004872178 0.03432671 -0.00586876)
    Millard2012EquilibriumMuscle tfl_r: max_isometric_force=411.2066 optimal_fiber_length=0.09551329
        tendon_slack_length=0.4519257 pennation_angle_at_optimal=0.05235988
      PathPoint P1: pelvis (-0.0377 0.0251 0.1258)
      PathPoint P2: femur_r (0.02930208 -0.09916861 0.05950116)
      PathPoint P3: femur_r (0.01066436 -0.4036511 0.03229209)
      PathPoint P4: tibia_r (0.01164479 -0.04420707 0.03730646)
    Millard2012EquilibriumMuscle tibant_r: max_isometric_force=1227.452 optimal_fiber_length=0.07402181
        tendon_slack_length=0.2606056 pennation_angle_at_optimal=0.1951828
      PathPoint P1: tibia_r (0.01660461 -0.1414626 0.01746719)
      PathPoint P2: tibia_r (0.02706335 -0.205509 0.01380123)
      PathPoint P3: tibia_r (0.02512256 -0.3945212 -0.01423252)
      PathPoint P4: calcn_r (0.1291127 0.01971018 -0.03377306)
    Millard2012EquilibriumMuscle tibpost_r: max_isometric_force=1730.154 optimal_fiber_length=0.04092828
        tendon_slack_length=0.3040166 pennation_angle_at_optimal=0.2264891
      PathPoint P1: tibia_r (-0.004420707 -0.1406001 0.01110568)
      PathPoint P2: tibia_r (-0.01768283 -0.3940899 -0.01886887)
      PathPoint P3: calcn_r (0.04617496 0.03698426 -0.03166916)
      PathPoint P4: calcn_r (0.08548459 0.01760628 -0.0311155)
    Millard2012EquilibriumMuscle vasint_r: max_isometric_force=1697.361 optimal_fiber_length=0.100417
        tendon_slack_length=0.2044853 pennation_angle_at_optimal=0.06309973
      PathPoint P1: femur_r (0.02890341 -0.1917592 0.03089675)
      PathPoint P2: femur_r (0.03338843 -0.2077059 0.02840508)
      PathPoint P3: patella_r (0.0058 0.048 -0.0006)
      PathPoint P4: patella_r (0.005 0.00247 -0.00039)
      PathPoint P5: tibia_r (0.03511767 -0.06814359 0.0004636352)
      PathWrap: wrap_object=KnExt_at_fem_r method=hybrid
    Millard2012EquilibriumMuscle vaslat_r: max_isometric_force=5148.767 optimal_fiber_length=0.1006799
        tendon_slack_length=0.2234417 pennation_angle_at_optimal=0.2528673
      PathPoint P1: femur_r (0.004784013 -0.1847825 0.03478376)
      PathPoint P2: femur_r (0.02681041 -0.258237 0.04076378)
      PathPoint P3: patella_r (0.0103 0.0423 0.0141)
      PathPoint P4: patella_r (0.005 0.00247 0.00733)
      PathPoint P5: tibia_r (0.03508532 -0.06833767 0.005509711)
      PathWrap: wrap_object=KnExt_at_fem_r method=hybrid
    Millard2012EquilibriumMuscle vasmed_r: max_isometric_force=2747.823 optimal_fiber_length=0.09771378
        tendon_slack_length=0.2017913 pennation_angle_at_optimal=0.4222225
      PathPoint P1: femur_r (0.01395337 -0.2092009 0.01873738)
      PathPoint P2: femur_r (0.03548143 -0.2759778 0.0008970025)
      PathPoint P3: patella_r (0.0063 0.0445 -0.017)
      PathPoint P4: patella_r (0.005 0.00247 -0.0085)
      PathPoint P5: tibia_r (0.03439526 -0.06854253 -0.00731034)
      PathWrap: wrap_object=KnExt_at_fem_r method=hybrid
    Millard2012EquilibriumMuscle IO2_r: max_isometric_force=525.0137 optimal_fiber_length=0.1193633
        tendon_slack_length=0.01326259 pennation_angle_at_optimal=0 ignore_tendon_compliance=true
      PathPoint P1: torso_lower (0.1125035 0.0551743 0.06535705)
      PathPoint P2: pelvis (-0.02272864 0.0330676 0.1490986)
    Millard2012EquilibriumMuscle IO4_r: max_isometric_force=232.964 optimal_fiber_length=0.1285075
        tendon_slack_length=0.01427861 pennation_angle_at_optimal=0 ignore_tendon_compliance=true
      PathPoint P1: torso_upper (0.07998698 0.1246213 0.133506)
      PathPoint P2: pelvis (-0.05153818 0.059998 0.1290299)
    Millard2012EquilibriumMuscle IO5_r: max_isometric_force=390.7954 optimal_fiber_length=0.1010003
        tendon_slack_length=0.01122226 pennation_angle_at_optimal=0 ignore_tendon_compliance=true
      PathPoint P1: torso_lower (0.05954754 0.1037465 0.1270217)
      PathPoint P2: pelvis (-0.07156928 0.07255544 0.1058997)
    Millard2012EquilibriumMuscle EO10_r: max_isometric_force=171.5304 optimal_fiber_length=0.1371556
        tendon_slack_length=0.01523951 pennation_angle_at_optimal=0 ignore_tendon_compliance=true
      PathPoint P1: pelvis (-0.03106227 0.03967013 0.1439522)
      PathPoint P2: torso_lower (0.03284611 0.1124575 0.1315152)
    Millard2012EquilibriumMuscle EO12_r: max_isometric_force=290.233 optimal_fiber_length=0.1240352
        tendon_slack_length=0.01378169 pennation_angle_at_optimal=0 ignore_tendon_compliance=true
      PathPoint P1: pelvis (-0.07832707 0.07359968 0.0921475)
      PathPoint P2: torso_lower (-0.04468858 0.118837 0.07932224)
    Millard2012EquilibriumMuscle IL_L2_r: max_isometric_force=467.111 optimal_fiber_length=0.04548224
        tendon_slack_length=0.1031155 pennation_angle_at_optimal=0.24086 ignore_tendon_compliance=true
      PathPoint P1: pelvis (-0.1345356 0.02672888 0.04083942)
      PathPoint P2: torso_lower (-0.03650253 0.08839206 0.04126756)
    Millard2012EquilibriumMuscle IL_L4_r: max_isometric_force=504.7594 optimal_fiber_length=0.02529121
        tendon_slack_length=0.05733924 pennation_angle_at_optimal=0.24086 ignore_tendon_compliance=true
      PathPoint P1: pelvis (-0.1112278 0.04603541 0.04685099)
      PathPoint P2: torso_lower (-0.01982531 0.04326269 0.04857225)
    Millard2012EquilibriumMuscle IL_R7_r: max_isometric_force=390.8106 optimal_fiber_length=0.1696328
        tendon_slack_length=0.1782221 pennation_angle_at_optimal=0.24086 ignore_tendon_compliance=true
      PathPoint P1: pelvis (-0.1129952 0.046945 0.04790432)
      PathPoint P2: torso_lower (-0.06256402 0.07733834 0.06368123)
      PathPoint P3: torso_lower (-0.1240108 0.1952321 0.09049438)
      PathPoint P4: torso_upper (-0.1262452 0.2178678 0.0994321)
      PathPoint P5: torso_upper (-0.1284797 0.2423897 0.0994321)
      PathPoint P6: torso_upper (-0.1262452 0.2640821 0.1005493)
    Millard2012EquilibriumMuscle IL_R10_r: max_isometric_force=197.2005 optimal_fiber_length=0.1678005
        tendon_slack_length=0.09878743 pennation_angle_at_optimal=0.24086 ignore_tendon_compliance=true
      PathPoint P1: pelvis (-0.09535062 0.06725272 0.06501381)
      PathPoint P2: torso_lower (-0.06256402 0.07828149 0.07150173)
      PathPoint P3: torso_lower (-0.1240108 0.1895732 0.1016665)
    Millard2012EquilibriumMuscle IL_R11_r: max_isometric_force=235.1806 optimal_fiber_length=0.1528493
        tendon_slack_length=0.0765087 pennation_angle_at_optimal=0.24086 ignore_tendon_compliance=true
      PathPoint P1: pelvis (-0.08883109 0.07215332 0.07265583)
      PathPoint P2: torso_lower (-0.0614468 0.07828149 0.07485338)
      PathPoint P3: torso_lower (-0.1027837 0.1603356 0.0916116)
    Millard2012EquilibriumMuscle IL_R12_r: max_isometric_force=206.1732 optimal_fiber_length=0.125414
        tendon_slack_length=0.06277595 pennation_angle_at_optimal=0.24086 ignore_tendon_compliance=true
      PathPoint P1: pelvis (-0.08193275 0.0739212 0.08292833)
      PathPoint P2: torso_lower (-0.07820502 0.1320411 0.08155667)
    Millard2012EquilibriumMuscle LTpT_T8_r: max_isometric_force=343.9392 optimal_fiber_length=0.1273728
        tendon_slack_length=0.2011549 pennation_angle_at_optimal=0.21991 ignore_tendon_compliance=true
      PathPoint P1: pelvis (-0.1264031 0.0283044 0)
      PathPoint P2: torso_lower (-0.04468858 0.05658903 0.02234429)
      PathPoint P3: torso_lower (-0.05586073 0.07639519 0.02346151)
      PathPoint P4: torso_lower (-0.06368123 0.09431504 0.02346151)
      PathPoint P5: torso_upper (-0.1173075 0.2414465 0.05921237)
    Millard2012EquilibriumMuscle LTpT_T12_r: max_isometric_force=320.7467 optimal_fiber_length=0.09389521
        tendon_slack_length=0.15914 pennation_angle_at_optimal=0.21991 ignore_tendon_compliance=true
      PathPoint P1: pelvis (-0.1393624 0.00671428 0.02354965)
      PathPoint P2: torso_lower (-0.04468858 0.05564588 0.04357137)
      PathPoint P3: torso_lower (-0.05921237 0.07733834 0.04021973)
      PathPoint P4: torso_lower (-0.06368123 0.09525819 0.03575087)
      PathPoint P5: torso_lower (-0.07485338 0.1593924 0.03351644)
    Millard2012EquilibriumMuscle LTpT_R8_r: max_isometric_force=321.2085 optimal_fiber_length=0.1114181
        tendon_slack_length=0.227259 pennation_angle_at_optimal=0.21991 ignore_tendon_compliance=true
      PathPoint P1: pelvis (-0.1264031 0.0283044 0)
      PathPoint P2: torso_lower (-0.04468858 0.05753218 0.02904758)
      PathPoint P3: torso_lower (-0.05586073 0.07639519 0.03239922)
      PathPoint P4: torso_lower (-0.06256402 0.09525819 0.03351644)
      PathPoint P5: torso_lower (-0.1173075 0.200891 0.07708781)
      PathPoint P6: torso_upper (-0.1206592 0.2225835 0.08490831)
      PathPoint P7: torso_upper (-0.1228936 0.2452191 0.08825995)
    Millard2012EquilibriumMuscle LTpT_R11_r: max_isometric_force=320.9303 optimal_fiber_length=0.1149383
        tendon_slack_length=0.1637409 pennation_angle_at_optimal=0.21991 ignore_tendon_compliance=true
      PathPoint P1: pelvis (-0.1393624 0.00671428 0.02354965)
      PathPoint P2: torso_lower (-0.04357137 0.05658903 0.04915744)
      PathPoint P3: torso_lower (-0.05586073 0.07733834 0.05027466)
      PathPoint P4: torso_lower (-0.06256402 0.09525819 0.05027466)
      PathPoint P5: torso_lower (-0.1016665 0.1650513 0.08267388)
    Millard2012EquilibriumMuscle LTpL_L2_r: max_isometric_force=326.7141 optimal_fiber_length=0.08103616
        tendon_slack_length=0.08915438 pennation_angle_at_optimal=0.21991 ignore_tendon_compliance=true
      PathPoint P1: pelvis (-0.1369271 0.01475676 0.04281796)
      PathPoint P2: torso_lower (-0.03530018 0.08919723 0.03205121)
    Millard2012EquilibriumMuscle LTpL_L4_r: max_isometric_force=151.8409 optimal_fiber_length=0.0548221
        tendon_slack_length=0.0591218 pennation_angle_at_optimal=0.21991 ignore_tendon_compliance=true
      PathPoint P1: pelvis (-0.1295931 0.01899143 0.03743)
      PathPoint P2: torso_lower (-0.01738431 0.04090076 0.03850871)
    Millard2012EquilibriumMuscle LTpL_L5_r: max_isometric_force=157.7955 optimal_fiber_length=0.07239674
        tendon_slack_length=0.001438408 pennation_angle_at_optimal=0.21991 ignore_tendon_compliance=true
      PathPoint P1: pelvis (-0.1214188 0.0546852 0.03968405)
      PathPoint P2: torso_lower (-0.03351644 0.01980616 0.04021973)
    Millard2012EquilibriumMuscle MF_m1t_3_r: max_isometric_force=199.3089 optimal_fiber_length=0.1206443
        tendon_slack_length=0.03617557 pennation_angle_at_optimal=0 ignore_tendon_compliance=true
      PathPoint P1: torso_lower (-0.05586073 0.08959929 0.01340658)
      PathPoint P2: pelvis (-0.1254062 0.0403956 0.04648703)
    Millard2012EquilibriumMuscle MF_m2t_3_r: max_isometric_force=237.3376 optimal_fiber_length=0.1145409
        tendon_slack_length=0.03487038 pennation_angle_at_optimal=0 ignore_tendon_compliance=true
      PathPoint P1: torso_lower (-0.0458058 0.06036163 0.01228936)
      PathPoint P2: pelvis (-0.1300915 0.0154804 0.03707624)
    Millard2012EquilibriumMuscle MF_m3s_r: max_isometric_force=303.8877 optimal_fiber_length=0.04864353
        tendon_slack_length=0.02022512 pennation_angle_at_optimal=0 ignore_tendon_compliance=true
      PathPoint P1: torso_lower (-0.03910251 0.04244177 0.01228936)
      PathPoint P2: pelvis (-0.1206213 0.061372 0.01927511)
    Millard2012EquilibriumMuscle MF_m4t_3_r: max_isometric_force=406.7536 optimal_fiber_length=0.1001091
        tendon_slack_length=0.04051909 pennation_angle_at_optimal=0 ignore_tendon_compliance=true
      PathPoint P1: torso_lower (-0.05139187 0.02263561 0.01340658)
      PathPoint P2: pelvis (-0.1414559 -0.017862 0.01428626)
    Millard2012EquilibriumMuscle MF_m5_laminar_r: max_isometric_force=314.5229 optimal_fiber_length=0.04114116
        tendon_slack_length=0.01562384 pennation_angle_at_optimal=0 ignore_tendon_compliance=true
      PathPoint P1: torso_lower (-0.02904758 0.008488354 0.006703288)
      PathPoint P2: pelvis (-0.1317862 0.0356324 0.01836805)
    Millard2012EquilibriumMuscle QL_post_I1_L3_r: max_isometric_force=86.27122 optimal_fiber_length=0.04878564
        tendon_slack_length=0.040992 pennation_angle_at_optimal=0.12915 ignore_tendon_compliance=true
      PathPoint P1: pelvis (-0.1014694 0.06126941 0.05634001)
      PathPoint P2: torso_lower (-0.01694312 0.06408736 0.03421794)
    Millard2012EquilibriumMuscle QL_post_I2_L4_r: max_isometric_force=211.2949 optimal_fiber_length=0.04053446
        tendon_slack_length=0.03405898 pennation_angle_at_optimal=0.12915 ignore_tendon_compliance=true
      PathPoint P1: pelvis (-0.08508884 0.0726159 0.07626594)
      PathPoint P2: torso_lower (-0.01200458 0.04373502 0.03367095)
    Millard2012EquilibriumMuscle QL_post_I3_L2_r: max_isometric_force=261.4557 optimal_fiber_length=0.06679012
        tendon_slack_length=0.05612022 pennation_angle_at_optimal=0.12915 ignore_tendon_compliance=true
      PathPoint P1: pelvis (-0.07877865 0.07400181 0.08539327)
      PathPoint P2: torso_lower (-0.02313238 0.08858286 0.03368637)
    Millard2012EquilibriumMuscle QL_ant_I2_T12_r: max_isometric_force=137.9627 optimal_fiber_length=0.1108779
        tendon_slack_length=0.05757431 pennation_angle_at_optimal=0.12915 ignore_tendon_compliance=true
      PathPoint P1: pelvis (-0.08508884 0.0726159 0.07626594)
      PathPoint P2: torso_lower (-0.01628094 0.1347828 0.02063585)
    Millard2012EquilibriumMuscle QL_ant_I3_R12_I2_r: max_isometric_force=155.742 optimal_fiber_length=0.1197795
        tendon_slack_length=0.06219653 pennation_angle_at_optimal=0.12915 ignore_tendon_compliance=true
      PathPoint P1: pelvis (-0.07877865 0.07400181 0.08539327)
      PathPoint P2: torso_lower (-0.05855545 0.1375491 0.05228564)
    Millard2012EquilibriumMuscle rect_abd_r: max_isometric_force=662.2123 optimal_fiber_length=0.3138427
        tendon_slack_length=0.08533949 pennation_angle_at_optimal=0 ignore_tendon_compliance=true
      PathPoint P1: pelvis (-0.001196244 -0.072135 0.01571488)
      PathPoint P2: torso_lower (0.1358533 0.02829451 0.06334607)
      PathPoint P3: torso_lower (0.1403222 0.1037465 0.06625083)
      PathPoint P4: torso_upper (0.08811472 0.2423897 0.06786531)
    Millard2012EquilibriumMuscle addbrev_l: max_isometric_force=625.8197 optimal_fiber_length=0.1025122
        tendon_slack_length=0.03524818 pennation_angle_at_optimal=0.1147809 ignore_tendon_compliance=true
      PathPoint P1: pelvis (-0.0143 -0.1036 -0.0121)
      PathPoint P2: femur_l (-0.001993339 -0.117607 -0.02481707)
      PathWrap: wrap_object=AB_at_femshaft_l method=hybrid
    Millard2012EquilibriumMuscle addlong_l: max_isometric_force=916.8 optimal_fiber_length=0.1034401
        tendon_slack_length=0.1260013 pennation_angle_at_optimal=0.1377704
      PathPoint P1: pelvis (-0.0049 -0.0985 -0.0156)
      PathPoint P2: femur_l (0.0112225 -0.2385728 -0.01577728)
      PathWrap: wrap_object=AL_at_femshaft_l method=hybrid
    Millard2012EquilibriumMuscle addmagDist_l: max_isometric_force=597.2951 optimal_fiber_length=0.1661213
        tendon_slack_length=0.08191755 pennation_angle_at_optimal=0.194705 ignore_tendon_compliance=true
      PathPoint P1: pelvis (-0.0819 -0.1374 -0.0454)
      PathPoint P2: femur_l (0.01121253 -0.2616257 -0.01923572)
      PathWrap: wrap_object=AMdist_at_femshaft_l method=hybrid
    Millard2012EquilibriumMuscle addmagIsch_l: max_isometric_force=597.2951 optimal_fiber_length=0.1476148
        tendon_slack_length=0.2044522 pennation_angle_at_optimal=0.1680443
      PathPoint P1: pelvis (-0.0857 -0.1402 -0.0498)
      PathPoint P2: femur_l (0.00479398 -0.3866778 0.03262099)
      PathWrap: wrap_object=AMisch_at_condyles_l method=hybrid
    Millard2012EquilibriumMuscle addmagMid_l: max_isometric_force=597.2951 optimal_fiber_length=0.1328947
        tendon_slack_length=0.04500054 pennation_angle_at_optimal=0.2073076 ignore_tendon_compliance=true
      PathPoint P1: pelvis (-0.0633 -0.1263 -0.03)
      PathPoint P2: femur_l (0.00241194 -0.1618591 -0.02912268)
      PathWrap: wrap_object=AMmid_at_femshaft_l method=hybrid
    Millard2012EquilibriumMuscle addmagProx_l: max_isometric_force=597.2951 optimal_fiber_length=0.1079631
        tendon_slack_length=0.04122645 pennation_angle_at_optimal=0.3114833 ignore_tendon_compliance=true
      PathPoint P1: pelvis (-0.0307 -0.1144 -0.0147)
      PathPoint P2: femur_l (-0.01521914 -0.07859735 -0.03191335)
      PathWrap: wrap_object=AMprox_at_femshaft_l method=hybrid
    Millard2012EquilibriumMuscle bflh_l: max_isometric_force=1313.184 optimal_fiber_length=0.09483397
        tendon_slack_length=0.3160096 pennation_angle_at_optimal=0.1759182
      PathPoint P1: pelvis (-0.1006 -0.1288 -0.067)
      PathPoint P2: tibia_l (-0.03633606 -0.03773775 -0.027279)
      PathPoint P3: tibia_l (-0.03094495 -0.04905907 -0.03267011)
    Millard2012EquilibriumMuscle bfsh_l: max_isometric_force=557.1148 optimal_fiber_length=0.1128203
        tendon_slack_length=0.108235 pennation_angle_at_optimal=0.2642232 ignore_tendon_compliance=true
      PathPoint P1: femur_l (0.004983347 -0.2103969 -0.02332206)
      PathPoint P2: tibia_l (-0.03245446 -0.04517747 -0.03428744)
      PathWrap: wrap_object=BF_at_gastroc_l method=hybrid
    Millard2012EquilibriumMuscle edl_l: max_isometric_force=603.4982 optimal_fiber_length=0.07548823
        tendon_slack_length=0.4018144 pennation_angle_at_optimal=0.2182582
      PathPoint P1: tibia_l (-0.01725154 -0.1247502 -0.02210354)
      PathPoint P2: tibia_l (0.01768283 -0.4054112 -0.01207608)
      PathPoint P3: calcn_l (0.1017621 0.03986328 -0.0008858506)
      PathPoint P4: calcn_l (0.1789418 0.006090223 -0.01439507)
      PathPoint P5: toes_l (0.000332194 0.005204372 -0.01694189)
      PathPoint P6: toes_l (0.04905398 -0.0004429253 -0.02768283)
    Millard2012EquilibriumMuscle ehl_l: max_isometric_force=285.8675 optimal_fiber_length=0.08158811
        tendon_slack_length=0.356452 pennation_angle_at_optimal=0.1972681
      PathPoint P1: tibia_l (-0.0150951 -0.1671243 -0.02037838)
      PathPoint P2: tibia_l (0.007655371 -0.3136546 -0.01768283)
      PathPoint P3: tibia_l (0.02156443 -0.3981871 0.00301902)
      PathPoint P4: calcn_l (0.1074094 0.04307449 0.02336431)
      PathPoint P5: calcn_l (0.1431756 0.03421598 0.02845795)
      PathPoint P6: calcn_l (0.1920081 0.01539165 0.03100477)
      PathPoint P7: toes_l (0.03299794 0.004539984 0.02712918)
      PathPoint P8: toes_l (0.06234174 0.003764865 0.02059603)
    Millard2012EquilibriumMuscle fdl_l: max_isometric_force=423.177 optimal_fiber_length=0.04872675
        tendon_slack_length=0.41382 pennation_angle_at_optimal=0.2248391
      PathPoint P1: tibia_l (-0.002479909 -0.1975301 0.001940798)
      PathPoint P2: tibia_l (-0.01897669 -0.3930117 0.01336994)
      PathPoint P3: calcn_l (0.04827886 0.03488037 0.03100477)
      PathPoint P4: calcn_l (0.07839778 0.01948871 0.02912234)
      PathPoint P5: calcn_l (0.1835925 -0.008969238 -0.01284483)
      PathPoint P6: toes_l (-0.002103895 -0.008637044 -0.01627751)
      PathPoint P7: toes_l (0.03155843 -0.007861924 -0.02380724)
      PathPoint P8: toes_l (0.04883252 -0.00664388 -0.02679698)
    Millard2012EquilibriumMuscle fhl_l: max_isometric_force=907.8393 optimal_fiber_length=0.05765401
        tendon_slack_length=0.3876491 pennation_angle_at_optimal=0.2580255
      PathPoint P1: tibia_l (-0.03342486 -0.2332193 -0.02156443)
      PathPoint P2: tibia_l (-0.02609296 -0.395815 0.008194482)
      PathPoint P3: calcn_l (0.04141352 0.03056185 0.02668625)
      PathPoint P4: calcn_l (0.1149391 0.00752973 0.02834722)
      PathPoint P5: calcn_l (0.1911223 -0.00586876 0.02978673)
      PathPoint P6: toes_l (0.01716336 -0.007086805 0.0293438)
      PathPoint P7: toes_l (0.06223101 -0.0112946 0.02004237)
    Millard2012EquilibriumMuscle gaslat_l: max_isometric_force=1575.059 optimal_fiber_length=0.06349596
        tendon_slack_length=0.4061044 pennation_angle_at_optimal=0.2102268
      PathPoint P1: femur_l (-0.002990008 -0.3801297 -0.02760774)
      PathPoint P2: calcn_l (0.004872178 0.03432671 0.00586876)
      PathWrap shank: wrap_object=GasLat_at_shank_l method=hybrid
      PathWrap condyles: wrap_object=Gastroc_at_condyles_l method=hybrid
    Millard2012EquilibriumMuscle gasmed_l: max_isometric_force=3115.515 optimal_fiber_length=0.05464916
        tendon_slack_length=0.4272454 pennation_angle_at_optimal=0.1656816
      PathPoint P1: femur_l (0.007973355 -0.3775384 0.02073072)
      PathPoint P2: calcn_l (0.004872178 0.03432671 0.00586876)
      PathWrap shank: wrap_object=GasMed_at_shank_l method=hybrid
      PathWrap condyles: wrap_object=Gastroc_at_condyles_l method=hybrid
    Millard2012EquilibriumMuscle gem_l: max_isometric_force=170.4 optimal_fiber_length=0.02729019
        tendon_slack_length=0.04434656 pennation_angle_at_optimal=0 ignore_tendon_compliance=true
      PathPoint P1: pelvis (-0.1066 -0.0874 -0.0673)
      PathPoint P2: femur_l (-0.01415271 -0.003289009 -0.04415245)
    Millard2012EquilibriumMuscle glmax1_l: max_isometric_force=983.7836 optimal_fiber_length=0.1417671
        tendon_slack_length=0.04710225 pennation_angle_at_optimal=0.3540118 ignore_tendon_compliance=true
      PathPoint P1: pelvis (-0.137 0.0294 -0.0595)
      PathPoint P2: pelvis (-0.1253066 -0.0221672 -0.08832536)
      PathPoint P3: femur_l (-0.04425212 -0.03249142 -0.03009942)
      PathPoint P4: femur_l (-0.02760774 -0.05641149 -0.04684346)
      PathWrap: wrap_object=Gmax1_at_pelvis_l method=hybrid
    Millard2012EquilibriumMuscle glmax2_l: max_isometric_force=1406.046 optimal_fiber_length=0.1573653
        tendon_slack_length=0.06804513 pennation_angle_at_optimal=0.3673821 ignore_tendon_compliance=true
      PathPoint P1: pelvis (-0.1405 0.0085 -0.0444)
      PathPoint P2: pelvis (-0.1339793 -0.0557844 -0.09218038)
      PathPoint P3: femur_l (-0.04485012 -0.05820549 -0.02511607)
      PathPoint P4: femur_l (-0.01554804 -0.1012616 -0.04176045)
      PathWrap: wrap_object=Gmax2_at_pelvis_l method=hybrid
    Millard2012EquilibriumMuscle glmax3_l: max_isometric_force=947.7541 optimal_fiber_length=0.1679944
        tendon_slack_length=0.07013173 pennation_angle_at_optimal=0.3824161 ignore_tendon_compliance=true
      PathPoint P1: pelvis (-0.1295931 -0.04809 -0.01020447)
      PathPoint P2: pelvis (-0.1269016 -0.1156908 -0.0493216)
      PathPoint P3: femur_l (-0.02800641 -0.1121253 -0.009368692)
      PathPoint P4: femur_l (-0.005980016 -0.1414274 -0.04096311)
      PathWrap: wrap_object=Gmax3_at_pelvis_l method=hybrid
    Millard2012EquilibriumMuscle glmed1_l: max_isometric_force=1093.467 optimal_fiber_length=0.07410332
        tendon_slack_length=0.05666044 pennation_angle_at_optimal=0.3165559 ignore_tendon_compliance=true
      PathPoint P1: pelvis (-0.0542 0.0333 -0.1155)
      PathPoint P2: femur_l (-0.02172739 -0.01166103 -0.05531515)
    Millard2012EquilibriumMuscle glmed2_l: max_isometric_force=765.0917 optimal_fiber_length=0.07528416
        tendon_slack_length=0.06729044 pennation_angle_at_optimal=0.3165559 ignore_tendon_compliance=true
      PathPoint P1: pelvis (-0.0907 0.0426 -0.0777)
      PathPoint P2: femur_l (-0.02571407 -0.005780683 -0.05252448)
    Millard2012EquilibriumMuscle glmed3_l: max_isometric_force=871.1993 optimal_fiber_length=0.07976811
        tendon_slack_length=0.04942655 pennation_angle_at_optimal=0.3165559 ignore_tendon_compliance=true
      PathPoint P1: pelvis (-0.1324 -0.0035 -0.0533)
      PathPoint P2: femur_l (-0.03079708 -0.004684346 -0.05162748)
    Millard2012EquilibriumMuscle glmin1_l: max_isometric_force=374.0459 optimal_fiber_length=0.071402
        tendon_slack_length=0.01694515 pennation_angle_at_optimal=0.1745329 ignore_tendon_compliance=true
      PathPoint P1: pelvis (-0.0478 -0.0072 -0.1058)
      PathPoint P2: femur_l (-0.00717602 -0.01036536 -0.05581349)
    Millard2012EquilibriumMuscle glmin2_l: max_isometric_force=394.8197 optimal_fiber_length=0.05937648
        tendon_slack_length=0.02767267 pennation_angle_at_optimal=0 ignore_tendon_compliance=true
      PathPoint P1: pelvis (-0.0658 -0.0098 -0.0933)
      PathPoint P2: femur_l (-0.009568026 -0.01036536 -0.05581349)
    Millard2012EquilibriumMuscle glmin3_l: max_isometric_force=446.7738 optimal_fiber_length=0.04090963
        tendon_slack_length=0.05476777 pennation_angle_at_optimal=0.01745329
      PathPoint P1: pelvis (-0.0874 -0.0109 -0.0787)
      PathPoint P2: femur_l (-0.01345504 -0.008272356 -0.05481682)
    Millard2012EquilibriumMuscle grac_l: max_isometric_force=281.3115 optimal_fiber_length=0.2235067
        tendon_slack_length=0.1687719 pennation_angle_at_optimal=0.1720016 ignore_tendon_compliance=true
      PathPoint P1: pelvis (-0.0477 -0.1332 -0.0202)
      PathPoint P2: tibia_l (-0.01986084 -0.05126942 0.03192613)
      PathPoint P3: tibia_l (0.001919234 -0.07506577 0.01696042)
      PathWrap: wrap_object=GR_at_condyles_l method=hybrid
    Millard2012EquilibriumMuscle iliacus_l: max_isometric_force=1021.141 optimal_fiber_length=0.1043532
        tendon_slack_length=0.09409482 pennation_angle_at_optimal=0.279914 ignore_tendon_compliance=true
      PathPoint P1: pelvis (-0.0608 0.0324 -0.1011)
      PathPoint P2: pelvis (-0.01345775 -0.0510212 -0.08571755)
      PathPoint P3: femur_l (-0.00229234 -0.05631182 -0.0138537)
      PathPoint P4: femur_l (-0.01215937 -0.06348784 -0.01953472)
      PathWrap: wrap_object=IL_at_brim_l method=hybrid range=(2 3)
    Millard2012EquilibriumMuscle pect_l: max_isometric_force=319.6 optimal_fiber_length=0.09847959
        tendon_slack_length=0.03249827 pennation_angle_at_optimal=0 ignore_tendon_compliance=true
      PathPoint P1: pelvis (-0.024 -0.0799 -0.0527)
      PathPoint P2: femur_l (-0.01275737 -0.08159732 -0.02539514)
      PathWrap: wrap_object=PECT_at_femshaft_l method=hybrid
    Millard2012EquilibriumMuscle perbrev_l: max_isometric_force=521.2016 optimal_fiber_length=0.0492244
        tendon_slack_length=0.1599549 pennation_angle_at_optimal=0.2052361
      PathPoint P1: tibia_l (-0.02620078 -0.2730056 -0.02706335)
      PathPoint P2: tibia_l (-0.0365517 -0.4197516 -0.02684771)
      PathPoint P3: tibia_l (-0.03072931 -0.4317198 -0.02749464)
      PathPoint P4: calcn_l (0.05215446 0.02989746 -0.0258004)
      PathPoint P5: calcn_l (0.07496511 0.02425016 -0.03798085)
    Millard2012EquilibriumMuscle perlong_l: max_isometric_force=1115.371 optimal_fiber_length=0.05523058
        tendon_slack_length=0.3611958 pennation_angle_at_optimal=0.2479525
      PathPoint P1: tibia_l (-0.02156443 -0.1480398 -0.03040584)
      PathPoint P2: tibia_l (-0.03417962 -0.4205063 -0.02555384)
      PathPoint P3: tibia_l (-0.02932762 -0.432798 -0.02587731)
      PathPoint P4: calcn_l (0.04850032 0.02546821 -0.02447162)
      PathPoint P5: calcn_l (0.07540803 0.01173752 -0.0314477)
      PathPoint P6: calcn_l (0.09434309 0.007640462 -0.0130663)
      PathPoint P7: calcn_l (0.1332098 0.009412163 0.02037456)
    Millard2012EquilibriumMuscle piri_l: max_isometric_force=1029.787 optimal_fiber_length=0.02675456
        tendon_slack_length=0.118241 pennation_angle_at_optimal=0.1745329
      PathPoint P1: pelvis (-0.1014913 -0.00598148 -0.01531804)
      PathPoint P2: pelvis (-0.1017007 -0.02808456 -0.06907292)
      PathPoint P3: femur_l (-0.01475071 -0.00358801 -0.04355445)
    Millard2012EquilibriumMuscle Ps_L1_TP_l: max_isometric_force=492.9124 optimal_fiber_length=0.1903289
        tendon_slack_length=0.1620696 pennation_angle_at_optimal=0.2155251 ignore_tendon_compliance=true
      PathPoint P1: torso_lower (-0.02372416 0.1205375 -0.01779857)
      PathPoint P2: pelvis (-0.02043584 -0.0599064 -0.07437925)
      PathPoint P3: femur_l (-0.01315604 -0.04654446 -0.004584679)
      PathPoint P4: femur_l (-0.02342173 -0.05222548 -0.008770691)
      PathWrap: wrap_object=PS_at_brim_l method=hybrid range=(2 3)
    Millard2012EquilibriumMuscle Ps_L3_L4_IVD_l: max_isometric_force=541.0976 optimal_fiber_length=0.1526396
        tendon_slack_length=0.1299763 pennation_angle_at_optimal=0.2155251 ignore_tendon_compliance=true
      PathPoint P1: torso_lower (0.01818323 0.05624666 -0.02178055)
      PathPoint P2: pelvis (-0.02043584 -0.0599064 -0.07437925)
      PathPoint P3: femur_l (-0.01315604 -0.04654446 -0.004584679)
      PathPoint P4: femur_l (-0.02342173 -0.05222548 -0.008770691)
      PathWrap: wrap_object=PS_at_brim_l method=hybrid range=(2 3)
    Millard2012EquilibriumMuscle Ps_L5_TP_l: max_isometric_force=394.071 optimal_fiber_length=0.1394462
        tendon_slack_length=0.1187418 pennation_angle_at_optimal=0.2155251 ignore_tendon_compliance=true
      PathPoint P1: torso_lower (-0.001587093 0.01839879 -0.02050826)
      PathPoint P2: pelvis (-0.02043584 -0.0599064 -0.07437925)
      PathPoint P3: femur_l (-0.01315604 -0.04654446 -0.004584679)
      PathPoint P4: femur_l (-0.02342173 -0.05222548 -0.008770691)
      PathWrap: wrap_object=PS_at_brim_l method=hybrid range=(2 3)
    Millard2012EquilibriumMuscle quadfem_l: max_isometric_force=397 optimal_fiber_length=0.05492179
        tendon_slack_length=0.02440969 pennation_angle_at_optimal=0 ignore_tendon_compliance=true
      PathPoint P1: pelvis (-0.1118 -0.12 -0.0616)
      PathPoint P2: femur_l (-0.0379731 -0.03578043 -0.0364781)
    Millard2012EquilibriumMuscle recfem_l: max_isometric_force=2191.741 optimal_fiber_length=0.07512309
        tendon_slack_length=0.4439028 pennation_angle_at_optimal=0.2170149
      PathPoint P1: pelvis (-0.0144 -0.0395 -0.0988)
      PathPoint P2: patella_l (0.01 0.049 -0.0007)
      PathPoint P3: patella_l (0.0121 0.0437 0.001)
      PathPoint P4: patella_l (0.005 0.00247 -3e-5)
      PathPoint P5: tibia_l (0.03515001 -0.06805733 0.000506764)
      PathWrap: wrap_object=KnExt_at_fem_l method=hybrid
    Millard2012EquilibriumMuscle sart_l: max_isometric_force=249.4131 optimal_fiber_length=0.3959532
        tendon_slack_length=0.1218316 pennation_angle_at_optimal=0.02613542 ignore_tendon_compliance=true
      PathPoint P1: pelvis (-0.014 -0.022 -0.1049)
      PathPoint P2: femur_l (-0.002990008 -0.3556116 0.04195978)
      PathPoint P3: tibia_l (-0.02706335 -0.04323667 0.03935508)
      PathPoint P4: tibia_l (-0.01714372 -0.06458546 0.02846504)
      PathPoint P5: tibia_l (0.01466381 -0.08733593 0.002803375)
    Millard2012EquilibriumMuscle semimem_l: max_isometric_force=2200.987 optimal_fiber_length=0.06590705
        tendon_slack_length=0.3320053 pennation_angle_at_optimal=0.2545615
      PathPoint P1: pelvis (-0.0981 -0.1256 -0.0688)
      PathPoint P2: tibia_l (-0.03126842 -0.04496183 0.02113314)
      PathWrap: wrap_object=SM_at_condyles_l method=hybrid
    Millard2012EquilibriumMuscle semiten_l: max_isometric_force=591.2951 optimal_fiber_length=0.1884224
        tendon_slack_length=0.2413359 pennation_angle_at_optimal=0.241295
      PathPoint P1: pelvis (-0.1015 -0.133 -0.064)
      PathPoint P2: tibia_l (-0.0336405 -0.05477364 0.02469127)
      PathPoint P3: tibia_l (0.00204862 -0.08334651 0.01261519)
      PathWrap: wrap_object=ST_at_condyles_l method=hybrid
    Millard2012EquilibriumMuscle soleus_l: max_isometric_force=6194.843 optimal_fiber_length=0.04751024
        tendon_slack_length=0.2988349 pennation_angle_at_optimal=0.3814289
      PathPoint P1: tibia_l (-0.008194482 -0.09876507 -0.01056657)
      PathPoint P2: calcn_l (0.004872178 0.03432671 0.00586876)
    Millard2012EquilibriumMuscle tfl_l: max_isometric_force=411.2066 optimal_fiber_length=0.09551329
        tendon_slack_length=0.4519257 pennation_angle_at_optimal=0.05235988
      PathPoint P1: pelvis (-0.0377 0.0251 -0.1258)
      PathPoint P2: femur_l (0.02930208 -0.09916861 -0.05950116)
      PathPoint P3: femur_l (0.01066436 -0.4036511 -0.03229209)
      PathPoint P4: tibia_l (0.01164479 -0.04420707 -0.03730646)
    Millard2012EquilibriumMuscle tibant_l: max_isometric_force=1227.452 optimal_fiber_length=0.07402181
        tendon_slack_length=0.2606056 pennation_angle_at_optimal=0.1951828
      PathPoint P1: tibia_l (0.01660461 -0.1414626 -0.01746719)
      PathPoint P2: tibia_l (0.02706335 -0.205509 -0.01380123)
      PathPoint P3: tibia_l (0.02512256 -0.3945212 0.01423252)
      PathPoint P4: calcn_l (0.1291127 0.01971018 0.03377306)
    Millard2012EquilibriumMuscle tibpost_l: max_isometric_force=1730.154 optimal_fiber_length=0.04092828
        tendon_slack_length=0.3040166 pennation_angle_at_optimal=0.2264891
      PathPoint P1: tibia_l (-0.004420707 -0.1406001 -0.01110568)
      PathPoint P2: tibia_l (-0.01768283 -0.3940899 0.01886887)
      PathPoint P3: calcn_l (0.04617496 0.03698426 0.03166916)
      PathPoint P4: calcn_l (0.08548459 0.01760628 0.0311155)
    Millard2012EquilibriumMuscle vasint_l: max_isometric_force=1697.361 optimal_fiber_length=0.100417
        tendon_slack_length=0.2044853 pennation_angle_at_optimal=0.06309973
      PathPoint P1: femur_l (0.02890341 -0.1917592 -0.03089675)
      PathPoint P2: femur_l (0.03338843 -0.2077059 -0.02840508)
      PathPoint P3: patella_l (0.0058 0.048 0.0006)
      PathPoint P4: patella_l (0.005 0.00247 0.00039)
      PathPoint P5: tibia_l (0.03511767 -0.06814359 -0.0004636352)
      PathWrap: wrap_object=KnExt_at_fem_l method=hybrid
    Millard2012EquilibriumMuscle vaslat_l: max_isometric_force=5148.767 optimal_fiber_length=0.1006799
        tendon_slack_length=0.2234417 pennation_angle_at_optimal=0.2528673
      PathPoint P1: femur_l (0.004784013 -0.1847825 -0.03478376)
      PathPoint P2: femur_l (0.02681041 -0.258237 -0.04076378)
      PathPoint P3: patella_l (0.0103 0.0423 -0.0141)
      PathPoint P4: patella_l (0.005 0.00247 -0.00733)
      PathPoint P5: tibia_l (0.03508532 -0.06833767 -0.005509711)
      PathWrap: wrap_object=KnExt_at_fem_l method=hybrid
    Millard2012EquilibriumMuscle vasmed_l: max_isometric_force=2747.823 optimal_fiber_length=0.09771378
        tendon_slack_length=0.2017913 pennation_angle_at_optimal=0.4222225
      PathPoint P1: femur_l (0.01395337 -0.2092009 -0.01873738)
      PathPoint P2: femur_l (0.03548143 -0.2759778 -0.0008970025)
      PathPoint P3: patella_l (0.0063 0.0445 0.017)
      PathPoint P4: patella_l (0.005 0.00247 0.0085)
      PathPoint P5: tibia_l (0.03439526 -0.06854253 0.00731034)
      PathWrap: wrap_object=KnExt_at_fem_l method=hybrid
    Millard2012EquilibriumMuscle IO2_l: max_isometric_force=525.0137 optimal_fiber_length=0.1193633
        tendon_slack_length=0.01326259 pennation_angle_at_optimal=0 ignore_tendon_compliance=true
      PathPoint P1: torso_lower (0.1125035 0.0551743 -0.06535705)
      PathPoint P2: pelvis (-0.02272864 0.0330676 -0.1490986)
    Millard2012EquilibriumMuscle IO4_l: max_isometric_force=232.964 optimal_fiber_length=0.1285075
        tendon_slack_length=0.01427861 pennation_angle_at_optimal=0 ignore_tendon_compliance=true
      PathPoint P1: torso_upper (0.07998698 0.1246213 -0.133506)
      PathPoint P2: pelvis (-0.05153818 0.059998 -0.1290299)
    Millard2012EquilibriumMuscle IO5_l: max_isometric_force=390.7954 optimal_fiber_length=0.1010003
        tendon_slack_length=0.01122226 pennation_angle_at_optimal=0 ignore_tendon_compliance=true
      PathPoint P1: torso_lower (0.05954754 0.1037465 -0.1270217)
      PathPoint P2: pelvis (-0.07156928 0.07255544 -0.1058997)
    Millard2012EquilibriumMuscle EO10_l: max_isometric_force=171.5304 optimal_fiber_length=0.1371556
        tendon_slack_length=0.01523951 pennation_angle_at_optimal=0 ignore_tendon_compliance=true
      PathPoint P1: pelvis (-0.03106227 0.03967013 -0.1439522)
      PathPoint P2: torso_lower (0.03284611 0.1124575 -0.1315152)
    Millard2012EquilibriumMuscle EO12_l: max_isometric_force=290.233 optimal_fiber_length=0.1240352
        tendon_slack_length=0.01378169 pennation_angle_at_optimal=0 ignore_tendon_compliance=true
      PathPoint P1: pelvis (-0.07832707 0.07359968 -0.0921475)
      PathPoint P2: torso_lower (-0.04468858 0.118837 -0.07932224)
    Millard2012EquilibriumMuscle IL_L2_l: max_isometric_force=467.111 optimal_fiber_length=0.04548224
        tendon_slack_length=0.1031155 pennation_angle_at_optimal=0.24086 ignore_tendon_compliance=true
      PathPoint P1: pelvis (-0.1345356 0.02672888 -0.04083942)
      PathPoint P2: torso_lower (-0.03650253 0.08839206 -0.04126756)
    Millard2012EquilibriumMuscle IL_L4_l: max_isometric_force=504.7594 optimal_fiber_length=0.02529121
        tendon_slack_length=0.05733924 pennation_angle_at_optimal=0.24086 ignore_tendon_compliance=true
      PathPoint P1: pelvis (-0.1112278 0.04603541 -0.04685099)
      PathPoint P2: torso_lower (-0.01982531 0.04326269 -0.04857225)
    Millard2012EquilibriumMuscle IL_R7_l: max_isometric_force=390.8106 optimal_fiber_length=0.1696332
        tendon_slack_length=0.1782225 pennation_angle_at_optimal=0.24086 ignore_tendon_compliance=true
      PathPoint P1: pelvis (-0.1129952 0.046945 -0.04790432)
      PathPoint P2: torso_lower (-0.06256402 0.07733834 -0.06368123)
      PathPoint P3: torso_lower (-0.1240108 0.1952321 -0.09049438)
      PathPoint P4: torso_upper (-0.1262452 0.2178678 -0.0994321)
      PathPoint P5: torso_upper (-0.1284797 0.2423897 -0.0994321)
      PathPoint P6: torso_upper (-0.1262452 0.2640821 -0.1005493)
    Millard2012EquilibriumMuscle IL_R10_l: max_isometric_force=197.2005 optimal_fiber_length=0.1678
        tendon_slack_length=0.09878714 pennation_angle_at_optimal=0.24086 ignore_tendon_compliance=true
      PathPoint P1: pelvis (-0.09535062 0.06725272 -0.06501381)
      PathPoint P2: torso_lower (-0.06256402 0.07828149 -0.07150173)
      PathPoint P3: torso_lower (-0.1240108 0.1895732 -0.1016665)
    Millard2012EquilibriumMuscle IL_R11_l: max_isometric_force=235.1806 optimal_fiber_length=0.1528497
        tendon_slack_length=0.07650888 pennation_angle_at_optimal=0.24086 ignore_tendon_compliance=true
      PathPoint P1: pelvis (-0.08883109 0.07215332 -0.07265583)
      PathPoint P2: torso_lower (-0.0614468 0.07828149 -0.07485338)
      PathPoint P3: torso_lower (-0.1027837 0.1603356 -0.0916116)
    Millard2012EquilibriumMuscle IL_R12_l: max_isometric_force=206.1732 optimal_fiber_length=0.1254146
        tendon_slack_length=0.06277624 pennation_angle_at_optimal=0.24086 ignore_tendon_compliance=true
      PathPoint P1: pelvis (-0.08193275 0.0739212 -0.08292833)
      PathPoint P2: torso_lower (-0.07820502 0.1320411 -0.08155667)
    Millard2012EquilibriumMuscle LTpT_T8_l: max_isometric_force=343.9392 optimal_fiber_length=0.1273723
        tendon_slack_length=0.2011541 pennation_angle_at_optimal=0.21991 ignore_tendon_compliance=true
      PathPoint P1: pelvis (-0.1264031 0.0283044 0)
      PathPoint P2: torso_lower (-0.04468858 0.05658903 -0.02234429)
      PathPoint P3: torso_lower (-0.05586073 0.07639519 -0.02346151)
      PathPoint P4: torso_lower (-0.06368123 0.09431504 -0.02346151)
      PathPoint P5: torso_upper (-0.1173075 0.2414465 -0.05921237)
    Millard2012EquilibriumMuscle LTpT_T12_l: max_isometric_force=320.7467 optimal_fiber_length=0.09389521
        tendon_slack_length=0.15914 pennation_angle_at_optimal=0.21991 ignore_tendon_compliance=true
      PathPoint P1: pelvis (-0.1393624 0.00671428 -0.02354965)
      PathPoint P2: torso_lower (-0.04468858 0.05564588 -0.04357137)
      PathPoint P3: torso_lower (-0.05921237 0.07733834 -0.04021973)
      PathPoint P4: torso_lower (-0.06368123 0.09525819 -0.03575087)
      PathPoint P5: torso_lower (-0.07485338 0.1593924 -0.03351644)
    Millard2012EquilibriumMuscle LTpT_R8_l: max_isometric_force=321.2085 optimal_fiber_length=0.1114182
        tendon_slack_length=0.2272593 pennation_angle_at_optimal=0.21991 ignore_tendon_compliance=true
      PathPoint P1: pelvis (-0.1264031 0.0283044 0)
      PathPoint P2: torso_lower (-0.04468858 0.05753218 -0.02904758)
      PathPoint P3: torso_lower (-0.05586073 0.07639519 -0.03239922)
      PathPoint P4: torso_lower (-0.06256402 0.09525819 -0.03351644)
      PathPoint P5: torso_lower (-0.1173075 0.200891 -0.07708781)
      PathPoint P6: torso_upper (-0.1206592 0.2225835 -0.08490831)
      PathPoint P7: torso_upper (-0.1228936 0.2452191 -0.08825995)
    Millard2012EquilibriumMuscle LTpT_R11_l: max_isometric_force=320.9303 optimal_fiber_length=0.1149381
        tendon_slack_length=0.1637406 pennation_angle_at_optimal=0.21991 ignore_tendon_compliance=true
      PathPoint P1: pelvis (-0.1393624 0.00671428 -0.02354965)
      PathPoint P2: torso_lower (-0.04357137 0.05658903 -0.04915744)
      PathPoint P3: torso_lower (-0.05586073 0.07733834 -0.05027466)
      PathPoint P4: torso_lower (-0.06256402 0.09525819 -0.05027466)
      PathPoint P5: torso_lower (-0.1016665 0.1650513 -0.08267388)
    Millard2012EquilibriumMuscle LTpL_L2_l: max_isometric_force=326.7141 optimal_fiber_length=0.08103591
        tendon_slack_length=0.0891541 pennation_angle_at_optimal=0.21991 ignore_tendon_compliance=true
      PathPoint P1: pelvis (-0.1369271 0.01475676 -0.04281796)
      PathPoint P2: torso_lower (-0.03530018 0.08919723 -0.03205121)
    Millard2012EquilibriumMuscle LTpL_L4_l: max_isometric_force=151.8409 optimal_fiber_length=0.0548223
        tendon_slack_length=0.05912201 pennation_angle_at_optimal=0.21991 ignore_tendon_compliance=true
      PathPoint P1: pelvis (-0.1295931 0.01899143 -0.03743)
      PathPoint P2: torso_lower (-0.01738431 0.04090076 -0.03850871)
    Millard2012EquilibriumMuscle LTpL_L5_l: max_isometric_force=157.7955 optimal_fiber_length=0.07239289
        tendon_slack_length=0.001438331 pennation_angle_at_optimal=0.21991 ignore_tendon_compliance=true
      PathPoint P1: pelvis (-0.1214188 0.0546852 -0.03968405)
      PathPoint P2: torso_lower (-0.03351644 0.01980616 -0.04021973)
    Millard2012EquilibriumMuscle MF_m1t_3_l: max_isometric_force=199.3089 optimal_fiber_length=0.1206443
        tendon_slack_length=0.03617557 pennation_angle_at_optimal=0 ignore_tendon_compliance=true
      PathPoint P1: torso_lower (-0.05586073 0.08959929 -0.01340658)
      PathPoint P2: pelvis (-0.1254062 0.0403956 -0.04648703)
    Millard2012EquilibriumMuscle MF_m2t_3_l: max_isometric_force=237.3376 optimal_fiber_length=0.1144667
        tendon_slack_length=0.03484778 pennation_angle_at_optimal=0 ignore_tendon_compliance=true
      PathPoint P1: torso_lower (-0.0458058 0.06036163 -0.01228936)
      PathPoint P2: pelvis (-0.1300915 0.0154804 -0.03707624)
    Millard2012EquilibriumMuscle MF_m3s_l: max_isometric_force=303.8877 optimal_fiber_length=0.0487057
        tendon_slack_length=0.02025097 pennation_angle_at_optimal=0 ignore_tendon_compliance=true
      PathPoint P1: torso_lower (-0.03910251 0.04244177 -0.01228936)
      PathPoint P2: pelvis (-0.1206213 0.061372 -0.01927511)
    Millard2012EquilibriumMuscle MF_m4t_3_l: max_isometric_force=406.7536 optimal_fiber_length=0.1001089
        tendon_slack_length=0.04051903 pennation_angle_at_optimal=0 ignore_tendon_compliance=true
      PathPoint P1: torso_lower (-0.05139187 0.02263561 -0.01340658)
      PathPoint P2: pelvis (-0.1414559 -0.017862 -0.01428626)
    Millard2012EquilibriumMuscle MF_m5_laminar_l: max_isometric_force=314.5229 optimal_fiber_length=0.04114116
        tendon_slack_length=0.01562384 pennation_angle_at_optimal=0 ignore_tendon_compliance=true
      PathPoint P1: torso_lower (-0.02904758 0.008488354 -0.006703288)
      PathPoint P2: pelvis (-0.1317862 0.0356324 -0.01836805)
    Millard2012EquilibriumMuscle QL_post_I1_L3_l: max_isometric_force=86.27122 optimal_fiber_length=0.04878564
        tendon_slack_length=0.040992 pennation_angle_at_optimal=0.12915 ignore_tendon_compliance=true
      PathPoint P1: pelvis (-0.1014694 0.06126941 -0.05634001)
      PathPoint P2: torso_lower (-0.01694312 0.06408736 -0.03421794)
    Millard2012EquilibriumMuscle QL_post_I2_L4_l: max_isometric_force=211.2949 optimal_fiber_length=0.04053446
        tendon_slack_length=0.03405898 pennation_angle_at_optimal=0.12915 ignore_tendon_compliance=true
      PathPoint P1: pelvis (-0.08508884 0.0726159 -0.07626594)
      PathPoint P2: torso_lower (-0.01200458 0.04373502 -0.03367095)
    Millard2012EquilibriumMuscle QL_post_I3_L2_l: max_isometric_force=261.4557 optimal_fiber_length=0.06679012
        tendon_slack_length=0.05612022 pennation_angle_at_optimal=0.12915 ignore_tendon_compliance=true
      PathPoint P1: pelvis (-0.07877865 0.07400181 -0.08539327)
      PathPoint P2: torso_lower (-0.02313238 0.08858286 -0.03368637)
    Millard2012EquilibriumMuscle QL_ant_I2_T12_l: max_isometric_force=137.9627 optimal_fiber_length=0.1108779
        tendon_slack_length=0.05757431 pennation_angle_at_optimal=0.12915 ignore_tendon_compliance=true
      PathPoint P1: pelvis (-0.08508884 0.0726159 -0.07626594)
      PathPoint P2: torso_lower (-0.01628094 0.1347828 -0.02063585)
    Millard2012EquilibriumMuscle QL_ant_I3_R12_I2_l: max_isometric_force=155.742 optimal_fiber_length=0.1197795
        tendon_slack_length=0.06219653 pennation_angle_at_optimal=0.12915 ignore_tendon_compliance=true
      PathPoint P1: pelvis (-0.07877865 0.07400181 -0.08539327)
      PathPoint P2: torso_lower (-0.05855545 0.1375491 -0.05228564)
    Millard2012EquilibriumMuscle rect_abd_l: max_isometric_force=662.2124 optimal_fiber_length=0.3138423
        tendon_slack_length=0.08533939 pennation_angle_at_optimal=0 ignore_tendon_compliance=true
      PathPoint P1: pelvis (-0.001196244 -0.072135 -0.01571488)
      PathPoint P2: torso_lower (0.1358533 0.02829451 -0.06334607)
      PathPoint P3: torso_lower (0.1403222 0.1037465 -0.06625083)
      PathPoint P4: torso_upper (0.08811472 0.2423897 -0.06786531)
    CoordinateActuator shoulder_flex_r: coordinate=arm_flex_r optimal_force=10
    CoordinateActuator shoulder_add_r: coordinate=arm_add_r optimal_force=10
    CoordinateActuator shoulder_rot_r: coordinate=arm_rot_r optimal_force=10
    CoordinateActuator elbow_flex_r: coordinate=elbow_flex_r optimal_force=10
    CoordinateActuator pro_sup_r: coordinate=pro_sup_r optimal_force=10
    CoordinateActuator wrist_flex_r: coordinate=wrist_flex_r optimal_force=10
    CoordinateActuator wrist_dev_r: coordinate=wrist_dev_r optimal_force=10
    CoordinateActuator shoulder_flex_l: coordinate=arm_flex_l optimal_force=10
    CoordinateActuator shoulder_add_l: coordinate=arm_add_l optimal_force=10
    CoordinateActuator shoulder_rot_l: coordinate=arm_rot_l optimal_force=10
    CoordinateActuator elbow_flex_l: coordinate=elbow_flex_l optimal_force=10
    CoordinateActuator pro_sup_l: coordinate=pro_sup_l optimal_force=10
    CoordinateActuator wrist_flex_l: coordinate=wrist_flex_l optimal_force=10
    CoordinateActuator wrist_dev_l: coordinate=wrist_dev_l optimal_force=10
    ObjectGroup right_leg: members=(addbrev_r addlong_r addmagDist_r addmagIsch_r addmagMid_r addmagProx_r bflh_r bfsh_r edl_r ehl_r fdl_r fhl_r gaslat_r gasmed_r glmax1_r glmax2_r glmax3_r glmed1_r glmed2_r glmed3_r glmin1_r glmin2_r glmin3_r grac_r iliacus_r perbrev_r perlong_r piri_r Ps_L1_TP_r Ps_L3_L4_IVD_r Ps_L5_TP_r recfem_r sart_r semimem_r semiten_r soleus_r tfl_r tibant_r tibpost_r vasint_r vaslat_r vasmed_r)
    ObjectGroup left_leg: members=(addbrev_l addlong_l addmagDist_l addmagIsch_l addmagMid_l addmagProx_l bflh_l bfsh_l edl_l ehl_l fdl_l fhl_l gaslat_l gasmed_l glmax1_l glmax2_l glmax3_l glmed1_l glmed2_l glmed3_l glmin1_l glmin2_l glmin3_l grac_l iliacus_l perbrev_l perlong_l piri_l Ps_L1_TP_l Ps_L3_L4_IVD_l Ps_L5_TP_l recfem_l sart_l semimem_l semiten_l soleus_l tfl_l tibant_l tibpost_l vasint_l vaslat_l vasmed_l)
    ObjectGroup hip_add_r: members=(addbrev_r addlong_r addmagDist_r addmagIsch_r addmagMid_r addmagProx_r bflh_r grac_r semimem_r semiten_r pect_r)
    ObjectGroup hip_abd_r: members=(glmax1_r glmed1_r glmed2_r glmed3_r glmin1_r glmin2_r glmin3_r piri_r sart_r tfl_r)
    ObjectGroup hip_flex_r: members=(addbrev_r addlong_r glmin1_r grac_r iliacus_r Ps_L1_TP_r Ps_L3_L4_IVD_r Ps_L5_TP_r recfem_r sart_r tfl_r pect_r)
    ObjectGroup hip_ext_r: members=(addlong_r addmagDist_r addmagIsch_r addmagMid_r addmagProx_r bflh_r glmax1_r glmax2_r glmax3_r glmed1_r glmed2_r glmed3_r glmin3_r semimem_r semiten_r)
    ObjectGroup hip_inrot_r: members=(glmed1_r glmed2_r glmed3_r glmin1_r iliacus_r Ps_L1_TP_r Ps_L3_L4_IVD_r Ps_L5_TP_r tfl_r)
    ObjectGroup hip_exrot_r: members=(glmin3_r piri_r gem_r quadfem_r)
    ObjectGroup knee_flex_r: members=(bflh_r bfsh_r gaslat_r gasmed_r grac_r sart_r semimem_r semiten_r)
    ObjectGroup knee_ext_r: members=(recfem_r vasint_r vaslat_r vasmed_r)
    ObjectGroup ankle_df_r: members=(edl_r ehl_r tibant_r)
    ObjectGroup ankle_pf_r: members=(fdl_r fhl_r gaslat_r gasmed_r perbrev_r perlong_r soleus_r tibpost_r)
    ObjectGroup everter_r: members=(edl_r perbrev_r perlong_r)
    ObjectGroup inverter_r: members=(ehl_r fdl_r fhl_r tibant_r tibpost_r)
    ObjectGroup hip_add_l: members=(addbrev_l addlong_l addmagDist_l addmagIsch_l addmagMid_l addmagProx_l bflh_l grac_l semimem_l semiten_l pect_l)
    ObjectGroup hip_abd_l: members=(glmax1_l glmed1_l glmed2_l glmed3_l glmin1_l glmin2_l glmin3_l piri_l sart_l tfl_l)
    ObjectGroup hip_flex_l: members=(addbrev_l addlong_l glmin1_l grac_l iliacus_l Ps_L1_TP_l Ps_L3_L4_IVD_l Ps_L5_TP_l recfem_l sart_l tfl_l pect_l)
    ObjectGroup hip_ext_l: members=(addlong_l addmagDist_l addmagIsch_l addmagMid_l addmagProx_l bflh_l glmax1_l glmax2_l glmax3_l glmed1_l glmed2_l glmed3_l glmin3_l semimem_l semiten_l)
    ObjectGroup hip_exrot_l: members=(glmin3_l piri_l gem_l quadfem_l)
    ObjectGroup hip_inrot_l: members=(glmed1_l glmed2_l glmed3_l glmin1_l iliacus_l Ps_L1_TP_l Ps_L3_L4_IVD_l Ps_L5_TP_l tfl_l)
    ObjectGroup knee_flex_l: members=(bflh_l bfsh_l gaslat_l gasmed_l grac_l sart_l semimem_l semiten_l)
    ObjectGroup knee_ext_l: members=(recfem_l vasint_l vaslat_l vasmed_l)
    ObjectGroup ankle_df_l: members=(edl_l ehl_l tibant_l)
    ObjectGroup ankle_pf_l: members=(fdl_l fhl_l gaslat_l gasmed_l perbrev_l perlong_l soleus_l tibpost_l)
    ObjectGroup everter_l: members=(edl_l perbrev_l perlong_l)
    ObjectGroup inverter_l: members=(ehl_l fdl_l fhl_l tibant_l tibpost_l)
    ObjectGroup Internal_Oblique_r: members=(IO2_r IO4_r IO5_r)
    ObjectGroup Internal_Oblique_l: members=(IO2_l IO4_l IO5_l)
    ObjectGroup External_Oblique_r: members=(EO10_r EO12_r)
    ObjectGroup External_Oblique_l: members=(EO10_l EO12_l)
    ObjectGroup TransversoSpinalis_r: members=(MF_m1t_3_r MF_m2t_3_r MF_m3s_r MF_m4t_3_r MF_m5_laminar_r)
    ObjectGroup TransversoSpinalis_l: members=(MF_m1t_3_l MF_m2t_3_l MF_m3s_l MF_m4t_3_l MF_m5_laminar_l)
    ObjectGroup SacroSpinalis_r: members=(IL_L2_r IL_L4_r IL_R7_r IL_R10_r IL_R11_r IL_R12_r LTpT_T8_r LTpT_T12_r LTpT_R8_r LTpT_R11_r LTpL_L2_r LTpL_L4_r LTpL_L5_r)
    ObjectGroup SacroSpinalis_l: members=(IL_L2_l IL_L4_l IL_R7_l IL_R10_l IL_R11_l IL_R12_l LTpT_T8_l LTpT_T12_l LTpT_R8_l LTpT_R11_l LTpL_L2_l LTpL_L4_l LTpL_L5_l)
    ObjectGroup Psoas_Major_r: members=(Ps_L1_TP_r Ps_L3_L4_IVD_r Ps_L5_TP_r)
    ObjectGroup Psoas_Major_l: members=(Ps_L1_TP_l Ps_L3_L4_IVD_l Ps_L5_TP_l)
    ObjectGroup Quadratus_Lumborum_r: members=(QL_post_I1_L3_r QL_post_I2_L4_r QL_post_I3_L2_r QL_ant_I2_T12_r QL_ant_I3_R12_I2_r)
    ObjectGroup Quadratus_Lumborum_l: members=(QL_post_I1_L3_l QL_post_I2_L4_l QL_post_I3_L2_l QL_ant_I2_T12_l QL_ant_I3_R12_I2_l)
    ObjectGroup Rectus_Abdominus: members=(rect_abd_r rect_abd_l)
    ObjectGroup Added to Rajagopal: members=(gem_r pect_r quadfem_r gem_l pect_l quadfem_l IO2_r IO4_r IO5_r IO2_l IO4_l IO5_l EO10_r EO12_r EO10_l EO12_l MF_m1t_3_r MF_m2t_3_r MF_m3s_r MF_m4t_3_r MF_m5_laminar_r MF_m1t_3_l MF_m2t_3_l MF_m3s_l MF_m4t_3_l MF_m5_laminar_l IL_L2_r IL_L4_r IL_R7_r IL_R10_r IL_R11_r IL_R12_r LTpT_T8_r LTpT_T12_r LTpT_R8_r LTpT_R11_r LTpL_L2_r LTpL_L4_r LTpL_L5_r IL_L2_l IL_L4_l IL_R7_l IL_R10_l IL_R11_l IL_R12_l LTpT_T8_l LTpT_T12_l LTpT_R8_l LTpT_R11_l LTpL_L2_l LTpL_L4_l LTpL_L5_l Ps_L1_TP_r Ps_L3_L4_IVD_r Ps_L5_TP_r Ps_L1_TP_l Ps_L3_L4_IVD_l Ps_L5_TP_l QL_post_I1_L3_r QL_post_I2_L4_r QL_post_I3_L2_r QL_ant_I2_T12_r QL_ant_I3_R12_I2_r QL_post_I1_L3_l QL_post_I2_L4_l QL_post_I3_L2_l QL_ant_I2_T12_l QL_ant_I3_R12_I2_l rect_abd_r rect_abd_l)
    ObjectGroup Reduction Group 1.1: members=(IO2_r IO5_r)
    ObjectGroup Reduction Group 1.1_preserved: members=(IO2_r IO5_r)
    ObjectGroup Reduction Group 1.2: members=IO4_r
    ObjectGroup Reduction Group 2: members=(EO10_r EO12_r)
    ObjectGroup Reduction Group 2_preserved: members=(EO10_r EO12_r)
    ObjectGroup Reduction Group 3.1: members=(MF_m3s_r MF_m4t_3_r MF_m5_laminar_r)
    ObjectGroup Reduction Group 3.1_preserved: members=(MF_m3s_r MF_m4t_3_r MF_m5_laminar_r)
    ObjectGroup Reduction Group 3.2: members=(MF_m1t_3_r MF_m2t_3_r)
    ObjectGroup Reduction Group 3.2_preserved: members=(MF_m1t_3_r MF_m2t_3_r)
    ObjectGroup Reduction Group 4.1: members=(IL_L2_r IL_L4_r)
    ObjectGroup Reduction Group 4.1_preserved: members=(IL_L2_r IL_L4_r)
    ObjectGroup Reduction Group 4.2: members=(IL_R7_r IL_R10_r)
    ObjectGroup Reduction Group 4.2_preserved: members=(IL_R7_r IL_R10_r)
    ObjectGroup Reduction Group 4.3: members=(IL_R11_r IL_R12_r)
    ObjectGroup Reduction Group 5.1: members=LTpT_T12_r
    ObjectGroup Reduction Group 5.1_preserved: members=LTpT_T12_r
    ObjectGroup Reduction Group 5.2: members=LTpT_R8_r
    ObjectGroup Reduction Group 5.2_preserved: members=LTpT_R8_r
    ObjectGroup Reduction Group 5.3: members=LTpT_R11_r
    ObjectGroup Reduction Group 5.3_preserved: members=LTpT_R11_r
    ObjectGroup Reduction Group 5.4: members=LTpT_T8_r
    ObjectGroup Reduction Group 5.4_preserved: members=LTpT_T8_r
    ObjectGroup Reduction Group 6.1: members=LTpL_L2_r
    ObjectGroup Reduction Group 6.1_preserved: members=LTpL_L2_r
    ObjectGroup Reduction Group 6.2: members=(LTpL_L4_r LTpL_L5_r)
    ObjectGroup Reduction Group 7: members=(Ps_L1_TP_r Ps_L3_L4_IVD_r Ps_L5_TP_r)
    ObjectGroup Reduction Group 7_preserved: members=(Ps_L1_TP_r Ps_L3_L4_IVD_r Ps_L5_TP_r)
    ObjectGroup Reduction Group 8.1: members=(QL_post_I1_L3_r QL_post_I2_L4_r QL_post_I3_L2_r)
    ObjectGroup Reduction Group 8.1_preserved: members=(QL_post_I1_L3_r QL_post_I2_L4_r QL_post_I3_L2_r)
    ObjectGroup Reduction Group 8.2: members=(QL_ant_I2_T12_r QL_ant_I3_R12_I2_r)
    ObjectGroup Reduction Group 8.2_preserved: members=(QL_ant_I2_T12_r QL_ant_I3_R12_I2_r)
  MarkerSet:
    Marker R.Heel: calcn_r_markerPlate (-0.08772467 -0.01133487 -0.02410217)
    Marker R.Toe: toes_r_markerPlate (0.04367593 -0.01693607 -0.02673987)
    Marker L.Heel: calcn_l_markerPlate (-0.0865421 -0.00931677 0.0253528)
    Marker L.Toe: toes_l_markerPlate (0.04737627 -0.01139813 -0.03597814)
    Marker R.Midfoot.Superior: calcn_r_markerPlate (0.08932543 0.03156513 -0.01280183)
    Marker L.Midfoot.Superior: calcn_l_markerPlate (0.0906483 0.03283153 0.007614057)
    Marker R.Midfoot.Lateral: calcn_r_markerPlate (-0.001600767 -0.02023027 0.03690399)
    Marker L.Midfoot.Lateral: calcn_l_markerPlate (-0.0041062 -0.02351476 -0.03296685)
