# OpenSim document version 40000
MuscleTendonPersonalizationTool:
  results_directory: results
  input_model_file: optModel_MuscleGroups_LeftMusclesActive_NewSynx.osim
  input_osimx_file: example.osimx
  coordinate_list: hip_flexion_l hip_adduction_l hip_rotation_l knee_angle_l ankle_angle_l subtalar_angle_l
  v_max_factor: 10
  activation_muscle_groups: AdductorActivationGroupL GluteusMaxActivationGroupL GluteusMedActivationGroupL GluteusMinActivationGroupL IliopsoasActivationGroupL HamstringActivationGroupL BicepsFemActivationGroupL PeroneusActivationGroupL
  normalized_fiber_length_muscle_groups: AdductorFiberLengthGroupL GluteusMaxFiberLengthGroupL GluteusMedFiberLengthGroupL GluteusMinFiberLengthGroupL QuadricepFiberLengthGroupL HamstringFiberLengthGroupL PeroneusFiberLengthGroupL IliopsoasFiberLengthGroupL GastrocFiberLengthGroupL TibialisAnteriorFiberLengthGroupL TibialisPosteriorFiberLengthGroupL
  missing_emg_channel_muscle_groups: AddLongMissingEmgChannelL ExtDigLongMissingEmgChannelL FlexDigLongMissingEmgChannelL IliopsoasMissingEmgChannelL PeroneusLongMissingEmgChannelL RecFemMissingEmgChannelL TibPostMissingEmgChannelL VastMedMissingEmgChannelL
  collected_emg_channel_muscle_groups: BicFemLongCollectedEmgChannelL GasMedCollectedEmgChannelL GlutMaxCollectedEmgChannelL GlutMedCollectedEmgChannelL SemiMembCollectedEmgChannelL SolCollectedEmgChannelL TibAntCollectedEmgChannelL VastLatCollectedEmgChannelL
  max_iterations: 2e3
  max_function_evaluations: 1e8
  MuscleTendonParameterInitialization: is_enabled=false passive_moment_data_directory=thelen
      max_normalized_muscle_fiber_length=1 min_normalized_muscle_fiber_length=0.6 optimize_maximum_muscle_stress=true
      maximum_muscle_stress=610e3
    RCNLCostTermSet:
      RCNLCostTerm: type=passive_joint_moment is_enabled=true max_allowable_error=2
      RCNLCostTerm: type=optimal_muscle_fiber_length is_enabled=true max_allowable_error=0.3 error_center=1
      RCNLCostTerm: type=tendon_slack_length is_enabled=true max_allowable_error=1 error_center=1
      RCNLCostTerm: type=minimum_normalized_muscle_fiber_length is_enabled=true max_allowable_error=0.3
      RCNLCostTerm: type=maximum_normalized_muscle_fiber_length is_enabled=true max_allowable_error=0.03
      RCNLCostTerm: type=maximum_muscle_stress is_enabled=true max_allowable_error=0.1 error_center=1.2
      RCNLCostTerm: type=passive_muscle_force is_enabled=true max_allowable_error=0.1
      RCNLCostTerm: type=grouped_normalized_muscle_fiber_length is_enabled=true max_allowable_error=0.1
      RCNLCostTerm: type=grouped_maximum_normalized_muscle_fiber_length is_enabled=true max_allowable_error=0.1
  # Synergy Extrapolation Settings
  MTPSynergyExtrapolation: is_enabled=true task_prefixes=(speed1 speed2) matrix_factorization_method=PCA
      number_of_synergies=5 synergy_extrapolation_categorization=trial residual_categorization=task
    RCNLCostTermSet:
      RCNLCostTerm: type=inverse_dynamics_joint_moment is_enabled=true max_allowable_error=2
      RCNLCostTerm: type=measured_inverse_dynamics_joint_moment is_enabled=true max_allowable_error=2.5
      RCNLCostTerm: type=extrapolated_muscle_activation is_enabled=true max_allowable_error=0.3
      RCNLCostTerm: type=residual_muscle_activation is_enabled=true max_allowable_error=0.3
  MTPTaskList:
    MTPTask: is_enabled=true index=1 muscle_specific_electromechanical_delays=false
      RCNLCostTermSet:
        # THIS IS THE FIRST SECTION
        RCNLCostTerm: type=inverse_dynamics_joint_moment is_enabled=true max_allowable_error=2
        RCNLCostTerm: type=activation_time_constant is_enabled=true max_allowable_error=0.02 error_center=0.015
        RCNLCostTerm: type=activation_nonlinearity_constant is_enabled=true max_allowable_error=0.1
        # THIS IS THE SECOND SECTION
        RCNLCostTerm: type=optimal_muscle_fiber_length is_enabled=true max_allowable_error=0.1
        RCNLCostTerm: type=tendon_slack_length is_enabled=true max_allowable_error=0.1
        RCNLCostTerm: type=emg_scale_factor is_enabled=true max_allowable_error=0.2 error_center=0.3
            min_allowable_error=0.3
        RCNLCostTerm: type=normalized_muscle_fiber_length is_enabled=true max_allowable_error=0.1
        RCNLCostTerm: type=passive_muscle_force is_enabled=true max_allowable_error=50
        RCNLCostTerm: type=grouped_normalized_muscle_fiber_length is_enabled=true max_allowable_error=0.05
        RCNLCostTerm: type=grouped_emg_scale_factor is_enabled=true max_allowable_error=0.1
        RCNLCostTerm: type=grouped_electromechanical_delay is_enabled=true max_allowable_error=0.2
