# OpenSim document version 40000
GroundContactPersonalizationTool:
  input_model_file: optModel_v6_correct_height.osim
  input_motion_file: CPRIT_Patient3_NormalGait_1pt0_01_Right_75_ik.mot
  input_grf_file: CPRIT_Patient3_NormalGait_1pt0_01_Right_75_GRF.mot
  kinematics_filter_cutoff: 10
  resting_spring_length_initialization_is_enabled: true
  initial_resting_spring_length: 0.05
  initial_spring_constant: 2500
  initial_damping_factor: 1e-4
  initial_dynamic_friction_coefficient: 0
  initial_viscous_friction_coefficient: 5
  latching_velocity: 0.05
  GCPContactSurfaceSet:
    GCPContactSurface: is_enabled=true is_left_foot=false start_time=81.181 end_time=82.286 belt_speed=1
        force_columns=(F2x F2y F2z) moment_columns=(M2x M2y M2z) electrical_center_columns=(EC2x EC2y EC2z)
        toe_joint=mtp_r toe_marker=R.Toe medial_marker=R.Toe.Medial lateral_marker=R.Toe.Lateral heel_marker=R.Heel
        midfoot_superior_marker=R.Midfoot.Superior
    GCPContactSurface: is_enabled=true is_left_foot=true start_time=81.181 end_time=82.286 belt_speed=1
        force_columns=(F1x F1y F1z) moment_columns=(M1x M1y M1z) electrical_center_columns=(EC1x EC1y EC1z)
        toe_joint=mtp_l toe_marker=L.Toe medial_marker=L.Toe.Medial lateral_marker=L.Toe.Lateral heel_marker=L.Heel
        midfoot_superior_marker=L.Midfoot.Superior
