# OpenSim document version 40000
NeuralControlPersonalizationTool:
  results_directory: results
  input_model_file: model.osim
  data_directory: preprocessed
  coordinate_list: hip_flexion_r hip_adduction_r hip_rotation_r knee_angle_r ankle_angle_r subtalar_angle_r mtp_angle_r hip_flexion_l hip_adduction_l hip_rotation_l knee_angle_l ankle_angle_l subtalar_angle_l mtp_angle_l lumbar_bending lumbar_extension lumbar_rotation thoracic_extension thoracic_bending thoracic_rotation
  activation_muscle_groups: InternalObliquesR ExternalObliquesR ErectorSpinaeR MultifidusR QuadratusLumborumR AdductorsR BicepsFemorisR TibialisAnteriorR FlexorLongusR GastrocR ExternalRotatorsR GluteusMaximusR GluteusMediusR GluteusMinimusR HipFlexorsR SemiHamstringsR QuadricepsR PeroneusR InternalObliquesL ExternalObliquesL ErectorSpinaeL MultifidusL QuadratusLumborumL AdductorsL BicepsFemorisL TibialisAnteriorL FlexorLongusL GastrocL ExternalRotatorsL GluteusMaximusL GluteusMediusL GluteusMinimusL HipFlexorsL SemiHamstringsL QuadricepsL PeroneusL
  normalized_fiber_length_muscle_groups: GluteusMaximusL GluteusMediusL GluteusMinimusL HipFlexorsL PeroneusL GastrocL TibialisAnteriorL TibialisPosteriorL HamstringsFiberLengthL QuadricepsFiberLengthL AdductorFiberLengthL GluteusMaximusR GluteusMediusR GluteusMinimusR HipFlexorsR PeroneusR GastrocR TibialisAnteriorR TibialisPosteriorR HamstringsFiberLengthR QuadricepsFiberLengthR AdductorFiberLengthR
  mtp_results_directory: mtpResults
  enforce_bilateral_symmetry: false
  MuscleTendonLengthInitialization: is_enabled=false
  SynergySet:
    Synergy: muscle_group_name=right_side num_synergies=6
    Synergy: muscle_group_name=left_side num_synergies=6
