# OpenSim document version 40000
TrackingOptimizationTool:
  results_directory: C:\Users\marle\Documents\GitHub\nmsm-core\src\TrackingOptimization
  input_directory: preprocessed
  input_model_file: exampleModel.osim
  type_of_controller: synergy_driven
  osimx_file: Mtp_Ncp_muscleModel.osimx
  belt_speed: 1.4
  v_max_factor: 10
  solver_type: ipopt
  solver_tolerance: 1e-3
  step_size: 1e-8
  collocation_points: 5
  max_iterations: 2e4
  InitialGuessSet: states_file=states.sto control_file=control.sto parameter_file=parameter.sto
  SynergySet:
    Synergy: muscle_group_name=group1 num_synergies=6
    Synergy: muscle_group_name=group2 num_synergies=6
  # NCP synergies, muscle activations
  # GCP inputs
  TrackingOptimizationDesignVariableBounds: joint_positions=2 joint_velocities=1.5 joint_accelerations=1 joint_jerks=1
      synergy_commands=10 synergy_weights=0.15
  TrackingOptimizationIntegralTerms:
    TrackingTerms:
      TrackedCoordinateList: is_enabled=true cost_weight=1
        TrackedCoordinate pelvis_tilt: is_enabled=true max_allowable_error=0.1
        TrackedCoordinate pelvis_list: is_enabled=true max_allowable_error=0.1
        TrackedCoordinate pelvis_rotation: is_enabled=true max_allowable_error=0.1
        TrackedCoordinate pelvis_tx: is_enabled=true max_allowable_error=0.02
        TrackedCoordinate pelvis_ty: is_enabled=true max_allowable_error=0.02
        TrackedCoordinate pelvis_tz: is_enabled=true max_allowable_error=0.02
        TrackedCoordinate hip_flexion_r: is_enabled=true max_allowable_error=0.05
        TrackedCoordinate hip_adduction_r: is_enabled=true max_allowable_error=0.05
        TrackedCoordinate hip_rotation_r: is_enabled=true max_allowable_error=0.05
        TrackedCoordinate knee_angle_r: is_enabled=true max_allowable_error=0.05
        TrackedCoordinate ankle_angle_r: is_enabled=true max_allowable_error=0.05
        TrackedCoordinate subtalar_angle_r: is_enabled=true max_allowable_error=0.05
        TrackedCoordinate mtp_angle_r: is_enabled=true max_allowable_error=0.05
        TrackedCoordinate hip_flexion_l: is_enabled=true max_allowable_error=0.05
        TrackedCoordinate hip_adduction_l: is_enabled=true max_allowable_error=0.05
        TrackedCoordinate hip_rotation_l: is_enabled=true max_allowable_error=0.05
        TrackedCoordinate knee_angle_l: is_enabled=true max_allowable_error=0.05
        TrackedCoordinate ankle_angle_l: is_enabled=true max_allowable_error=0.05
        TrackedCoordinate subtalar_angle_l: is_enabled=true max_allowable_error=0.05
        TrackedCoordinate mtp_angle_l: is_enabled=true max_allowable_error=0.05
        TrackedCoordinate lumbar_extension: is_enabled=true max_allowable_error=0.05
        TrackedCoordinate lumbar_bending: is_enabled=true max_allowable_error=0.05
        TrackedCoordinate lumbar_rotation: is_enabled=true max_allowable_error=0.05
        TrackedCoordinate arm_flex_r: is_enabled=true max_allowable_error=0.1
        TrackedCoordinate arm_add_r: is_enabled=true max_allowable_error=0.1
        TrackedCoordinate arm_rot_r: is_enabled=true max_allowable_error=0.1
        TrackedCoordinate elbow_flex_r: is_enabled=true max_allowable_error=0.1
        TrackedCoordinate arm_flex_l: is_enabled=true max_allowable_error=0.1
        TrackedCoordinate arm_add_l: is_enabled=true max_allowable_error=0.1
        TrackedCoordinate arm_rot_l: is_enabled=true max_allowable_error=0.1
        TrackedCoordinate elbow_flex_l: is_enabled=true max_allowable_error=0.1
      TrackedInverseDynamicLoadsList: is_enabled=true cost_weight=1
        TrackedLoad [values shared by the 25 below unless stated]: is_enabled=true max_allowable_error=10
        TrackedLoad hip_flexion_r_moment
        TrackedLoad hip_adduction_r_moment
        TrackedLoad hip_rotation_r_moment
        TrackedLoad knee_angle_r_moment
        TrackedLoad ankle_angle_r_moment
        TrackedLoad subtalar_angle_r_moment
        TrackedLoad mtp_angle_r_moment: max_allowable_error=5
        TrackedLoad hip_flexion_l_moment
        TrackedLoad hip_adduction_l_moment
        TrackedLoad hip_rotation_l_moment
        TrackedLoad knee_angle_l_moment
        TrackedLoad ankle_angle_l_moment
        TrackedLoad subtalar_angle_l_moment
        TrackedLoad mtp_angle_l_moment: max_allowable_error=5
        TrackedLoad lumbar_extension_moment: max_allowable_error=5
        TrackedLoad lumbar_bending_moment: max_allowable_error=5
        TrackedLoad lumbar_rotation_moment: max_allowable_error=5
        TrackedLoad arm_flex_r_moment
        TrackedLoad arm_add_r_moment
        TrackedLoad arm_rot_r_moment
        TrackedLoad elbow_flex_r_moment
        TrackedLoad arm_flex_l_moment
        TrackedLoad arm_add_l_moment
        TrackedLoad arm_rot_l_moment
        TrackedLoad elbow_flex_l_moment
      TrackedExternalForceList: is_enabled=true cost_weight=1
        TrackedExternalForce ground_reaction_force_x: is_enabled=true max_allowable_error=10 body=calcn_l
            point=(0.0906 0.0328 0.0076)
        TrackedExternalForce ground_reaction_force_y: is_enabled=true max_allowable_error=20 body=calcn_l
            point=(0.0906 0.0328 0.0076)
        TrackedExternalForce ground_reaction_force_z: is_enabled=true max_allowable_error=10 body=calcn_l
            point=(0.0906 0.0328 0.0076)
        TrackedExternalForce ground_reaction_force_x1: is_enabled=true max_allowable_error=10 body=calcn_r
            point=(0.0893 0.0316 -0.0128)
        TrackedExternalForce ground_reaction_force_y1: is_enabled=true max_allowable_error=20 body=calcn_r
            point=(0.0893 0.0316 -0.0128)
        TrackedExternalForce ground_reaction_force_z1: is_enabled=true max_allowable_error=10 body=calcn_r
            point=(0.0893 0.0316 -0.0128)
      TrackedExternalMomentList: is_enabled=true cost_weight=1
        TrackedExternalMoment [values shared by the 6 below unless stated]: is_enabled=true max_allowable_error=10
        TrackedExternalMoment ground_reaction_moment_x
        TrackedExternalMoment ground_reaction_moment_y
        TrackedExternalMoment ground_reaction_moment_z
        TrackedExternalMoment ground_reaction_moment_x1
        TrackedExternalMoment ground_reaction_moment_y1
        TrackedExternalMoment ground_reaction_moment_z1
      TrackedMuscleActivations: is_enabled=true cost_weight=1 max_allowable_error=0.1
    MinimizingTerms:
      MinimizeJointJerk: is_enabled=true cost_weight=1 max_allowable_error=2
  TrackingOptimizationPathConstraintTerms:
    RootSegmentResidualLoads: is_enabled=true
      RootSegmentResidualLoad pelvis_tilt_moment: is_enabled=true max_allowable_error=0.1 min_allowable_error=-0.1
      RootSegmentResidualLoad pelvis_list_moment: is_enabled=true max_allowable_error=0.1 min_allowable_error=-0.1
      RootSegmentResidualLoad pelvis_rotation_moment: is_enabled=true max_allowable_error=0.1 min_allowable_error=-0.1
      RootSegmentResidualLoad pelvis_tx_force: is_enabled=true max_allowable_error=1 min_allowable_error=-1
      RootSegmentResidualLoad pelvis_ty_force: is_enabled=true max_allowable_error=1 min_allowable_error=-1
      RootSegmentResidualLoad pelvis_tz_force: is_enabled=true max_allowable_error=1 min_allowable_error=-1
    MuscleModelMomentConsistency: is_enabled=true
      MuscleModelLoad [values shared by the 15 below unless stated]: is_enabled=true max_allowable_error=0.1
          min_allowable_error=-0.1
      MuscleModelLoad hip_flexion_r_moment
      MuscleModelLoad hip_adduction_r_moment
      MuscleModelLoad hip_rotation_r_moment
      MuscleModelLoad knee_angle_r_moment
      MuscleModelLoad ankle_angle_r_moment
      MuscleModelLoad subtalar_angle_r_moment
      MuscleModelLoad hip_flexion_l_moment
      MuscleModelLoad hip_adduction_l_moment
      MuscleModelLoad hip_rotation_l_moment
      MuscleModelLoad knee_angle_l_moment
      MuscleModelLoad ankle_angle_l_moment
      MuscleModelLoad subtalar_angle_l_moment
      MuscleModelLoad lumbar_extension_moment
      MuscleModelLoad lumbar_bending_moment
      MuscleModelLoad lumbar_rotation_moment
  TrackingOptimizationTerminalConstraintTerms:
    StatePositionPeriodicity: is_enabled=true max_allowable_error=0.0087 min_allowable_error=-0.0087
    StateVelocityPeriodicity: is_enabled=true max_allowable_error=0.0175 min_allowable_error=-0.0175
    RootSegmentResidualLoadPeriodicity: is_enabled=false max_allowable_error=0.1 min_allowable_error=-0.1
    ExternalForcePeriodicity: is_enabled=true max_allowable_error=20 min_allowable_error=-20
    ExternalMomentPeriodicity: is_enabled=false max_allowable_error=0.1 min_allowable_error=-0.1
    SynergyWeightsSum: is_enabled=true max_allowable_error=1 min_allowable_error=1
