# OpenSim document version 40000
MuscleTendonPersonalizationTool:
  input_directory: preprocessed
  input_model_file: CPRIT_Patient3_MuscleGroups.osim
  muscle_specific_electromechanical_delays: false
  muscle_specific_activation_time_constant: false
  v_max_factor: 10
  max_iterations: 2e3
  max_function_evaluations: 1e8
  MuscleTendonPersonalizationTaskList:
    MuscleTendonPersonalizationTask: is_enabled=true index=1 optimize_electromechanical_delays=true
        optimize_activation_time_constants=true optimize_activation_nonlinearity_constants=true
        optimize_emg_scale_factors=false optimize_optimal_fiber_lengths=false optimize_tendon_slack_lengths=false
    MuscleTendonPersonalizationTask: is_enabled=true index=2 optimize_electromechanical_delays=false
        optimize_activation_time_constants=false optimize_activation_nonlinearity_constants=false
        optimize_emg_scale_factors=true optimize_optimal_fiber_lengths=true optimize_tendon_slack_lengths=true
    MuscleTendonPersonalizationTask: is_enabled=true index=3 optimize_electromechanical_delays=true
        optimize_activation_time_constants=true optimize_activation_nonlinearity_constants=true
        optimize_emg_scale_factors=false optimize_optimal_fiber_lengths=false optimize_tendon_slack_lengths=false
    MuscleTendonPersonalizationTask: is_enabled=true index=4 optimize_electromechanical_delays=false
        optimize_activation_time_constants=false optimize_activation_nonlinearity_constants=false
        optimize_emg_scale_factors=true optimize_optimal_fiber_lengths=true optimize_tendon_slack_lengths=true
    MuscleTendonPersonalizationTask: is_enabled=true index=5 optimize_electromechanical_delays=true
        optimize_activation_time_constants=true optimize_activation_nonlinearity_constants=true
        optimize_emg_scale_factors=true optimize_optimal_fiber_lengths=true optimize_tendon_slack_lengths=true
  MuscleTendonCostFunctionTerms:
    IndividualMuscles:
      InverseDynamicJointMoments: is_enabled=true max_allowable_error=2
      ActivationTimeConstant: is_enabled=true max_allowable_error=0.02 error_center=0.015
      ActivationNonlinearityConstant: is_enabled=true max_allowable_error=0.1
      OptimalMuscleFiberLength: is_enabled=true max_allowable_error=0.1
      TendonSlackLength: is_enabled=true max_allowable_error=0.1
      EmgScalingFactors: is_enabled=true max_allowable_error=0.3 error_center=0.5
      NormalizedMuscleFiberLength: is_enabled=true max_allowable_error=0.1
      PassiveMuscleForces: is_enabled=true max_allowable_error=30
    GroupedMuscles:
      NormalizedMuscleFiberLength: is_enabled=true max_allowable_error=0.05
      EmgScalingFactors: is_enabled=true max_allowable_error=0.1
      ElectromechanicalDelay: is_enabled=true max_allowable_error=0.1 muscle_specific_electromechanical_delays=false
  GroupedMuscles:
    GroupedActivationTimeConstants: musclegroups=AdductorActivationGroupL musclegroups=BicepsFemActivationGroupL
        musclegroups=GastrocActivationGroupL musclegroups=GluteusMaxActivationGroupL
        musclegroups=GluteusMedActivationGroupL musclegroups=GluteusMinActivationGroupL
        musclegroups=IliopsoasActivationGroupL musclegroups=HamstringActivationGroupL
        musclegroups=QuadricepActivationGroupL
    GroupedNormalizedMuscleFiberLengths: musclegroups=AdductorFiberLengthGroupL
        musclegroups=GluteusMaxFiberLengthGroupL musclegroups=GluteusMedFiberLengthGroupL
        musclegroups=GluteusMinFiberLengthGroupL musclegroups=QuadricepFiberLengthGroupL
        musclegroups=HamstringFiberLengthGroupL musclegroups=PeroneusFiberLengthGroupL
        musclegroups=IliopsoasFiberLengthGroupL musclegroups=GastrocFiberLengthGroupL
