# OpenSim document version 40000
NeuralControlPersonalizationTool:
  input_directory: preprocessed
  input_directory_MTP: MTP_results
  input_model_file: MTP_updatedmodel.osim
  mtp_coordinate_list: hip_adduction_r hip_flexion_r hip_rotation_r knee_angle_r ankle_angle_r subtalar_angle_r hip_adduction_l hip_flexion_l hip_rotation_l knee_angle_l ankle_angle_l subtalar_angle_l
  ncp_coordinate_list: lumbar_extension lumbar_bending lumbar_rotation
  muscle_tendon_parameter_initialization: true
  enforce_bilateral_symmetry: false
  num_synergies_per_synergy_group: 5
  max_iterations: 2e3
  max_function_evaluations: 1e8
  NCP_Synergy_group_list: group=(right_leg_muscles right_trunk_muscles) group=(left_leg_muscles left_trunk_muscles)
  NeuralControlPersonalizationTerms:
    InverseDynamicJointMomentsTracking: is_enabled=true max_allowable_error=5
    EMGActivationfromMTPResultsTracking: is_enabled=true max_allowable_error=0.01
    ActivationEstimationfornonMTPMuscles: is_enabled=true max_allowable_error=0.05
    GroupedMuscles:
      GroupedActivations: is_enabled=false max_allowable_error=0.1 musclegroups=AdductorActivationGroupR
          musclegroups=BicepsFemActivationGroupR musclegroups=GastrocActivationGroupR
          musclegroups=GluteusMaxActivationGroupR musclegroups=GluteusMedActivationGroupR
          musclegroups=GluteusMinActivationGroupR musclegroups=IliopsoasActivationGroupR
          musclegroups=HamstringActivationGroupR musclegroups=QuadricepActivationGroupR
          musclegroups=AdductorActivationGroupL musclegroups=BicepsFemActivationGroupL
          musclegroups=GastrocActivationGroupL musclegroups=GluteusMaxActivationGroupL
          musclegroups=GluteusMedActivationGroupL musclegroups=GluteusMinActivationGroupL
          musclegroups=IliopsoasActivationGroupL musclegroups=HamstringActivationGroupL
          musclegroups=QuadricepActivationGroupL
      GroupedSynergyWeights: is_enabled=false max_allowable_error=0.1 musclegroups=AdductorActivationGroupR
          musclegroups=BicepsFemActivationGroupR musclegroups=GastrocActivationGroupR
          musclegroups=GluteusMaxActivationGroupR musclegroups=GluteusMedActivationGroupR
          musclegroups=GluteusMinActivationGroupR musclegroups=IliopsoasActivationGroupR
          musclegroups=HamstringActivationGroupR musclegroups=QuadricepActivationGroupR
          musclegroups=AdductorActivationGroupL musclegroups=BicepsFemActivationGroupL
          musclegroups=GastrocActivationGroupL musclegroups=GluteusMaxActivationGroupL
          musclegroups=GluteusMedActivationGroupL musclegroups=GluteusMinActivationGroupL
          musclegroups=IliopsoasActivationGroupL musclegroups=HamstringActivationGroupL
          musclegroups=QuadricepActivationGroupL
