# OpenSim document version 40000
MuscleTendonPersonalizationTool:
  results_directory: \\smb.rdf.rice.edu\research\bjf5\RCNL\SharedData\Projects\Di2Ma\MTP_testing_folder\MTP_Patient4_Data\mtpResults
  input_directory: preprocessed
  input_model_file: optModel_MuscleGroups_LeftMusclesActive_NewSynx.osim
  perform_precalibration: true
  muscle_specific_electromechanical_delays: false
  muscle_specific_activation_time_constant: false
  v_max_factor: 10
  maximum_muscle_stress: 610e3
  max_iterations: 2e3
  max_function_evaluations: 1e8
  trial_prefixes: speed1_gait_1 speed1_gait_2 speed2_squat_1 speed2_squat_2
  task_prefixes: speed1 speed2
  MuscleTendonPersonalizationTaskList:
    MuscleTendonPersonalizationTask: is_enabled=true optimize_electromechanical_delays=true
        optimize_activation_time_constants=true optimize_activation_nonlinearity_constants=true
        optimize_emg_scale_factors=true optimize_optimal_fiber_lengths=true optimize_tendon_slack_lengths=true
        perform_synergy_extrapolation=true
  MuscleTendonCostFunctionTerms:
    IndividualMuscles:
      InverseDynamicJointMoments: is_enabled=true max_allowable_error=2
      ActivationTimeConstant: is_enabled=true max_allowable_error=0.02 error_center=0.015
      ActivationNonlinearityConstant: is_enabled=true max_allowable_error=0.1
      OptimalMuscleFiberLength: is_enabled=true max_allowable_error=0.1
      TendonSlackLength: is_enabled=true max_allowable_error=0.1
      EmgScalingFactors: is_enabled=true max_allowable_error=0.2 error_center=0.3
      NormalizedMuscleFiberLength: is_enabled=true max_allowable_error=0.1
      PassiveMuscleForces: is_enabled=true max_allowable_error=50
    PairedMuscles:
      NormalizedMuscleFiberLength: is_enabled=true max_allowable_error=0.05
      EmgScalingFactors: is_enabled=true max_allowable_error=0.1
      ElectromechanicalDelay: is_enabled=true max_allowable_error=0.2 muscle_specific_electromechanical_delays=false
    SynergyExtrapolationSettings: matrix_factorization_method=PCA number_of_synergies=5
        synergy_extrapolation_categorization=trial residual_categorization=task
      MeasuredInverseDynamicJointMoments: is_enabled=true max_allowable_error=2.5
      ExtrapolatedMuscleActivations: is_enabled=true max_allowable_error=0.3
      ResidualMuscleActivations: is_enabled=true max_allowable_error=0.3
  PreCalibrationSettings: passive_data_input_directory=thelen
      passive_trial_prefixes=(Thelen_HipPassive_01 Thelen_HipPassive_02 Thelen_HipPassive_03 Thelen_HipPassive_04 Thelen_KneePassive_01 Thelen_KneePassive_02 Thelen_KneePassive_03 Thelen_KneePassive_04 Thelen_AnklePassive_01 Thelen_AnklePassive_02 Thelen_AnklePassive_03 Thelen_AnklePassive_04)
      max_normalized_muscle_fiber_length=1 min_normalized_muscle_fiber_length=0.6 optimize_maximum_muscle_stress=true
      optimize_isometric_max_force=true
  PreCalibrationCostFunctionTerms:
    IndividualMuscles:
      PassiveJointMoments: is_enabled=true max_allowable_error=2
      OptimalMuscleFiberLength: is_enabled=true max_allowable_error=0.3 error_center=1
      TendonSlackLength: is_enabled=true max_allowable_error=1 error_center=1
      MinimumNormalizedMuscleFiberLength: is_enabled=true max_allowable_error=0.3
      MaximumNormalizedMuscleFiberLength: is_enabled=true max_allowable_error=0.03
      MaximumMuscleStress: is_enabled=true max_allowable_error=0.1 error_center=1.2
      PassiveMuscleForces: is_enabled=true max_allowable_error=10
    PairedMuscles:
      NormalizedMuscleFiberLength: is_enabled=true max_allowable_error=0.1
      MaximumNormalizedMuscleFiberLength: is_enabled=true max_allowable_error=0.1
  PairedMuscles:
    PairedActivationTimeConstants: musclepairs=AdductorActivationGroupL musclepairs=GluteusMaxActivationGroupL
        musclepairs=GluteusMedActivationGroupL musclepairs=GluteusMinActivationGroupL
        musclepairs=IliopsoasActivationGroupL musclepairs=HamstringActivationGroupL
        musclepairs=BicepsFemActivationGroupL musclepairs=PeroneusActivationGroupL
    PairedNormalizedMuscleFiberLengths: musclepairs=AdductorFiberLengthGroupL musclepairs=GluteusMaxFiberLengthGroupL
        musclepairs=GluteusMedFiberLengthGroupL musclepairs=GluteusMinFiberLengthGroupL
        musclepairs=QuadricepFiberLengthGroupL musclepairs=HamstringFiberLengthGroupL
        musclepairs=PeroneusFiberLengthGroupL musclepairs=IliopsoasFiberLengthGroupL
        musclepairs=GastrocFiberLengthGroupL musclepairs=TibialisAnteriorFiberLengthGroupL
        musclepairs=TibialisPosteriorFiberLengthGroupL
    PairedMissingEmgChannels: musclepairs=AddLongMissingEmgChannelL musclepairs=ExtDigLongMissingEmgChannelL
        musclepairs=FlexDigLongMissingEmgChannelL musclepairs=IliopsoasMissingEmgChannelL
        musclepairs=PeroneusLongMissingEmgChannelL musclepairs=RecFemMissingEmgChannelL
        musclepairs=TibPostMissingEmgChannelL musclepairs=VastMedMissingEmgChannelL
