# OpenSim document version 40000
Model:
  Ground
  BodySet:
    Body calcn_r: mass=1.37532 [kg] mass_center=(0.1064144 0.03192431 0)
        inertia=(0.001744304 0.004859132 0.005108319 0 0 0) meshes=r_foot.vtp
    Body toes_r: mass=0.2383154 mass_center=(0.03681937 0.006384861 -0.01862251)
        inertia=(0.0001245931 0.0002491863 0.001245931 0 0 0) meshes=r_bofoot.vtp
  JointSet:
    PinJoint mtp_r: socket_parent_frame=calcn_r_offset socket_child_frame=toes_r_offset
      Coordinate mtp_angle_r: default_value=0 range=(-0.5235988 0.5235988) clamped=true
      PhysicalOffsetFrame calcn_r_offset: socket_parent=/bodyset/calcn_r
          translation=(0.1902689 -0.002128287 0.001149275) [meters] orientation=(-3.14159 0.619901 0) [radians]
      PhysicalOffsetFrame toes_r_offset: socket_parent=/bodyset/toes_r translation=(0 0 0)
          orientation=(-3.14159 0.619901 0)
    CustomJoint ground_hindfoot: socket_parent_frame=/ground socket_child_frame=/bodyset/calcn_r
      SpatialTransform:
        TransformAxis rotation1: axis=(0 1 0)
        TransformAxis rotation2: axis=(1 0 0)
        TransformAxis rotation3: axis=(0 0 1)
        TransformAxis translation1: axis=(1 0 0)
        TransformAxis translation2: axis=(0 1 0)
        TransformAxis translation3: axis=(0 0 1)
  MarkerSet:
    Marker R.Heel: calcn_r (-0.0223884 0.01760997 -0.008902916)
    Marker R.Toe: toes_r (0.07249303 0.01569101 0.01134843)
    Marker R.Midfoot.Lateral: calcn_r (0.05402307 -0.0009344738 0.04565194)
    Marker R.Midfoot.Superior: calcn_r (0.1469769 0.05898181 0.00657462)
    Marker R.Toe.Lateral: calcn_r (0.1754662 -0.0115258 0.06529571)
    Marker R.Toe.Medial: calcn_r (0.1851769 -0.002786777 -0.0448537)
