# OpenSim document version 40000
GroundContactPersonalizationTool:
  input_model_file: optModel_v6_correct_height.osim
  input_motion_file: CPRIT_Patient3_NormalGait_1pt0_01_Right_75_ik.mot
  input_grf_file: CPRIT_Patient3_NormalGait_1pt0_01_Right_75_GRF.mot
  kinematics_filter_cutoff: 6
  resting_spring_length_initialization_is_enabled: true
  max_iterations: 1e3
  max_function_evaluations: 3e6
  FootPersonalizationTaskList:
    FootPersonalizationTask: is_enabled=true index=1 is_left_foot=false start_time=81.181 end_time=82.286 belt_speed=1
        force_columns=(F2x F2y F2z) moment_columns=(M2x M2y M2z) electrical_center_columns=(EC2x EC2y EC2z)
        toe_coordinate=mtp_angle_r toe_joint=mtp_r toe_marker=R.Toe medial_marker=R.Toe.Medial
        lateral_marker=R.Toe.Lateral heel_marker=R.Heel midfoot_superior_marker=R.Midfoot.Superior
    FootPersonalizationTask: is_enabled=false index=2 is_left_foot=true start_time=81.181 end_time=82.286 belt_speed=1
        force_columns=(F1x F1y F1z) moment_columns=(M1x M1y M1z) electrical_center_columns=(EC1x EC1y EC1z)
        toe_coordinate=mtp_angle_l toe_joint=mtp_l toe_marker=L.Toe medial_marker=L.Toe.Medial
        lateral_marker=L.Toe.Lateral heel_marker=L.Heel midfoot_superior_marker=L.Midfoot.Superior
  GroundContactPersonalizationTaskList:
    GroundContactPersonalizationTask: is_enabled=true index=1
      DesignVariables: springConstants=true dampingFactor=false dynamicFrictionCoefficient=true
          restingSpringLength=true kinematicsBSplineCoefficients=true
      CostFunctionTerms:
        markerPositionError: is_enabled=false max_allowable_error=0.02
        rotationError: is_enabled=true max_allowable_error=4
        translationError: is_enabled=true max_allowable_error=0.01
        coordinateCoefficientError: is_enabled=false max_allowable_error=0.01
        verticalGrfError: is_enabled=true max_allowable_error=5
        horizontalGrfError: is_enabled=true max_allowable_error=20
        groundReactionMomentError: is_enabled=true max_allowable_error=10
        springConstantErrorFromMean: is_enabled=false max_allowable_error=2000
        springConstantErrorFromNeighbors: is_enabled=true max_allowable_error=2000 standard_deviation=0.05
    GroundContactPersonalizationTask: is_enabled=true index=1
      DesignVariables: springConstants=true dampingFactor=false dynamicFrictionCoefficient=true
          restingSpringLength=false kinematicsBSplineCoefficients=true
      CostFunctionTerms:
        markerPositionError: is_enabled=false max_allowable_error=0.02
        rotationError: is_enabled=true max_allowable_error=4
        translationError: is_enabled=true max_allowable_error=0.01
        coordinateCoefficientError: is_enabled=false max_allowable_error=0.01
        verticalGrfError: is_enabled=true max_allowable_error=5
        horizontalGrfError: is_enabled=true max_allowable_error=5
        groundReactionMomentError: is_enabled=true max_allowable_error=10
        springConstantErrorFromMean: is_enabled=false max_allowable_error=2000
        springConstantErrorFromNeighbors: is_enabled=true max_allowable_error=2000 standard_deviation=0.05
    GroundContactPersonalizationTask: is_enabled=true index=1
      DesignVariables: springConstants=true dampingFactor=false dynamicFrictionCoefficient=true
          restingSpringLength=false kinematicsBSplineCoefficients=true
      CostFunctionTerms:
        markerPositionError: is_enabled=false max_allowable_error=0.02
        markerSlopeError: is_enabled=false max_allowable_error=0.1
        rotationError: is_enabled=true max_allowable_error=4
        translationError: is_enabled=true max_allowable_error=0.01
        coordinateCoefficientError: is_enabled=false max_allowable_error=0.001
        verticalGrfError: is_enabled=true max_allowable_error=5
        verticalGrfSlopeError: is_enabled=false max_allowable_error=10
        horizontalGrfError: is_enabled=true max_allowable_error=5
        horizontalGrfSlopeError: is_enabled=false max_allowable_error=10
        groundReactionMomentError: is_enabled=true max_allowable_error=2
        groundReactionMomentSlopeError: is_enabled=false max_allowable_error=10
        springConstantErrorFromMean: is_enabled=false max_allowable_error=2000
        springConstantErrorFromNeighbors: is_enabled=true max_allowable_error=2000 standard_deviation=0.05
  InitialValues: RestingSpringLength=0.05 SpringConstants=2500 DampingFactor=1e-4 DynamicFrictionCoefficient=0.25
