# OpenSim document version 40000
Model platedModel.osim:
  gravity: 0 -9.80665 0
  length_units: meters
  force_units: N
  credits:
    Rajagopal, A, Dembia, C.L., DeMers, M.S., Delp, D.D., Hicks, J.L., and Delp, S.L.
  publications:
    Rajagopal, Apoorva, et al. "Full-Body Musculoskeletal Model for Muscle-Driven Simulation of Human Gait." IEEE Transactions on Biomedical Engineering 63.10 (2016): 2068-2079. (2016)
  Ground
  BodySet:
    Body pelvis: mass=12.87965 [kg] mass_center=(-0.06595603 0 0) inertia=(0.133548 0.133548 0.05602999 0 0 0)
        meshes=(ship03RightPelvis_Repositioned_m_decimated_opt_fine.stl ship03LeftPelvis_Repositioned_m_decimated_opt_fine.stl ship03Sacrum_m_GenericScaled.stl)
    Body femur_r: mass=10.17227 mass_center=(0 -0.1584063 0) inertia=(0.1289088 0.036858 0.1289088 0 0 0)
        meshes=r_femur.vtp
    Body tibia_r: mass=4.054625 mass_center=(0 -0.1914205 0) inertia=(0.05794131 0.005863109 0.05874605 0 0 0)
        meshes=(r_tibia.vtp r_fibula.vtp)
    Body patella_r: mass=0.09427072 mass_center=(0.0018 0.0264 0) inertia=(3.138712e-6 1.433746e-5 1.433746e-5 0 0 0)
        meshes=r_patella.vtp
    Body talus_r: mass=0.1093628 mass_center=(0 0 0) inertia=(0.001238426 0.001238426 0.001238426 0 0 0)
        meshes=r_talus.stl
    Body calcn_r: mass=1.367035 mass_center=(0.1064144 0.03192431 0)
        inertia=(0.001733796 0.004829861 0.005077546 0 0 0) meshes=r_foot.vtp
    Body toes_r: mass=0.2368798 mass_center=(0.03681937 0.006384861 -0.01862251)
        inertia=(0.0001238426 0.0002476852 0.001238426 0 0 0) meshes=r_bofoot.vtp
    Body femur_l: mass=10.17227 mass_center=(0 -0.1584063 0) inertia=(0.1289088 0.036858 0.1289088 0 0 0)
        meshes=l_femur.vtp
    Body tibia_l: mass=4.054625 mass_center=(0 -0.1914205 0) inertia=(0.05794131 0.005863109 0.05874605 0 0 0)
        meshes=(l_tibia.vtp l_fibula.vtp)
    Body patella_l: mass=0.09427072 mass_center=(0.0018 0.0264 0) inertia=(3.138712e-6 1.433746e-5 1.433746e-5 0 0 0)
        meshes=l_patella.vtp
    Body talus_l: mass=0.1093628 mass_center=(0 0 0) inertia=(0.001238426 0.001238426 0.001238426 0 0 0)
        meshes=l_talus.stl
    Body calcn_l: mass=1.367035 mass_center=(0.1064144 0.03192431 0)
        inertia=(0.001733796 0.004829861 0.005077546 0 0 0) meshes=l_foot.vtp
    Body toes_l: mass=0.2368798 mass_center=(0.03681937 0.006384861 0.01862251)
        inertia=(0.0001238426 0.0002476852 0.001238426 0 0 0) meshes=l_bofoot.vtp
    Body torso_lower: mass=0.1093628 mass_center=(0 0 0) inertia=(0.00131816 0.001653721 0.001653721 0 0 0)
        meshes=(hat_spine_lower.stl hat_ribs_9_12.stl)
    Body torso_upper: mass=29.33832 mass_center=(-0.04046081 0.3640307 0) inertia=(2.142554 1.180668 2.142554 0 0 0)
        meshes=(hat_spine_upper.stl hat_ribs_1_8.stl hat_jaw.vtp hat_skull.vtp hat_scap.stl)
    Body humerus_r: mass=2.222798 mass_center=(0 -0.1791779 0) inertia=(0.01549953 0.005346857 0.01739772 0 0 0)
        meshes=humerus_rv.vtp
    Body ulna_r: mass=0.6643789 mass_center=(0 -0.128331 0) inertia=(0.003672512 0.0007662433 0.003983721 0 0 0)
        meshes=ulna_rv.vtp
    Body radius_r: mass=0.6643789 mass_center=(0 -0.128331 0) inertia=(0.003672512 0.0007662433 0.003983721 0 0 0)
        meshes=radius_rv.vtp
    Body hand_r: mass=0.5003347 mass_center=(0 -0.068095 0) inertia=(0.000975516 0.0005982144 0.001465461 0 0 0)
        meshes=(pisiform_rvs.vtp lunate_rvs.vtp scaphoid_rvs.vtp triquetrum_rvs.vtp hamate_rvs.vtp capitate_rvs.vtp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)
    Body humerus_l: mass=2.222798 mass_center=(0 -0.1791779 0) inertia=(0.01549953 0.005346857 0.01739772 0 0 0)
        meshes=humerus_lv.vtp
    Body ulna_l: mass=0.6643789 mass_center=(0 -0.128331 0) inertia=(0.003672512 0.0007662433 0.003983721 0 0 0)
        meshes=ulna_lv.vtp
    Body radius_l: mass=0.6643789 mass_center=(0 -0.128331 0) inertia=(0.003672512 0.0007662433 0.003983721 0 0 0)
        meshes=radius_lv.vtp
    Body hand_l: mass=0.5003347 mass_center=(0 -0.068095 0) inertia=(0.000975516 0.0005982144 0.001465461 0 0 0)
        meshes=(pisiform_lvs.vtp lunate_lvs.vtp scaphoid_lvs.vtp triquetrum_lvs.vtp hamate_lvs.vtp capitate_lvs.vtp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)
    Body calcn_l_markerPlate: mass=0 mass_center=(0 0 0) inertia=(0 0 0 0 0 0)
    Body calcn_r_markerPlate: mass=0 mass_center=(0 0 0) inertia=(0 0 0 0 0 0)
    Body femur_l_markerPlate: mass=0 mass_center=(0 0 0) inertia=(0 0 0 0 0 0)
    Body femur_r_markerPlate: mass=0 mass_center=(0 0 0) inertia=(0 0 0 0 0 0)
    Body humerus_l_markerPlate: mass=0 mass_center=(0 0 0) inertia=(0 0 0 0 0 0)
    Body humerus_r_markerPlate: mass=0 mass_center=(0 0 0) inertia=(0 0 0 0 0 0)
    Body patella_l_markerPlate: mass=0 mass_center=(0 0 0) inertia=(0 0 0 0 0 0)
    Body patella_r_markerPlate: mass=0 mass_center=(0 0 0) inertia=(0 0 0 0 0 0)
    Body pelvis_markerPlate: mass=0 mass_center=(0 0 0) inertia=(0 0 0 0 0 0)
    Body radius_l_markerPlate: mass=0 mass_center=(0 0 0) inertia=(0 0 0 0 0 0)
    Body radius_r_markerPlate: mass=0 mass_center=(0 0 0) inertia=(0 0 0 0 0 0)
    Body tibia_l_markerPlate: mass=0 mass_center=(0 0 0) inertia=(0 0 0 0 0 0)
    Body tibia_r_markerPlate: mass=0 mass_center=(0 0 0) inertia=(0 0 0 0 0 0)
    Body toes_l_markerPlate: mass=0 mass_center=(0 0 0) inertia=(0 0 0 0 0 0)
    Body toes_r_markerPlate: mass=0 mass_center=(0 0 0) inertia=(0 0 0 0 0 0)
    Body torso_lower_markerPlate: mass=0 mass_center=(0 0 0) inertia=(0 0 0 0 0 0)
    Body torso_upper_markerPlate: mass=0 mass_center=(0 0 0) inertia=(0 0 0 0 0 0)
  JointSet:
    CustomJoint ground_pelvis: socket_parent_frame=ground_offset socket_child_frame=pelvis_offset
      Coordinate pelvis_tilt: default_value=0 range=(-1.570796 1.570796) clamped=true
      Coordinate pelvis_list: default_value=0 range=(-1.570796 1.570796) clamped=true
      Coordinate pelvis_rotation: default_value=0 range=(-1.570796 1.570796) clamped=true
      Coordinate pelvis_tx: default_value=0 range=(-5 5) clamped=true
      Coordinate pelvis_ty: default_value=0.91 range=(-1 2) clamped=false
      Coordinate pelvis_tz: default_value=0 range=(-3 3) clamped=true
      PhysicalOffsetFrame ground_offset: socket_parent=/ground translation=(0 0 0) [meters]
      PhysicalOffsetFrame pelvis_offset: socket_parent=/bodyset/pelvis translation=(0 0 0)
      SpatialTransform:
        TransformAxis rotation1: coordinates=pelvis_tilt axis=(0 0 1) LinearFunction(coefficients=1 0)
        TransformAxis rotation2: coordinates=pelvis_list axis=(1 0 0) LinearFunction(coefficients=1 0)
        TransformAxis rotation3: coordinates=pelvis_rotation axis=(0 1 0) LinearFunction(coefficients=1 0)
        TransformAxis translation1: coordinates=pelvis_tx axis=(1 0 0) LinearFunction(coefficients=1 0)
        TransformAxis translation2: coordinates=pelvis_ty axis=(0 1 0) LinearFunction(coefficients=1 0)
        TransformAxis translation3: coordinates=pelvis_tz axis=(0 0 1) LinearFunction(coefficients=1 0)
    CustomJoint hip_r: socket_parent_frame=pelvis_offset socket_child_frame=femur_r_offset
      Coordinate hip_flexion_r: default_value=0 range=(-0.5235988 2.094395) clamped=true
      Coordinate hip_adduction_r: default_value=0 range=(-0.8726646 0.5235988) clamped=true
      Coordinate hip_rotation_r: default_value=0 range=(-0.6981317 0.6981317) clamped=true
      PhysicalOffsetFrame pelvis_offset: socket_parent=/bodyset/pelvis translation=(-0.05249988 -0.07444776 0.08831591)
      PhysicalOffsetFrame femur_r_offset: socket_parent=/bodyset/femur_r translation=(0 0 0)
      SpatialTransform: axes_held_at_zero=(translation1 translation2 translation3)
        TransformAxis rotation1: coordinates=hip_flexion_r axis=(0 0 1) LinearFunction(coefficients=1 0)
        TransformAxis rotation2: coordinates=hip_adduction_r axis=(1 0 0) LinearFunction(coefficients=1 0)
        TransformAxis rotation3: coordinates=hip_rotation_r axis=(0 1 0) LinearFunction(coefficients=1 0)
    CustomJoint knee_r: socket_parent_frame=femur_r_offset socket_child_frame=tibia_r_offset
      Coordinate knee_angle_r: default_value=1.542107e-5 range=(0 2.0944) clamped=true
      Coordinate knee_adduction_r: default_value=0.08197669 range=(-1 1) clamped=true locked=true
      PhysicalOffsetFrame femur_r_offset: socket_parent=/bodyset/femur_r
          translation=(-0.004193107 -0.381666 -0.001803307) orientation=(-0.07077003 0 0.1246163) [radians]
      PhysicalOffsetFrame tibia_r_offset: socket_parent=/bodyset/tibia_r
          translation=(-0.008294075 -0.003624173 -0.00152228) orientation=(-0.07077003 0 0.1246163)
      SpatialTransform:
        TransformAxis rotation1: coordinates=knee_angle_r axis=(0 0 -1) LinearFunction(coefficients=1 0)
        TransformAxis rotation2: coordinates=knee_adduction_r axis=(1 0 0) LinearFunction(coefficients=1 0)
        TransformAxis rotation3: coordinates=knee_angle_r axis=(0 1 0)
          SimmSpline: x=(0 0.174533 0.349066 0.523599 0.698132 0.872665 1.0472 1.22173 1.39626 1.5708 1.74533 1.91986 2.0944)
              y=(0 0.059461 0.109399 0.150618 0.18392 0.210107 0.229983 0.24435 0.254012 0.25977 0.262428 0.262788 0.261654)
        TransformAxis translation1: coordinates=knee_angle_r axis=(0 1 0)
          MultiplierFunction: scale=0.9318017
            SimmSpline: x=(0 0.174533 0.349066 0.523599 0.698132 0.872665 1.0472 1.22173 1.39626 1.5708 1.74533 1.91986 2.0944)
                y=(0 0.000301 0.000143 -0.000401 -0.001233 -0.002243 -0.003316 -0.004346 -0.005239 -0.005924 -0.006361 -0.006539 -0.00648)
        TransformAxis translation2: coordinates=knee_angle_r axis=(1 0 0)
          MultiplierFunction: scale=0.9318017
            SimmSpline: x=(0 0.174533 0.349066 0.523599 0.698132 0.872665 1.0472 1.22173 1.39626 1.5708 1.74533 1.91986 2.0944)
                y=(0 0.001055 0.002061 0.00289 0.003447 0.003676 0.003559 0.00311 0.002373 0.001418 0.000329 -0.000805 -0.001898)
        TransformAxis translation3: coordinates=knee_angle_r axis=(0 0 -1)
          MultiplierFunction: scale=-1.030461
            SimmSpline: x=(0 0.174533 0.349066 0.523599 0.698132 0.872665 1.0472 1.22173 1.39626 1.5708 1.74533 1.91986 2.0944)
                y=(0 5.3e-5 0.000188 0.000378 0.000597 0.000825 0.001045 0.001247 0.00142 0.001558 0.001661 0.001728 0.00176)
    CustomJoint patellofemoral_r: socket_parent_frame=femur_r_offset socket_child_frame=patella_r_offset
      Coordinate knee_angle_r_beta: default_value=0 range=(-99999.9 99999.9) clamped=false locked=true
      PhysicalOffsetFrame femur_r_offset: socket_parent=/bodyset/femur_r
          translation=(-0.007538275 -0.3801378 -0.002833768)
      PhysicalOffsetFrame patella_r_offset: socket_parent=/bodyset/patella_r translation=(0 0 0)
      SpatialTransform: axes_held_at_zero=(rotation2 rotation3)
        TransformAxis rotation1: coordinates=knee_angle_r_beta axis=(0 0 1)
          SimmSpline: x=(0 0.174533 0.349066 0.523599 0.698132 0.872665 1.0472 1.22173 1.39626 1.5708 1.74533 1.91986 2.0944)
              y=(0.00113686 -0.00629212 -0.105582 -0.253683 -0.414245 -0.579047 -0.747244 -0.91799 -1.09044 -1.26379 -1.43763 -1.61186 -1.78634)
        TransformAxis translation1: coordinates=knee_angle_r_beta axis=(1 0 0)
          MultiplierFunction: scale=0.9318017
            SimmSpline: x=(0 0.174533 0.349066 0.523599 0.698132 0.872665 1.0472 1.22173 1.39626 1.5708 1.74533 1.91986 2.0944)
                y=(0.0524 0.0488 0.0437 0.0371 0.0296 0.0216 0.0136 0.0057 -0.0019 -0.0088 -0.0148 -0.0196 -0.0227)
        TransformAxis translation2: coordinates=knee_angle_r_beta axis=(0 1 0)
          MultiplierFunction: scale=0.9318017
            SimmSpline: x=(0 0.174533 0.349066 0.523599 0.698132 0.872665 1.0472 1.22173 1.39626 1.5708 1.74533 1.91986 2.0944)
                y=(-0.0108 -0.019 -0.0263 -0.0322 -0.0367 -0.0395 -0.0408 -0.0404 -0.0384 -0.0349 -0.0301 -0.0245 -0.0187)
        TransformAxis translation3: axis=(0 0 1) MultiplierFunction(scale=1.030461, Constant(value=0.00275))
    PinJoint ankle_r: socket_parent_frame=tibia_r_offset socket_child_frame=talus_r_offset
      Coordinate ankle_angle_r: default_value=-8.787514e-11 range=(-0.6981317 0.5235988) clamped=false
      PhysicalOffsetFrame tibia_r_offset: socket_parent=/bodyset/tibia_r translation=(-0.01238133 -0.4031621 0)
          orientation=(0.201145 -0.0546 0.69513)
      PhysicalOffsetFrame talus_r_offset: socket_parent=/bodyset/talus_r translation=(0 0 0)
    CustomJoint subtalar_r: socket_parent_frame=talus_r_offset socket_child_frame=calcn_r_offset
      Coordinate subtalar_angle_r: default_value=3.473469e-10 range=(-0.1745 0.5236) clamped=true
      PhysicalOffsetFrame talus_r_offset: socket_parent=/bodyset/talus_r translation=(0 -0.0105488 0.001040227)
          orientation=(0 0.331422 0)
      PhysicalOffsetFrame calcn_r_offset: socket_parent=/bodyset/calcn_r
          translation=(0.0563381 0.04360836 -0.008555179) orientation=(0 0.1954952 0.7011063)
      SpatialTransform: axes_held_at_zero=(rotation2 rotation3 translation1 translation2 translation3)
        TransformAxis rotation1: coordinates=subtalar_angle_r axis=(1 0 0) LinearFunction(coefficients=1 0)
    PinJoint mtp_r: socket_parent_frame=calcn_r_offset socket_child_frame=toes_r_offset
      Coordinate mtp_angle_r: default_value=0 range=(-0.5235988 0.5235988) clamped=true
      PhysicalOffsetFrame calcn_r_offset: socket_parent=/bodyset/calcn_r
          translation=(0.1902689 -0.002128287 0.001149275) orientation=(-3.14159 0.619901 0)
      PhysicalOffsetFrame toes_r_offset: socket_parent=/bodyset/toes_r translation=(0 0 0)
          orientation=(-3.14159 0.619901 0)
    CustomJoint hip_l: socket_parent_frame=pelvis_offset socket_child_frame=femur_l_offset
      Coordinate hip_flexion_l: default_value=2.610152e-10 range=(-0.5235988 2.094395) clamped=true
      Coordinate hip_adduction_l: default_value=-1.401139e-10 range=(-0.8726646 0.5235988) clamped=true
      Coordinate hip_rotation_l: default_value=0 range=(-0.6981317 0.6981317) clamped=true
      PhysicalOffsetFrame pelvis_offset: socket_parent=/bodyset/pelvis
          translation=(-0.05249988 -0.07444776 -0.08831591)
      PhysicalOffsetFrame femur_l_offset: socket_parent=/bodyset/femur_l translation=(0 0 0)
      SpatialTransform: axes_held_at_zero=(translation1 translation2 translation3)
        TransformAxis rotation1: coordinates=hip_flexion_l axis=(0 0 1) LinearFunction(coefficients=1 0)
        TransformAxis rotation2: coordinates=hip_adduction_l axis=(1 0 0) LinearFunction(coefficients=-1 0)
        TransformAxis rotation3: coordinates=hip_rotation_l axis=(0 1 0) LinearFunction(coefficients=-1 0)
    CustomJoint knee_l: socket_parent_frame=femur_l_offset socket_child_frame=tibia_l_offset
      Coordinate knee_angle_l: default_value=1.542083e-5 range=(0 2.0944) clamped=true
      Coordinate knee_adduction_l: default_value=0.1198727 range=(-1 1) clamped=true locked=true
      PhysicalOffsetFrame femur_l_offset: socket_parent=/bodyset/femur_l
          translation=(-0.004193107 -0.381666 0.001803307) orientation=(0.07077 3.141593 0.124616)
      PhysicalOffsetFrame tibia_l_offset: socket_parent=/bodyset/tibia_l
          translation=(-0.008294075 -0.003624173 0.00152228) orientation=(0.07077 3.141593 0.124616)
      SpatialTransform:
        TransformAxis rotation1: coordinates=knee_angle_l axis=(0 0 1) LinearFunction(coefficients=1 0)
        TransformAxis rotation2: coordinates=knee_adduction_l axis=(1 0 0) LinearFunction(coefficients=1 0)
        TransformAxis rotation3: coordinates=knee_angle_l axis=(0 1 0)
          SimmSpline: x=(0 0.174533 0.349066 0.523599 0.698132 0.872665 1.0472 1.22173 1.39626 1.5708 1.74533 1.91986 2.0944)
              y=(0 -0.059461 -0.109399 -0.150618 -0.18392 -0.210107 -0.229983 -0.24435 -0.254012 -0.25977 -0.262428 -0.262788 -0.26165)
        TransformAxis translation1: coordinates=knee_angle_l axis=(0 1 0)
          MultiplierFunction: scale=0.9318017
            SimmSpline: x=(0 0.174533 0.349066 0.523599 0.698132 0.872665 1.0472 1.22173 1.39626 1.5708 1.74533 1.91986 2.0944)
                y=(0 0.000301 0.000143 -0.000401 -0.001233 -0.002243 -0.003316 -0.004346 -0.005239 -0.005924 -0.006361 -0.006539 -0.00648)
        TransformAxis translation2: coordinates=knee_angle_l axis=(1 0 0)
          MultiplierFunction: scale=0.9318017
            SimmSpline: x=(0 0.174533 0.349066 0.523599 0.698132 0.872665 1.0472 1.22173 1.39626 1.5708 1.74533 1.91986 2.0944)
                y=(0 -0.001055 -0.002061 -0.00289 -0.003447 -0.003676 -0.003559 -0.00311 -0.002373 -0.001418 -0.000329 0.000805 0.001898)
        TransformAxis translation3: coordinates=knee_angle_l axis=(0 0 1)
          MultiplierFunction: scale=1.030461
            SimmSpline: x=(0 0.174533 0.349066 0.523599 0.698132 0.872665 1.0472 1.22173 1.39626 1.5708 1.74533 1.91986 2.0944)
                y=(0 -5.3e-5 -0.000188 -0.000378 -0.000597 -0.000825 -0.001045 -0.001247 -0.00142 -0.001558 -0.001661 -0.001728 -0.00176)
    CustomJoint patellofemoral_l: socket_parent_frame=femur_l_offset socket_child_frame=patella_l_offset
      Coordinate knee_angle_l_beta: default_value=0 range=(-99999.9 99999.9) clamped=false locked=true
      PhysicalOffsetFrame femur_l_offset: socket_parent=/bodyset/femur_l
          translation=(-0.007538275 -0.3801378 0.002833768)
      PhysicalOffsetFrame patella_l_offset: socket_parent=/bodyset/patella_l translation=(0 0 0)
      SpatialTransform: axes_held_at_zero=(rotation2 rotation3)
        TransformAxis rotation1: coordinates=knee_angle_l_beta axis=(0 0 1)
          SimmSpline: x=(0 0.174533 0.349066 0.523599 0.698132 0.872665 1.0472 1.22173 1.39626 1.5708 1.74533 1.91986 2.0944)
              y=(0.00113686 -0.00629212 -0.105582 -0.253683 -0.414245 -0.579047 -0.747244 -0.91799 -1.09044 -1.26379 -1.43763 -1.61186 -1.78634)
        TransformAxis translation1: coordinates=knee_angle_l_beta axis=(1 0 0)
          MultiplierFunction: scale=0.9318017
            SimmSpline: x=(0 0.174533 0.349066 0.523599 0.698132 0.872665 1.0472 1.22173 1.39626 1.5708 1.74533 1.91986 2.0944)
                y=(0.0524 0.0488 0.0437 0.0371 0.0296 0.0216 0.0136 0.0057 -0.0019 -0.0088 -0.0148 -0.0196 -0.0227)
        TransformAxis translation2: coordinates=knee_angle_l_beta axis=(0 1 0)
          MultiplierFunction: scale=0.9318017
            SimmSpline: x=(0 0.174533 0.349066 0.523599 0.698132 0.872665 1.0472 1.22173 1.39626 1.5708 1.74533 1.91986 2.0944)
                y=(-0.0108 -0.019 -0.0263 -0.0322 -0.0367 -0.0395 -0.0408 -0.0404 -0.0384 -0.0349 -0.0301 -0.0245 -0.0187)
        TransformAxis translation3: axis=(0 0 1) MultiplierFunction(scale=1.030461, Constant(value=-0.00275))
    PinJoint ankle_l: socket_parent_frame=tibia_l_offset socket_child_frame=talus_l_offset
      Coordinate ankle_angle_l: default_value=-8.781761e-11 range=(-0.6981317 0.5235988) clamped=true
      PhysicalOffsetFrame tibia_l_offset: socket_parent=/bodyset/tibia_l translation=(-0.01238133 -0.4031621 0)
          orientation=(-0.201145 0.0546 0.69513)
      PhysicalOffsetFrame talus_l_offset: socket_parent=/bodyset/talus_l translation=(0 0 0)
    CustomJoint subtalar_l: socket_parent_frame=talus_l_offset socket_child_frame=calcn_l_offset
      Coordinate subtalar_angle_l: default_value=7.220303e-10 default_speed_value=0.2269 range=(-0.1745 0.5236)
          clamped=true
      PhysicalOffsetFrame talus_l_offset: socket_parent=/bodyset/talus_l translation=(0 -0.0105488 -0.001040227)
          orientation=(0 -0.331422 0)
      PhysicalOffsetFrame calcn_l_offset: socket_parent=/bodyset/calcn_l translation=(0.0563381 0.04360836 0.008555179)
          orientation=(0 -0.1954952 0.7011063)
      SpatialTransform: axes_held_at_zero=(rotation2 rotation3 translation1 translation2 translation3)
        TransformAxis rotation1: coordinates=subtalar_angle_l axis=(-1 0 0) LinearFunction(coefficients=1 0)
    PinJoint mtp_l: socket_parent_frame=calcn_l_offset socket_child_frame=toes_l_offset
      Coordinate mtp_angle_l: default_value=0 range=(-0.5235988 0.5235988) clamped=true
      PhysicalOffsetFrame calcn_l_offset: socket_parent=/bodyset/calcn_l
          translation=(0.1902689 -0.002128287 -0.001149275) orientation=(-3.14159 -0.619901 0)
      PhysicalOffsetFrame toes_l_offset: socket_parent=/bodyset/toes_l translation=(0 0 0)
          orientation=(-3.14159 -0.619901 0)
    CustomJoint back_lower: socket_parent_frame=pelvis_offset socket_child_frame=torso_lower_offset
      Coordinate lumbar_extension: default_value=0 range=(-1.570796 1.570796) clamped=true
      Coordinate lumbar_bending: default_value=0 range=(-1.570796 1.570796) clamped=true
      Coordinate lumbar_rotation: default_value=0 range=(-1.570796 1.570796) clamped=true
      PhysicalOffsetFrame pelvis_offset: socket_parent=/bodyset/pelvis translation=(-0.07752399 0.0369915 0)
      PhysicalOffsetFrame torso_lower_offset: socket_parent=/bodyset/torso_lower translation=(0 0 0)
      SpatialTransform: axes_held_at_zero=(translation1 translation2 translation3)
        TransformAxis rotation1: coordinates=lumbar_extension axis=(0 0 1) LinearFunction(coefficients=1 0)
        TransformAxis rotation2: coordinates=lumbar_bending axis=(1 0 0) LinearFunction(coefficients=1 0)
        TransformAxis rotation3: coordinates=lumbar_rotation axis=(0 1 0) LinearFunction(coefficients=1 0)
    CustomJoint back_upper: socket_parent_frame=torso_lower_offset socket_child_frame=torso_upper_offset
      Coordinate thoracic_extension: default_value=0 range=(-1.570796 1.570796) clamped=true
      Coordinate thoracic_bending: default_value=0 range=(-1.570796 1.570796) clamped=true
      Coordinate thoracic_rotation: default_value=0 range=(-1.570796 1.570796) clamped=true
      PhysicalOffsetFrame torso_lower_offset: socket_parent=/bodyset/torso_lower translation=(-0.05664513 0.273023 0)
      PhysicalOffsetFrame torso_upper_offset: socket_parent=/bodyset/torso_upper translation=(-0.05664513 0.273023 0)
      SpatialTransform: axes_held_at_zero=(translation1 translation2 translation3)
        TransformAxis rotation1: coordinates=thoracic_extension axis=(0 0 1) LinearFunction(coefficients=1 0)
        TransformAxis rotation2: coordinates=thoracic_bending axis=(1 0 0) LinearFunction(coefficients=1 0)
        TransformAxis rotation3: coordinates=thoracic_rotation axis=(0 1 0) LinearFunction(coefficients=1 0)
    CustomJoint acromial_r: socket_parent_frame=torso_upper_offset socket_child_frame=humerus_r_offset
      Coordinate arm_flex_r: default_value=0 range=(-1.570796 1.570796) clamped=true
      Coordinate arm_add_r: default_value=-2.860963e-11 range=(-2.094395 1.570796) clamped=true
      Coordinate arm_rot_r: default_value=0 range=(-1.570796 1.570796) clamped=true
      PhysicalOffsetFrame torso_upper_offset: socket_parent=/bodyset/torso_upper
          translation=(0.004255128 0.4226169 0.180119)
      PhysicalOffsetFrame humerus_r_offset: socket_parent=/bodyset/humerus_r translation=(0 0 0)
      SpatialTransform: axes_held_at_zero=(translation1 translation2 translation3)
        TransformAxis rotation1: coordinates=arm_flex_r axis=(0 0 1) LinearFunction(coefficients=1 0)
        TransformAxis rotation2: coordinates=arm_add_r axis=(1 0 0) LinearFunction(coefficients=1 0)
        TransformAxis rotation3: coordinates=arm_rot_r axis=(0 1 0) LinearFunction(coefficients=1 0)
    PinJoint elbow_r: socket_parent_frame=humerus_r_offset socket_child_frame=ulna_r_offset
      Coordinate elbow_flex_r: default_value=1.5421e-5 range=(0 2.618) clamped=true
      PhysicalOffsetFrame humerus_r_offset: socket_parent=/bodyset/humerus_r
          translation=(0.01431663 -0.3118126 -0.01045101) orientation=(-0.0228627 0.228018 0.0051689)
      PhysicalOffsetFrame ulna_r_offset: socket_parent=/bodyset/ulna_r translation=(0 0 0)
          orientation=(-0.0228627 0.228018 0.0051689)
    PinJoint radioulnar_r: socket_parent_frame=ulna_r_offset socket_child_frame=radius_r_offset
      Coordinate pro_sup_r: default_value=1.570787 range=(0 1.570796) clamped=true locked=true
      PhysicalOffsetFrame ulna_r_offset: socket_parent=/bodyset/ulna_r translation=(-0.007162684 -0.01384942 0.0277723)
          orientation=(-1.56884 0.056428 1.53614)
      PhysicalOffsetFrame radius_r_offset: socket_parent=/bodyset/radius_r translation=(0 0 0)
          orientation=(-1.56884 0.056428 1.53614)
    UniversalJoint radius_hand_r: socket_parent_frame=radius_r_offset socket_child_frame=hand_r_offset
      Coordinate wrist_flex_r: default_value=0 range=(-1.22173 1.22173) clamped=true locked=true
      Coordinate wrist_dev_r: default_value=0 range=(-0.4363323 0.6108652) clamped=true locked=true
      PhysicalOffsetFrame radius_r_offset: socket_parent=/bodyset/radius_r
          translation=(-0.00936675 -0.2511156 0.01449147) orientation=(-1.5708 0 -1.5708)
      PhysicalOffsetFrame hand_r_offset: socket_parent=/bodyset/hand_r translation=(0 0 0)
          orientation=(-1.5708 0 -1.5708)
    CustomJoint acromial_l: socket_parent_frame=torso_upper_offset socket_child_frame=humerus_l_offset
      Coordinate arm_flex_l: default_value=0 range=(-1.570796 1.570796) clamped=true
      Coordinate arm_add_l: default_value=-2.860963e-11 range=(-2.094395 1.570796) clamped=true
      Coordinate arm_rot_l: default_value=0 range=(-1.570796 1.570796) clamped=true
      PhysicalOffsetFrame torso_upper_offset: socket_parent=/bodyset/torso_upper
          translation=(0.004255128 0.4226169 -0.180119)
      PhysicalOffsetFrame humerus_l_offset: socket_parent=/bodyset/humerus_l translation=(0 0 0)
      SpatialTransform: axes_held_at_zero=(translation1 translation2 translation3)
        TransformAxis rotation1: coordinates=arm_flex_l axis=(0 0 1) LinearFunction(coefficients=1 0)
        TransformAxis rotation2: coordinates=arm_add_l axis=(-1 0 0) LinearFunction(coefficients=1 0)
        TransformAxis rotation3: coordinates=arm_rot_l axis=(0 -1 0) LinearFunction(coefficients=1 0)
    PinJoint elbow_l: socket_parent_frame=humerus_l_offset socket_child_frame=ulna_l_offset
      Coordinate elbow_flex_l: default_value=1.5421e-5 range=(0 2.618) clamped=true
      PhysicalOffsetFrame humerus_l_offset: socket_parent=/bodyset/humerus_l
          translation=(0.01431663 -0.3118126 0.01045101) orientation=(0.0228627 -0.228018 0.0051689)
      PhysicalOffsetFrame ulna_l_offset: socket_parent=/bodyset/ulna_l translation=(0 0 0)
          orientation=(0.0228627 -0.228018 0.0051689)
    PinJoint radioulnar_l: socket_parent_frame=ulna_l_offset socket_child_frame=radius_l_offset
      Coordinate pro_sup_l: default_value=1.570787 range=(0 1.570796) clamped=true locked=true
      PhysicalOffsetFrame ulna_l_offset: socket_parent=/bodyset/ulna_l
          translation=(-0.007162684 -0.01384942 -0.0277723) orientation=(1.56884 -0.056428 1.53614)
      PhysicalOffsetFrame radius_l_offset: socket_parent=/bodyset/radius_l translation=(0 0 0)
          orientation=(1.56884 -0.056428 1.53614)
    UniversalJoint radius_hand_l: socket_parent_frame=radius_l_offset socket_child_frame=hand_l_offset
      Coordinate wrist_flex_l: default_value=0 range=(-1.22173 1.22173) clamped=true locked=true
      Coordinate wrist_dev_l: default_value=0 range=(-0.4363323 0.6108652) clamped=true locked=true
      PhysicalOffsetFrame radius_l_offset: socket_parent=/bodyset/radius_l
          translation=(-0.00936675 -0.2511156 -0.01449147) orientation=(1.5708 0 1.5708)
      PhysicalOffsetFrame hand_l_offset: socket_parent=/bodyset/hand_l translation=(0 0 0)
          orientation=(1.5708 0 1.5708)
    WeldJoint calcn_l_markerPlate_jnt: socket_parent_frame=calcn_l_offset socket_child_frame=calcn_l_markerPlate_offset
      PhysicalOffsetFrame calcn_l_offset: socket_parent=/bodyset/calcn_l translation=(0.1075214 0.01328232 -0.01490123)
      PhysicalOffsetFrame calcn_l_markerPlate_offset: socket_parent=/bodyset/calcn_l_markerPlate translation=(0 0 0)
    WeldJoint calcn_r_markerPlate_jnt: socket_parent_frame=calcn_r_offset socket_child_frame=calcn_r_markerPlate_offset
      PhysicalOffsetFrame calcn_r_offset: socket_parent=/bodyset/calcn_r translation=(0.1074579 0.01473772 0.01321761)
      PhysicalOffsetFrame calcn_r_markerPlate_offset: socket_parent=/bodyset/calcn_r_markerPlate translation=(0 0 0)
    WeldJoint femur_l_markerPlate_jnt: socket_parent_frame=femur_l_offset socket_child_frame=femur_l_markerPlate_offset
      PhysicalOffsetFrame femur_l_offset: socket_parent=/bodyset/femur_l
          translation=(0.04238555 -0.2517983 -0.02530408)
      PhysicalOffsetFrame femur_l_markerPlate_offset: socket_parent=/bodyset/femur_l_markerPlate translation=(0 0 0)
    WeldJoint femur_r_markerPlate_jnt: socket_parent_frame=femur_r_offset socket_child_frame=femur_r_markerPlate_offset
      PhysicalOffsetFrame femur_r_offset: socket_parent=/bodyset/femur_r translation=(0.04451708 -0.247863 0.0167336)
      PhysicalOffsetFrame femur_r_markerPlate_offset: socket_parent=/bodyset/femur_r_markerPlate translation=(0 0 0)
    WeldJoint humerus_l_markerPlate_jnt: socket_parent_frame=humerus_l_offset
        socket_child_frame=humerus_l_markerPlate_offset
      PhysicalOffsetFrame humerus_l_offset: socket_parent=/bodyset/humerus_l
          translation=(-0.1032352 -0.1032352 -0.1032352)
      PhysicalOffsetFrame humerus_l_markerPlate_offset: socket_parent=/bodyset/humerus_l_markerPlate
          translation=(0 0 0)
    WeldJoint humerus_r_markerPlate_jnt: socket_parent_frame=humerus_r_offset
        socket_child_frame=humerus_r_markerPlate_offset
      PhysicalOffsetFrame humerus_r_offset: socket_parent=/bodyset/humerus_r
          translation=(-0.102969 -0.102969 -0.102969)
      PhysicalOffsetFrame humerus_r_markerPlate_offset: socket_parent=/bodyset/humerus_r_markerPlate
          translation=(0 0 0)
    WeldJoint patella_l_markerPlate_jnt: socket_parent_frame=patella_l_offset
        socket_child_frame=patella_l_markerPlate_offset
      PhysicalOffsetFrame patella_l_offset: socket_parent=/bodyset/patella_l
          translation=(0.00745222 0.00745222 0.00745222)
      PhysicalOffsetFrame patella_l_markerPlate_offset: socket_parent=/bodyset/patella_l_markerPlate
          translation=(0 0 0)
    WeldJoint patella_r_markerPlate_jnt: socket_parent_frame=patella_r_offset
        socket_child_frame=patella_r_markerPlate_offset
      PhysicalOffsetFrame patella_r_offset: socket_parent=/bodyset/patella_r
          translation=(0.00141591 0.00141591 0.00141591)
      PhysicalOffsetFrame patella_r_markerPlate_offset: socket_parent=/bodyset/patella_r_markerPlate
          translation=(0 0 0)
    WeldJoint pelvis_markerPlate_jnt: socket_parent_frame=pelvis_offset socket_child_frame=pelvis_markerPlate_offset
      PhysicalOffsetFrame pelvis_offset: socket_parent=/bodyset/pelvis translation=(-0.0435723 0.0258375 -0.00115661)
      PhysicalOffsetFrame pelvis_markerPlate_offset: socket_parent=/bodyset/pelvis_markerPlate translation=(0 0 0)
    WeldJoint radius_l_markerPlate_jnt: socket_parent_frame=radius_l_offset
        socket_child_frame=radius_l_markerPlate_offset
      PhysicalOffsetFrame radius_l_offset: socket_parent=/bodyset/radius_l
          translation=(-0.08461836 -0.08461836 -0.08461836)
      PhysicalOffsetFrame radius_l_markerPlate_offset: socket_parent=/bodyset/radius_l_markerPlate translation=(0 0 0)
    WeldJoint radius_r_markerPlate_jnt: socket_parent_frame=radius_r_offset
        socket_child_frame=radius_r_markerPlate_offset
      PhysicalOffsetFrame radius_r_offset: socket_parent=/bodyset/radius_r
          translation=(-0.08276806 -0.08276806 -0.08276806)
      PhysicalOffsetFrame radius_r_markerPlate_offset: socket_parent=/bodyset/radius_r_markerPlate translation=(0 0 0)
    WeldJoint tibia_l_markerPlate_jnt: socket_parent_frame=tibia_l_offset socket_child_frame=tibia_l_markerPlate_offset
      PhysicalOffsetFrame tibia_l_offset: socket_parent=/bodyset/tibia_l
          translation=(-0.01352702 -0.2471578 -0.02075097)
      PhysicalOffsetFrame tibia_l_markerPlate_offset: socket_parent=/bodyset/tibia_l_markerPlate translation=(0 0 0)
    WeldJoint tibia_r_markerPlate_jnt: socket_parent_frame=tibia_r_offset socket_child_frame=tibia_r_markerPlate_offset
      PhysicalOffsetFrame tibia_r_offset: socket_parent=/bodyset/tibia_r translation=(-0.0182898 -0.2405368 0.02573137)
      PhysicalOffsetFrame tibia_r_markerPlate_offset: socket_parent=/bodyset/tibia_r_markerPlate translation=(0 0 0)
    WeldJoint toes_l_markerPlate_jnt: socket_parent_frame=toes_l_offset socket_child_frame=toes_l_markerPlate_offset
      PhysicalOffsetFrame toes_l_offset: socket_parent=/bodyset/toes_l translation=(0.02609543 0.02609543 0.02609543)
      PhysicalOffsetFrame toes_l_markerPlate_offset: socket_parent=/bodyset/toes_l_markerPlate translation=(0 0 0)
    WeldJoint toes_r_markerPlate_jnt: socket_parent_frame=toes_r_offset socket_child_frame=toes_r_markerPlate_offset
      PhysicalOffsetFrame toes_r_offset: socket_parent=/bodyset/toes_r translation=(0.03502983 0.03502983 0.03502983)
      PhysicalOffsetFrame toes_r_markerPlate_offset: socket_parent=/bodyset/toes_r_markerPlate translation=(0 0 0)
    WeldJoint torso_lower_markerPlate_jnt: socket_parent_frame=torso_lower_offset
        socket_child_frame=torso_lower_markerPlate_offset
      PhysicalOffsetFrame torso_lower_offset: socket_parent=/bodyset/torso_lower
          translation=(0.004140177 0.004140177 0.004140177)
      PhysicalOffsetFrame torso_lower_markerPlate_offset: socket_parent=/bodyset/torso_lower_markerPlate
          translation=(0 0 0)
    WeldJoint torso_upper_markerPlate_jnt: socket_parent_frame=torso_upper_offset
        socket_child_frame=torso_upper_markerPlate_offset
      PhysicalOffsetFrame torso_upper_offset: socket_parent=/bodyset/torso_upper
          translation=(0.01809472 0.3828802 6.371e-5)
      PhysicalOffsetFrame torso_upper_markerPlate_offset: socket_parent=/bodyset/torso_upper_markerPlate
          translation=(0 0 0)
  ForceSet:
    CoordinateActuator hip_flexion_r_T: coordinate=hip_flexion_r optimal_force=1
    CoordinateActuator hip_adduction_r_T: coordinate=hip_adduction_r optimal_force=1
    CoordinateActuator hip_rotation_r_T: coordinate=hip_rotation_r optimal_force=1
    CoordinateActuator knee_angle_r_T: coordinate=knee_angle_r optimal_force=1
    CoordinateActuator ankle_angle_r_T: coordinate=ankle_angle_r optimal_force=1
    CoordinateActuator subtalar_angle_r_T: coordinate=subtalar_angle_r optimal_force=1
    CoordinateActuator mtp_angle_r_T: coordinate=mtp_angle_r optimal_force=1
    CoordinateActuator hip_flexion_l_T: coordinate=hip_flexion_l optimal_force=1
    CoordinateActuator hip_adduction_l_T: coordinate=hip_adduction_l optimal_force=1
    CoordinateActuator hip_rotation_l_T: coordinate=hip_rotation_l optimal_force=1
    CoordinateActuator knee_angle_l_T: coordinate=knee_angle_l optimal_force=1
    CoordinateActuator ankle_angle_l_T: coordinate=ankle_angle_l optimal_force=1
    CoordinateActuator subtalar_angle_l_T: coordinate=subtalar_angle_l optimal_force=1
    CoordinateActuator mtp_angle_l_T: coordinate=mtp_angle_l optimal_force=1
    CoordinateActuator lumbar_extension_T: coordinate=lumbar_extension optimal_force=1
    CoordinateActuator lumbar_bending_T: coordinate=lumbar_bending optimal_force=1
    CoordinateActuator lumbar_rotation_T: coordinate=lumbar_rotation optimal_force=1
    CoordinateActuator thoracic_extension_T: coordinate=thoracic_extension optimal_force=1
    CoordinateActuator thoracic_bending_T: coordinate=thoracic_bending optimal_force=1
    CoordinateActuator thoracic_rotation_T: coordinate=thoracic_rotation optimal_force=1
    CoordinateActuator arm_flex_r_T: coordinate=arm_flex_r optimal_force=1
    CoordinateActuator arm_add_r_T: coordinate=arm_add_r optimal_force=1
    CoordinateActuator arm_rot_r_T: coordinate=arm_rot_r optimal_force=1
    CoordinateActuator elbow_flex_r_T: coordinate=elbow_flex_r optimal_force=1
    CoordinateActuator arm_flex_l_T: coordinate=arm_flex_l optimal_force=1
    CoordinateActuator arm_add_l_T: coordinate=arm_add_l optimal_force=1
    CoordinateActuator arm_rot_l_T: coordinate=arm_rot_l optimal_force=1
    CoordinateActuator elbow_flex_l_T: coordinate=elbow_flex_l optimal_force=1
    PointActuator [values shared by the 12 below unless stated]: point=(0 0 0) point_is_global=false
        force_is_global=true optimal_force=1
    PointActuator calcn_r_Fx: body=calcn_r direction=(1 0 0)
    PointActuator calcn_r_Fy: body=calcn_r direction=(0 1 0)
    PointActuator calcn_r_Fz: body=calcn_r direction=(0 0 1)
    PointActuator toes_r_Fx: body=toes_r direction=(1 0 0)
    PointActuator toes_r_Fy: body=toes_r direction=(0 1 0)
    PointActuator toes_r_Fz: body=toes_r direction=(0 0 1)
    PointActuator calcn_l_Fx: body=calcn_l direction=(1 0 0)
    PointActuator calcn_l_Fy: body=calcn_l direction=(0 1 0)
    PointActuator calcn_l_Fz: body=calcn_l direction=(0 0 1)
    PointActuator toes_l_Fx: body=toes_l direction=(1 0 0)
    PointActuator toes_l_Fy: body=toes_l direction=(0 1 0)
    PointActuator toes_l_Fz: body=toes_l direction=(0 0 1)
    TorqueActuator [values shared by the 12 below unless stated]: bodyB=ground torque_is_global=true optimal_force=1
    TorqueActuator calcn_r_Mx: bodyA=calcn_r axis=(1 0 0)
    TorqueActuator calcn_r_My: bodyA=calcn_r axis=(0 1 0)
    TorqueActuator calcn_r_Mz: bodyA=calcn_r axis=(0 0 1)
    TorqueActuator toes_r_Mx: bodyA=toes_r axis=(1 0 0)
    TorqueActuator toes_r_My: bodyA=toes_r axis=(0 1 0)
    TorqueActuator toes_r_Mz: bodyA=toes_r axis=(0 0 1)
    TorqueActuator calcn_l_Mx: bodyA=calcn_l axis=(1 0 0)
    TorqueActuator calcn_l_My: bodyA=calcn_l axis=(0 1 0)
    TorqueActuator calcn_l_Mz: bodyA=calcn_l axis=(0 0 1)
    TorqueActuator toes_l_Mx: bodyA=toes_l axis=(1 0 0)
    TorqueActuator toes_l_My: bodyA=toes_l axis=(0 1 0)
    TorqueActuator toes_l_Mz: bodyA=toes_l axis=(0 0 1)
  MarkerSet:
    Marker R.Shoulder: torso_upper (-0.01622253 0.4583652 0.1612257)
    Marker L.Shoulder: torso_upper (-0.01508463 0.4575563 -0.1608661)
    Marker J.Notch: torso_upper (0.08492467 0.4140094 0.001620546)
    Marker Sternum: torso_upper (0.1494147 0.2317123 -0.002599781)
    Marker Thoracic: torso_upper (-0.1229202 0.3495691 0.003303382)
    Marker Lumbar: torso_lower (-0.07703375 0.08758193 0.003438944)
    Marker R.Elbow: humerus_r (-0.01076279 -0.3081192 0.0107015)
    Marker R.Wrist: radius_r (-0.01774437 -0.2309543 0.007127942)
    Marker L.Elbow: humerus_l (-0.01446092 -0.3014393 0.0006602401)
    Marker L.Wrist: radius_l (-0.0197046 -0.2258289 -0.00438713)
    Marker R.ASIS: pelvis (0.02094061 0.02317242 0.1211893)
    Marker L.ASIS: pelvis (0.0215411 0.02361306 -0.122433)
    Marker Sacral: pelvis (-0.1710839 0.03956593 0.003525089)
    Marker R.Thigh.Superior: femur_r (0.1044841 -0.07981338 0.02366866)
    Marker R.Thigh.Inferior: femur_r (0.09225107 -0.2381556 -0.01043757)
    Marker R.Thigh.Lateral: femur_r (0.02806047 -0.1529459 0.08271308)
    Marker R.Knee.Lateral: femur_r (0.001080645 -0.3699709 0.0521967)
    Marker R.Knee.Medial: femur_r (-0.004430373 -0.3839663 -0.05737217)
    Marker R.Patella: patella_r (0.01472193 -0.001628399 -0.005676164)
    Marker R.Shank.Superior: tibia_r (0.02745436 -0.1188145 0.02365334)
    Marker R.Shank.Inferior: tibia_r (0.02464546 -0.2396312 0.02585826)
    Marker R.Shank.Lateral: tibia_r (-0.04711725 -0.1849839 0.07550837)
    Marker R.Shank.Posterior: tibia_r (-0.1100445 -0.1284328 0.01339901)
    Marker R.Ankle.Lateral: tibia_r (-0.01856738 -0.3792185 0.04365258)
    Marker R.Ankle.Medial: tibia_r (0.00454276 -0.3716331 -0.03177771)
    Marker R.Heel: calcn_r (-0.0223884 0.01760997 -0.008902916)
    Marker R.Toe: toes_r (0.07249303 0.01569101 0.01134843)
    Marker R.Midfoot.Lateral: calcn_r (0.05402307 -0.0009344738 0.04565194)
    Marker R.Midfoot.Superior: calcn_r (0.1469769 0.05898181 0.00657462)
    Marker R.Toe.Lateral: calcn_r (0.1754662 -0.0115258 0.06529571)
    Marker R.Toe.Medial: calcn_r (0.1851769 -0.002786777 -0.0448537)
    Marker L.Thigh.Superior: femur_l (0.1069542 -0.08430944 -0.0259239)
    Marker L.Thigh.Inferior: femur_l (0.08978367 -0.2487827 -0.0130993)
    Marker L.Thigh.Lateral: femur_l (0.01680182 -0.1577976 -0.09211276)
    Marker L.Knee.Lateral: femur_l (-0.001886292 -0.366407 -0.05676499)
    Marker L.Knee.Medial: femur_l (-0.0005242771 -0.3866906 0.05405432)
    Marker L.Patella: patella_l (0.01867062 -0.001583336 0.003921377)
    Marker L.Shank.Superior: tibia_l (0.04000918 -0.1270213 -0.00763006)
    Marker L.Shank.Inferior: tibia_l (0.02467835 -0.2414888 -0.01616624)
    Marker L.Shank.Lateral: tibia_l (-0.0330856 -0.196835 -0.07273491)
    Marker L.Shank.Posterior: tibia_l (-0.1091133 -0.1400688 -0.02286264)
    Marker L.Ankle.Lateral: tibia_l (-0.01339419 -0.3917948 -0.042879)
    Marker L.Ankle.Medial: tibia_l (0.004374443 -0.3691756 0.03389977)
    Marker L.Heel: calcn_l (-0.0254179 0.01313181 0.007601212)
    Marker L.Toe: toes_l (0.0708888 0.01357307 -0.009908877)
    Marker L.Midfoot.Superior: calcn_l (0.1460274 0.05717424 -0.007772303)
    Marker L.Midfoot.Lateral: calcn_l (0.05348194 -0.00354641 -0.0479148)
    Marker L.Toe.Lateral: calcn_l (0.1702587 -0.01155127 -0.06478103)
    Marker L.Toe.Medial: calcn_l (0.1954018 -0.004737384 0.04454827)
