# OpenSim document version 40000
JointModelPersonalizationTool:
  input_model_file: subject01_gait2392_scaled.osim
  output_model_file: subject01_gait2392_scaled_output.osim
  allowable_error: 0.005
  accuracy: 1e-4
  diff_min_change: 1e-4
  optimality_tolerance: 1e-10
  function_tolerance: 1e-12
  step_tolerance: 1e-5
  max_function_evaluations: 3e3
  JMPTaskList:
    JMPTask Left Hip: is_enabled=true index=1 marker_file_name=walk_free_01.trc ik_settings_file=IKSettings.xml
      JMPJointSet:
        JMPJoint hip_l: scale_bodies=false optimize_marker_positions=false
          parent_frame_transformation: translation=(true true true) orientation=(false false false)
              translation_bounds=0.005 orientation_bounds=0.5 [radians]
          child_frame_transformation: translation=(false false false) orientation=(false false false)
              translation_bounds=0.005 orientation_bounds=0.5 [radians]
