# OpenSim document version 40000
JointModelPersonalizationTool:
  input_model_file: Patient3_Modified.osim
  output_model_file: Patient3_Optimized.osim
  desired_error: 0.02
  accuracy: 1e-4
  diff_min_change: 1e-4
  optimality_tolerance: 1e-6
  function_tolerance: 1e-6
  step_tolerance: 1e-6
  max_function_evaluations: 3e3
  JointPersonalizationTaskList:
    JointPersonalizationTask Right Knee: is_enabled=true marker_file_name=perfect_r_knee.trc
        ik_settings_file=IKSettings_r_knee.xml
      parent_frame_transformation: translation=(true true true) orientation=(true true true) translation_bounds=0.03
          orientation_bounds=0.5 [radians]
      child_frame_transformation: translation=(false false false) orientation=(true true true) translation_bounds=0.03
          orientation_bounds=0.5 [radians]
