# OpenSim document version 40000
InverseKinematicsTool:
  time_range: 0.5 3.5
  marker_file: r_knee_markers.trc
  IKTaskSet:
    IKMarkerTask R.Shoulder: apply=true weight=1
    IKMarkerTask L.Shoulder: apply=true weight=1
    IKMarkerTask Neck: apply=true weight=1
    IKMarkerTask Sternum: apply=true weight=1
    IKMarkerTask R.Elbow: apply=true weight=1
    IKMarkerTask R.Wrist: apply=true weight=1
    IKMarkerTask L.Wrist: apply=true weight=1
    IKMarkerTask R.Asis: apply=true weight=1
    IKMarkerTask L.Asis: apply=true weight=1
    IKMarkerTask R.Thigh.Superior: apply=true weight=1
    IKMarkerTask R.Thigh.Inferior: apply=true weight=1
    IKMarkerTask R.Thigh.Lateral: apply=true weight=1
    IKMarkerTask R.Knee.Lateral: apply=false weight=1
    IKMarkerTask R.Knee.Medial: apply=false weight=1
    IKMarkerTask R.Patella: apply=true weight=1
    IKMarkerTask R.Shank.Superior: apply=true weight=1
    IKMarkerTask R.Shank.Inferior: apply=true weight=1
    IKMarkerTask R.Shank.Lateral: apply=true weight=1
    IKMarkerTask R.Ankle.Lateral: apply=false weight=1
    IKMarkerTask R.Ankle.Medial: apply=false weight=1
    IKMarkerTask R.Heel: apply=true weight=1
    IKMarkerTask R.Toe: apply=true weight=1
    IKMarkerTask R.Toe.Joint.Lateral: apply=false weight=1
    IKMarkerTask L.Thigh.Superior: apply=true weight=1
    IKMarkerTask L.Thigh.Inferior: apply=true weight=1
    IKMarkerTask L.Thigh.Lateral: apply=true weight=1
    IKMarkerTask L.Knee.Lateral: apply=false weight=1
    IKMarkerTask L.Knee.Medial: apply=false weight=1
    IKMarkerTask L.Patella: apply=true weight=1
    IKMarkerTask L.Shank.Superior: apply=true weight=1
    IKMarkerTask L.Shank.Inferior: apply=true weight=1
    IKMarkerTask L.Shank.Lateral: apply=true weight=1
    IKMarkerTask L.Ankle.Lateral: apply=false weight=1
    IKMarkerTask L.Ankle.Medial: apply=false weight=1
    IKMarkerTask L.Heel: apply=true weight=1
    IKMarkerTask L.Toe: apply=true weight=1
    IKMarkerTask L.Toe.Joint.Lateral: apply=false weight=1
    IKMarkerTask Sacral: apply=true weight=1
    IKMarkerTask Lumbar: apply=false weight=1
    IKMarkerTask R.Midfoot.Superior: apply=true weight=1
    IKMarkerTask L.Midfoot.Superior: apply=true weight=1
    IKMarkerTask L.Toe.Joint.Medial: apply=false weight=1
    IKMarkerTask R.Toe.Joint.Medial: apply=false weight=1
    IKMarkerTask L.Elbow: apply=true weight=1
    IKMarkerTask R.Midfoot.Lateral: apply=true weight=1
    IKMarkerTask L.Midfoot.Lateral: apply=true weight=1
