# OpenSim document version 40000
JointModelPersonalizationTool:
  input_model_file: \tests\JointModelPersonalization\testXML\test_scaled.osim
  output_model_file: \tests\JointModelPersonalization\testXML\test_scaled_hip_calibrated.osim
  accuracy: 1e-6
  diff_min_change: 1e-4
  optimality_tolerance: 1e-10
  function_tolerance: 1e-12
  step_tolerance: 1e-5
  max_function_evaluations: 3e2
  JointPersonalizationTaskList:
    JointPersonalizationTask hip_calibration: is_enabled=true
        marker_file_name=\tests\JointModelPersonalization\testXML\walk_free_01.trc
      parent_frame_transformation: translation=(true true true) orientation=(false false false) translation_bounds=0.03
          orientation_bounds=0.5 [radians]
      child_frame_transformation: translation=(false false false) orientation=(false false false)
          translation_bounds=0.03 orientation_bounds=0.5 [radians]
