# OpenSim document version 40000
MuscleTendonPersonalizationTool:
  results_directory: results
  input_model_file: optModel_MuscleGroups_LeftMusclesActive_NewSynx.osim
  muscle_specific_electromechanical_delays: false
  muscle_specific_activation_time_constant: false
  v_max_factor: 10
  maximum_muscle_stress: 610e3
  max_iterations: 2e3
  max_function_evaluations: 1e8
  trial_prefixes: speed1_gait_1 speed1_gait_2 speed2_squat_1 speed2_squat_2
  task_prefixes: speed1 speed2
  MuscleTendonLengthInitialization: is_enabled=true passive_data_input_directory=thelen
      max_normalized_muscle_fiber_length=1 min_normalized_muscle_fiber_length=0.6 optimize_maximum_muscle_stress=true
      optimize_isometric_max_force=true
    MuscleTendonLengthInitializationCostFunctionTerms:
      IndividualMuscles:
        PassiveJointMoments: is_enabled=true max_allowable_error=2
        OptimalMuscleFiberLength: is_enabled=true max_allowable_error=0.3 error_center=1
        TendonSlackLength: is_enabled=true max_allowable_error=1 error_center=1
        MinimumNormalizedMuscleFiberLength: is_enabled=true max_allowable_error=0.3
        MaximumNormalizedMuscleFiberLength: is_enabled=true max_allowable_error=0.03
        MaximumMuscleStress: is_enabled=true max_allowable_error=0.1 error_center=1.2
        PassiveMuscleForces: is_enabled=true max_allowable_error=10
      GroupedMuscles:
        NormalizedMuscleFiberLength: is_enabled=true max_allowable_error=0.1
        MaximumNormalizedMuscleFiberLength: is_enabled=true max_allowable_error=0.1
  MuscleTendonPersonalizationTaskList:
    MuscleTendonPersonalizationTask [values shared by the 5 below unless stated]: is_enabled=true
        perform_synergy_extrapolation=true
    MuscleTendonPersonalizationTask: index=1 optimize_electromechanical_delays=true
        optimize_activation_time_constants=true optimize_activation_nonlinearity_constants=true
        optimize_emg_scale_factors=false optimize_optimal_fiber_lengths=false optimize_tendon_slack_lengths=false
    MuscleTendonPersonalizationTask: index=2 optimize_electromechanical_delays=false
        optimize_activation_time_constants=false optimize_activation_nonlinearity_constants=false
        optimize_emg_scale_factors=true optimize_optimal_fiber_lengths=true optimize_tendon_slack_lengths=true
    MuscleTendonPersonalizationTask: index=3 optimize_electromechanical_delays=true
        optimize_activation_time_constants=true optimize_activation_nonlinearity_constants=true
        optimize_emg_scale_factors=false optimize_optimal_fiber_lengths=false optimize_tendon_slack_lengths=false
    MuscleTendonPersonalizationTask: index=4 optimize_electromechanical_delays=false
        optimize_activation_time_constants=false optimize_activation_nonlinearity_constants=false
        optimize_emg_scale_factors=true optimize_optimal_fiber_lengths=true optimize_tendon_slack_lengths=true
    MuscleTendonPersonalizationTask: index=5 optimize_electromechanical_delays=true
        optimize_activation_time_constants=true optimize_activation_nonlinearity_constants=true
        optimize_emg_scale_factors=true optimize_optimal_fiber_lengths=true optimize_tendon_slack_lengths=true
  MuscleTendonCostFunctionTerms:
    IndividualMuscles:
      InverseDynamicJointMoments: is_enabled=true max_allowable_error=2
      ActivationTimeConstant: is_enabled=true max_allowable_error=0.02 error_center=0.015
      ActivationNonlinearityConstant: is_enabled=true max_allowable_error=0.1
      OptimalMuscleFiberLength: is_enabled=true max_allowable_error=0.1
      TendonSlackLength: is_enabled=true max_allowable_error=0.1
      EmgScalingFactors: is_enabled=true max_allowable_error=0.2 error_center=0.3
      NormalizedMuscleFiberLength: is_enabled=true max_allowable_error=0.1
      PassiveMuscleForces: is_enabled=true max_allowable_error=50
    GroupedMuscles:
      NormalizedMuscleFiberLength: is_enabled=true max_allowable_error=0.05
      EmgScalingFactors: is_enabled=true max_allowable_error=0.1
      ElectromechanicalDelay: is_enabled=true max_allowable_error=0.2 muscle_specific_electromechanical_delays=false
    SynergyExtrapolationSettings: matrix_factorization_method=PCA number_of_synergies=5
        synergy_extrapolation_categorization=trial residual_categorization=task
      MeasuredInverseDynamicJointMoments: is_enabled=true max_allowable_error=2.5
      ExtrapolatedMuscleActivations: is_enabled=true max_allowable_error=0.3
      ResidualMuscleActivations: is_enabled=true max_allowable_error=0.3
  GroupedMuscles:
    GroupedActivationTimeConstants: musclegroups=AdductorActivationGroupL musclegroups=GluteusMaxActivationGroupL
        musclegroups=GluteusMedActivationGroupL musclegroups=GluteusMinActivationGroupL
        musclegroups=IliopsoasActivationGroupL musclegroups=HamstringActivationGroupL
        musclegroups=BicepsFemActivationGroupL musclegroups=PeroneusActivationGroupL
    GroupedNormalizedMuscleFiberLengths: musclegroups=AdductorFiberLengthGroupL
        musclegroups=GluteusMaxFiberLengthGroupL musclegroups=GluteusMedFiberLengthGroupL
        musclegroups=GluteusMinFiberLengthGroupL musclegroups=QuadricepFiberLengthGroupL
        musclegroups=HamstringFiberLengthGroupL musclegroups=PeroneusFiberLengthGroupL
        musclegroups=IliopsoasFiberLengthGroupL musclegroups=GastrocFiberLengthGroupL
        musclegroups=TibialisAnteriorFiberLengthGroupL musclegroups=TibialisPosteriorFiberLengthGroupL
    GroupedMissingEmgChannels: musclegroups=AddLongMissingEmgChannelL musclegroups=ExtDigLongMissingEmgChannelL
        musclegroups=FlexDigLongMissingEmgChannelL musclegroups=IliopsoasMissingEmgChannelL
        musclegroups=PeroneusLongMissingEmgChannelL musclegroups=RecFemMissingEmgChannelL
        musclegroups=TibPostMissingEmgChannelL musclegroups=VastMedMissingEmgChannelL
