# OpenSim document version 40000
Model optModel:
  gravity: 0 -9.80665 0
  length_units: meters
  force_units: N
  credits:
    Rajagopal, A, Dembia, C.L., DeMers, M.S., Delp, D.D., Hicks, J.L., and Delp, S.L.
  publications:
    Rajagopal, Apoorva, et al. "Full-Body Musculoskeletal Model for Muscle-Driven Simulation of Human Gait." IEEE Transactions on Biomedical Engineering 63.10 (2016): 2068-2079. (2016)
  Ground
  BodySet:
    Body pelvis: mass=12.5841 [kg] mass_center=(-0.08762505 0 0) inertia=(0.1098451 0.09306914 0.06186801 0 0 0)
        meshes=(r_pelvis.vtp l_pelvis.vtp sacrum.vtp)
      WrapCylinder Gmax1_at_pelvis_r: xyz_body_rotation=(-0.6 0.45 0) translation=(-0.08543322 -0.099 0.06621077)
          quadrant=-x radius=0.04470654 length=0.1643041
      WrapCylinder Gmax2_at_pelvis_r: xyz_body_rotation=(-0.75 0.39 0) translation=(-0.0991514 -0.083 0.07380872)
          quadrant=all radius=0.04507967 length=0.1076603
      WrapCylinder Gmax3_at_pelvis_r: xyz_body_rotation=(-0.1 0 0) translation=(-0.1028696 -0.088 0.07380872)
          quadrant=all radius=0.0448056 length=0.1084604
      WrapCylinder Gmax1_at_pelvis_l: xyz_body_rotation=(0.6 -0.45 0) translation=(-0.08543322 -0.099 -0.06621077)
          quadrant=-x radius=0.04470654 length=0.1643041
      WrapCylinder Gmax2_at_pelvis_l: xyz_body_rotation=(0.75 -0.39 0) translation=(-0.0991514 -0.083 -0.07380872)
          quadrant=all radius=0.04507967 length=0.1076603
      WrapCylinder Gmax3_at_pelvis_l: xyz_body_rotation=(0.1 0 0) translation=(-0.1028696 -0.088 -0.07380872)
          quadrant=all radius=0.0448056 length=0.1084604
      WrapCylinder PS_at_brim_r: xyz_body_rotation=(-0.25 -0.27 0.1) translation=(-0.09171505 -0.06 0.07120371)
          quadrant=-y radius=0.05587103 length=0.1092465
      WrapCylinder PS_at_brim_l: xyz_body_rotation=(0.25 0.27 0.1) translation=(-0.09171505 -0.06 -0.07120371)
          quadrant=-y radius=0.05587103 length=0.1092465
      WrapCylinder IL_at_brim_r: xyz_body_rotation=(-0.32 -0.24 0.9) translation=(-0.08799687 -0.065 0.08205794)
          quadrant=-y radius=0.06175493 length=0.1087077
      WrapCylinder IL_at_brim_l: xyz_body_rotation=(0.32 0.24 0.9) translation=(-0.08799687 -0.065 -0.08205794)
          quadrant=-y radius=0.06175493 length=0.1087077
    Body femur_r: mass=9.938844 mass_center=(0 -0.1574994 0) inertia=(0.1228084 0.0321925 0.1295037 0 0 0)
        meshes=r_femur.vtp
      WrapCylinder Gastroc_at_condyles_r: translation=(0.004632335 -0.3798515 0) quadrant=all radius=0.02316168
          length=0.09264671
      WrapCylinder KnExt_at_fem_r: xyz_body_rotation=(-0.0623366 0.0507601 0)
          translation=(0.003324423 -0.3731179 0.001937345) quadrant=all radius=0.02316168 length=0.09264671
      WrapCylinder AB_at_femshaft_r: xyz_body_rotation=(1.66157 0.186644 0)
          translation=(0.01356663 -0.1043156 0.0216469) quadrant=all radius=0.01528671 length=0.06485269
      WrapCylinder AL_at_femshaft_r: xyz_body_rotation=(1.77711 0.136489 0)
          translation=(0.02847283 -0.2148561 0.01400235) quadrant=all radius=0.01862199 length=0.09264671
      WrapCylinder AMprox_at_femshaft_r: xyz_body_rotation=(1.61126 0.18656 0)
          translation=(0.00480187 -0.06753463 0.02353504) quadrant=all radius=0.01954846 length=0.06485269
      WrapCylinder AMmid_at_femshaft_r: xyz_body_rotation=(1.61139 0.13656 0)
          translation=(0.02132032 -0.1488934 0.01907058) quadrant=all radius=0.0198264 length=0.111176
      WrapCylinder AMdist_at_femshaft_r: xyz_body_rotation=(1.71188 0.186636 0)
          translation=(0.02928238 -0.2415633 0.008675994) quadrant=all radius=0.02019698 length=0.1852934
      WrapCylinder AMisch_at_condyles_r: xyz_body_rotation=(1.71115 -0.463363 0)
          translation=(-0.0209855 -0.3491215 -0.00292242) quadrant=all radius=0.03705868 length=0.2223521
      WrapCylinder PECT_at_femshaft_r: xyz_body_rotation=(1.81295 0.276344 0)
          translation=(0.005638228 -0.07828915 0.02820212) quadrant=all radius=0.01389701 length=0.04632335
    Body tibia_r: mass=3.961583 mass_center=(0 -0.2029597 0) inertia=(0.06364275 0.00644004 0.06452667 0 0 0)
        meshes=(r_tibia.vtp r_fibula.vtp)
      WrapCylinder GasLat_at_shank_r: xyz_body_rotation=(2.96723 -0.279725 -1.47812)
          translation=(-0.008044464 -0.08044464 -0.003587396) quadrant=-y radius=0.05978994 length=0.108709
      WrapCylinder GasMed_at_shank_r: xyz_body_rotation=(2.96723 0.0279725 -1.47812)
          translation=(-0.008044464 -0.08044464 -0.003587396) quadrant=-y radius=0.05978994 length=0.108709
      WrapCylinder GR_at_condyles_r: xyz_body_rotation=(0 -0.4 0) translation=(-0.003261269 -0.0217418 0) quadrant=all
          radius=0.03913523 length=0.108709
      WrapCylinder SM_at_condyles_r: xyz_body_rotation=(0 -0.1 0) translation=(-0.00108709 -0.0217418 0) quadrant=all
          radius=0.03826556 length=0.108709
      WrapCylinder ST_at_condyles_r: xyz_body_rotation=(0 -0.2 0) translation=(-0.00217418 -0.02228534 0) quadrant=all
          radius=0.04620132 length=0.108709
      WrapCylinder BF_at_gastroc_r: translation=(-0.06305121 -0.06522539 0) quadrant=y radius=0.03261269
          length=0.1630635
    Body patella_r: mass=0.09210746 mass_center=(0.0018 0.0264 0) inertia=(3.066687e-6 1.400846e-5 1.400846e-5 0 0 0)
        meshes=r_patella.vtp
    Body talus_r: mass=0.1068532 mass_center=(0 0 0) inertia=(0.001023712 0.001023712 0.001023712 0 0 0)
        meshes=r_talus.vtp
    Body calcn_r: mass=1.335665 mass_center=(0.09788025 0.02936407 0)
        inertia=(0.001433196 0.003992476 0.004197218 0 0 0) meshes=r_foot.vtp
    Body toes_r: mass=0.231444 mass_center=(0.03386657 0.005872815 -0.01712904)
        inertia=(0.0001023712 0.0002047423 0.001023712 0 0 0) meshes=r_bofoot.vtp
    Body femur_l: mass=9.938844 mass_center=(0 -0.1574994 0) inertia=(0.1228084 0.0321925 0.1295037 0 0 0)
        meshes=l_femur.vtp
      WrapCylinder Gastroc_at_condyles_l: translation=(0.004632335 -0.3798515 0) quadrant=all radius=0.02316168
          length=0.09264671
      WrapCylinder KnExt_at_fem_l: xyz_body_rotation=(0.0623366 -0.0507601 0)
          translation=(0.003324423 -0.3731179 -0.001937345) quadrant=all radius=0.02316168 length=0.09264671
      WrapCylinder AB_at_femshaft_l: xyz_body_rotation=(-1.66157 -0.186644 0)
          translation=(0.01356663 -0.1043156 -0.0216469) quadrant=all radius=0.01528671 length=0.06485269
      WrapCylinder AL_at_femshaft_l: xyz_body_rotation=(-1.77711 -0.136489 0)
          translation=(0.02847283 -0.2148561 -0.01400235) quadrant=all radius=0.01862199 length=0.09264671
      WrapCylinder AMprox_at_femshaft_l: xyz_body_rotation=(-1.61126 -0.18656 0)
          translation=(0.00480187 -0.06753463 -0.02353504) quadrant=all radius=0.01954846 length=0.06485269
      WrapCylinder AMmid_at_femshaft_l: xyz_body_rotation=(-1.61139 -0.13656 0)
          translation=(0.02132032 -0.1488934 -0.01907058) quadrant=all radius=0.0198264 length=0.111176
      WrapCylinder AMdist_at_femshaft_l: xyz_body_rotation=(-1.71188 -0.186636 0)
          translation=(0.02928238 -0.2415633 -0.008675994) quadrant=all radius=0.02019698 length=0.1852934
      WrapCylinder AMisch_at_condyles_l: xyz_body_rotation=(-1.71115 0.463363 0)
          translation=(-0.0209855 -0.3491215 0.00292242) quadrant=all radius=0.03705868 length=0.2223521
      WrapCylinder PECT_at_femshaft_l: xyz_body_rotation=(-1.81295 -0.276344 0)
          translation=(0.005638228 -0.07828915 -0.02820212) quadrant=all radius=0.01389701 length=0.04632335
    Body tibia_l: mass=3.961583 mass_center=(0 -0.2029597 0) inertia=(0.06364275 0.00644004 0.06452667 0 0 0)
        meshes=(l_tibia.vtp l_fibula.vtp)
      WrapCylinder GasLat_at_shank_l: xyz_body_rotation=(-2.96723 0.279725 -1.47812)
          translation=(-0.008044464 -0.08044464 0.003587396) quadrant=-y radius=0.05978994 length=0.108709
      WrapCylinder GasMed_at_shank_l: xyz_body_rotation=(-2.96723 -0.0279725 -1.47812)
          translation=(-0.008044464 -0.08044464 0.003587396) quadrant=-y radius=0.05978994 length=0.108709
      WrapCylinder GR_at_condyles_l: xyz_body_rotation=(0 0.4 0) translation=(-0.003261269 -0.0217418 0) quadrant=all
          radius=0.03913523 length=0.108709
      WrapCylinder SM_at_condyles_l: xyz_body_rotation=(0 0.1 0) translation=(-0.00108709 -0.0217418 0) quadrant=all
          radius=0.03826556 length=0.108709
      WrapCylinder ST_at_condyles_l: xyz_body_rotation=(0 0.2 0) translation=(-0.00217418 -0.02228534 0) quadrant=all
          radius=0.04620132 length=0.108709
      WrapCylinder BF_at_gastroc_l: translation=(-0.06305121 -0.06522539 0) quadrant=y radius=0.03261269
          length=0.1630635
    Body patella_l: mass=0.09210746 mass_center=(0.0018 0.0264 0) inertia=(3.066687e-6 1.400846e-5 1.400846e-5 0 0 0)
        meshes=l_patella.vtp
    Body talus_l: mass=0.1068532 mass_center=(0 0 0) inertia=(0.001023712 0.001023712 0.001023712 0 0 0)
        meshes=l_talus.vtp
    Body calcn_l: mass=1.335665 mass_center=(0.09788025 0.02936407 0)
        inertia=(0.001433196 0.003992476 0.004197218 0 0 0) meshes=l_foot.vtp
    Body toes_l: mass=0.231444 mass_center=(0.03386657 0.005872815 0.01712904)
        inertia=(0.0001023712 0.0002047423 0.001023712 0 0 0) meshes=l_bofoot.vtp
    Body torso: mass=28.66508 mass_center=(-0.03159695 0.3110076 0) inertia=(1.575551 0.807276 1.529497 0 0 0)
        meshes=(hat_spine.vtp hat_jaw.vtp hat_skull.vtp hat_ribs_scap.vtp)
    Body humerus_r: mass=2.171791 mass_center=(0 -0.164502 0) inertia=(0.01276468 0.004403421 0.01432795 0 0 0)
        meshes=humerus_rv.vtp
    Body ulna_r: mass=0.6491332 mass_center=(0 -0.1263794 0) inertia=(0.003479935 0.0007260633 0.003774824 0 0 0)
        meshes=ulna_rv.vtp
    Body radius_r: mass=0.6491332 mass_center=(0 -0.1263794 0) inertia=(0.003479935 0.0007260633 0.003774824 0 0 0)
        meshes=radius_rv.vtp
    Body hand_r: mass=0.4888534 mass_center=(0 -0.068095 0) inertia=(0.0009531306 0.000584487 0.001431833 0 0 0)
        meshes=(pisiform_rvs.vtp lunate_rvs.vtp scaphoid_rvs.vtp triquetrum_rvs.vtp hamate_rvs.vtp capitate_rvs.vtp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)
    Body humerus_l: mass=2.171791 mass_center=(0 -0.164502 0) inertia=(0.01276468 0.004403421 0.01432795 0 0 0)
        meshes=humerus_lv.vtp
    Body ulna_l: mass=0.6491332 mass_center=(0 -0.1263794 0) inertia=(0.003479935 0.0007260633 0.003774824 0 0 0)
        meshes=ulna_lv.vtp
    Body radius_l: mass=0.6491332 mass_center=(0 -0.1263794 0) inertia=(0.003479935 0.0007260633 0.003774824 0 0 0)
        meshes=radius_lv.vtp
    Body hand_l: mass=0.4888534 mass_center=(0 -0.068095 0) inertia=(0.0009531306 0.000584487 0.001431833 0 0 0)
        meshes=(pisiform_lvs.vtp lunate_lvs.vtp scaphoid_lvs.vtp triquetrum_lvs.vtp hamate_lvs.vtp capitate_lvs.vtp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)
    Body calcn_l_markerPlate: mass=0 mass_center=(0 0 0) inertia=(0 0 0 0 0 0)
    Body calcn_r_markerPlate: mass=0 mass_center=(0 0 0) inertia=(0 0 0 0 0 0)
    Body femur_l_markerPlate: mass=0 mass_center=(0 0 0) inertia=(0 0 0 0 0 0)
    Body femur_r_markerPlate: mass=0 mass_center=(0 0 0) inertia=(0 0 0 0 0 0)
    Body humerus_l_markerPlate: mass=0 mass_center=(0 0 0) inertia=(0 0 0 0 0 0)
    Body humerus_r_markerPlate: mass=0 mass_center=(0 0 0) inertia=(0 0 0 0 0 0)
    Body pelvis_markerPlate: mass=0 mass_center=(0 0 0) inertia=(0 0 0 0 0 0)
    Body radius_l_markerPlate: mass=0 mass_center=(0 0 0) inertia=(0 0 0 0 0 0)
    Body radius_r_markerPlate: mass=0 mass_center=(0 0 0) inertia=(0 0 0 0 0 0)
    Body tibia_l_markerPlate: mass=0 mass_center=(0 0 0) inertia=(0 0 0 0 0 0)
    Body tibia_r_markerPlate: mass=0 mass_center=(0 0 0) inertia=(0 0 0 0 0 0)
    Body toes_l_markerPlate: mass=0 mass_center=(0 0 0) inertia=(0 0 0 0 0 0)
    Body toes_r_markerPlate: mass=0 mass_center=(0 0 0) inertia=(0 0 0 0 0 0)
    Body torso_markerPlate: mass=0 mass_center=(0 0 0) inertia=(0 0 0 0 0 0)
  JointSet:
    CustomJoint ground_pelvis: socket_parent_frame=ground_offset socket_child_frame=pelvis_offset
      Coordinate pelvis_tilt: default_value=0 range=(-1.570796 1.570796) clamped=true
      Coordinate pelvis_list: default_value=0 range=(-1.570796 1.570796) clamped=true
      Coordinate pelvis_rotation: default_value=0 range=(-1.570796 1.570796) clamped=true
      Coordinate pelvis_tx: default_value=0 range=(-5 5) clamped=true
      Coordinate pelvis_ty: default_value=0.94 range=(-1 2) clamped=true
      Coordinate pelvis_tz: default_value=0 range=(-3 3) clamped=true
      PhysicalOffsetFrame ground_offset: socket_parent=/ground translation=(0 0 0) [meters]
      PhysicalOffsetFrame pelvis_offset: socket_parent=/bodyset/pelvis translation=(0 0 0)
      SpatialTransform:
        TransformAxis rotation1: coordinates=pelvis_tilt axis=(0 0 1) LinearFunction(coefficients=1 0)
        TransformAxis rotation2: coordinates=pelvis_list axis=(1 0 0) LinearFunction(coefficients=1 0)
        TransformAxis rotation3: coordinates=pelvis_rotation axis=(0 1 0) LinearFunction(coefficients=1 0)
        TransformAxis translation1: coordinates=pelvis_tx axis=(1 0 0) LinearFunction(coefficients=1 0)
        TransformAxis translation2: coordinates=pelvis_ty axis=(0 1 0) LinearFunction(coefficients=1 0)
        TransformAxis translation3: coordinates=pelvis_tz axis=(0 0 1) LinearFunction(coefficients=1 0)
    CustomJoint hip_r: socket_parent_frame=pelvis_offset socket_child_frame=femur_r_offset
      Coordinate hip_flexion_r: default_value=0 range=(-0.5235988 2.094395) clamped=true
      Coordinate hip_adduction_r: default_value=0 range=(-0.8726646 0.5235988) clamped=true
      Coordinate hip_rotation_r: default_value=0 range=(-0.6981317 0.6981317) clamped=true
      PhysicalOffsetFrame pelvis_offset: socket_parent=/bodyset/pelvis translation=(-0.0697481 -0.07849 0.0828935)
      PhysicalOffsetFrame femur_r_offset: socket_parent=/bodyset/femur_r translation=(0 0 0)
      SpatialTransform: axes_held_at_zero=(translation1 translation2 translation3)
        TransformAxis rotation1: coordinates=hip_flexion_r axis=(0 0 1) LinearFunction(coefficients=1 0)
        TransformAxis rotation2: coordinates=hip_adduction_r axis=(1 0 0) LinearFunction(coefficients=1 0)
        TransformAxis rotation3: coordinates=hip_rotation_r axis=(0 1 0) LinearFunction(coefficients=1 0)
    CustomJoint walker_knee_r: socket_parent_frame=femur_r_offset socket_child_frame=tibia_r_offset
      Coordinate knee_angle_r: default_value=0 range=(0 2.0944) clamped=true
      PhysicalOffsetFrame femur_r_offset: socket_parent=/bodyset/femur_r translation=(-0.0177946 -0.379605 -0.00254778)
          orientation=(-1.643033 1.4462 1.5708) [radians]
      PhysicalOffsetFrame tibia_r_offset: socket_parent=/bodyset/tibia_r
          translation=(-0.008794056 -0.003842645 -0.001614046) orientation=(-1.640484 1.445183 1.5708)
      SpatialTransform: axes_held_at_zero=translation3
        TransformAxis rotation1: coordinates=knee_angle_r axis=(1 0 0) LinearFunction(coefficients=1 0)
        TransformAxis rotation2: coordinates=knee_angle_r axis=(0 0 1)
          SimmSpline: x=(0 0.174533 0.349066 0.523599 0.698132 0.872665 1.0472 1.22173 1.39626 1.5708 1.74533 1.91986 2.0944)
              y=(0 0.0126809 0.0226969 0.0296054 0.0332049 0.0335354 0.0308779 0.0257548 0.0189295 0.011407 0.00443314 -0.00050475 -0.0016782)
        TransformAxis rotation3: coordinates=knee_angle_r axis=(0 1 0)
          SimmSpline: x=(0 0.174533 0.349066 0.523599 0.698132 0.872665 1.0472 1.22173 1.39626 1.5708 1.74533 1.91986 2.0944)
              y=(0 0.059461 0.109399 0.150618 0.18392 0.210107 0.229983 0.24435 0.254012 0.25977 0.262428 0.262788 0.261654)
        TransformAxis translation1: coordinates=knee_angle_r axis=(0 1 0)
          MultiplierFunction: scale=0.9264671
            SimmSpline: x=(0 0.174533 0.349066 0.523599 0.698132 0.872665 1.0472 1.22173 1.39626 1.5708 1.74533 1.91986 2.0944)
                y=(0 0.000479 0.000835 0.001086 0.001251 0.001346 0.001391 0.001403 0.0014 0.0014 0.001421 0.001481 0.001599)
        TransformAxis translation2: coordinates=knee_angle_r axis=(0 0 1)
          MultiplierFunction: scale=0.9264671
            SimmSpline: x=(0 0.174533 0.349066 0.523599 0.698132 0.872665 1.0472 1.22173 1.39626 1.5708 1.74533 1.91986 2.0944)
                y=(0 0.000988 0.001899 0.002734 0.003492 0.004173 0.004777 0.005305 0.005756 0.00613 0.006427 0.006648 0.006792)
    CustomJoint patellofemoral_r: socket_parent_frame=femur_r_offset socket_child_frame=patella_r_offset
      Coordinate knee_angle_r_beta: default_value=0 range=(-99999.9 99999.9) clamped=false
      PhysicalOffsetFrame femur_r_offset: socket_parent=/bodyset/femur_r
          translation=(-0.007495119 -0.3779615 -0.002547784)
      PhysicalOffsetFrame patella_r_offset: socket_parent=/bodyset/patella_r translation=(0 0 0)
      SpatialTransform: axes_held_at_zero=(rotation2 rotation3)
        TransformAxis rotation1: coordinates=knee_angle_r_beta axis=(0 0 1)
          SimmSpline: x=(0 0.174533 0.349066 0.523599 0.698132 0.872665 1.0472 1.22173 1.39626 1.5708 1.74533 1.91986 2.0944)
              y=(0.00113686 -0.00629212 -0.105582 -0.253683 -0.414245 -0.579047 -0.747244 -0.91799 -1.09044 -1.26379 -1.43763 -1.61186 -1.78634)
        TransformAxis translation1: coordinates=knee_angle_r_beta axis=(1 0 0)
          MultiplierFunction: scale=0.9264671
            SimmSpline: x=(0 0.174533 0.349066 0.523599 0.698132 0.872665 1.0472 1.22173 1.39626 1.5708 1.74533 1.91986 2.0944)
                y=(0.0524 0.0488 0.0437 0.0371 0.0296 0.0216 0.0136 0.0057 -0.0019 -0.0088 -0.0148 -0.0196 -0.0227)
        TransformAxis translation2: coordinates=knee_angle_r_beta axis=(0 1 0)
          MultiplierFunction: scale=0.9264671
            SimmSpline: x=(0 0.174533 0.349066 0.523599 0.698132 0.872665 1.0472 1.22173 1.39626 1.5708 1.74533 1.91986 2.0944)
                y=(-0.0108 -0.019 -0.0263 -0.0322 -0.0367 -0.0395 -0.0408 -0.0404 -0.0384 -0.0349 -0.0301 -0.0245 -0.0187)
        TransformAxis translation3: axis=(0 0 1) MultiplierFunction(scale=0.9264671, Constant(value=0.00275))
    PinJoint ankle_r: socket_parent_frame=tibia_r_offset socket_child_frame=talus_r_offset
      Coordinate ankle_angle_r: default_value=0 range=(-0.6981317 0.5235988) clamped=true
      PhysicalOffsetFrame tibia_r_offset: socket_parent=/bodyset/tibia_r translation=(-0.01084047 -0.4349656 0)
          orientation=(0.2159391 -0.1694496 0.0186622)
      PhysicalOffsetFrame talus_r_offset: socket_parent=/bodyset/talus_r translation=(0 0 0)
          orientation=(0.175895 -0.105208 0.0186622)
    PinJoint subtalar_r: socket_parent_frame=talus_r_offset socket_child_frame=calcn_r_offset
      Coordinate subtalar_angle_r: default_value=0 range=(-0.3490659 0.3490659) clamped=true
      PhysicalOffsetFrame talus_r_offset: socket_parent=/bodyset/talus_r translation=(-0.0477362 -0.0411933 0.00775212)
          orientation=(-1.76819 0.9515436 1.8196)
      PhysicalOffsetFrame calcn_r_offset: socket_parent=/bodyset/calcn_r
          translation=(4.112294e-5 -2.701798e-5 8.59348e-5) orientation=(-1.757459 0.8572367 1.8196)
    PinJoint mtp_r: socket_parent_frame=calcn_r_offset socket_child_frame=toes_r_offset
      Coordinate mtp_angle_r: default_value=0 range=(-0.5235988 0.5235988) clamped=true
      PhysicalOffsetFrame calcn_r_offset: socket_parent=/bodyset/calcn_r
          translation=(0.1750099 -0.001957605 0.001057107) orientation=(-3.14159 0.619901 0)
      PhysicalOffsetFrame toes_r_offset: socket_parent=/bodyset/toes_r translation=(0 0 0)
          orientation=(-3.14159 0.619901 0)
    CustomJoint hip_l: socket_parent_frame=pelvis_offset socket_child_frame=femur_l_offset
      Coordinate hip_flexion_l: default_value=0 range=(-0.5235988 2.094395) clamped=true
      Coordinate hip_adduction_l: default_value=0 range=(-0.8726646 0.5235988) clamped=true
      Coordinate hip_rotation_l: default_value=0 range=(-0.6981317 0.6981317) clamped=true
      PhysicalOffsetFrame pelvis_offset: socket_parent=/bodyset/pelvis translation=(-0.0697481 -0.07849 -0.0828935)
      PhysicalOffsetFrame femur_l_offset: socket_parent=/bodyset/femur_l translation=(0 0 0)
      SpatialTransform: axes_held_at_zero=(translation1 translation2 translation3)
        TransformAxis rotation1: coordinates=hip_flexion_l axis=(0 0 1) LinearFunction(coefficients=1 0)
        TransformAxis rotation2: coordinates=hip_adduction_l axis=(1 0 0) LinearFunction(coefficients=-1 0)
        TransformAxis rotation3: coordinates=hip_rotation_l axis=(0 1 0) LinearFunction(coefficients=-1 0)
    CustomJoint walker_knee_l: socket_parent_frame=femur_l_offset socket_child_frame=tibia_l_offset
      Coordinate knee_angle_l: default_value=0 range=(0 2.0944) clamped=true
      PhysicalOffsetFrame femur_l_offset: socket_parent=/bodyset/femur_l
          translation=(-0.01852861 -0.3829992 0.00254778) orientation=(1.641724 -1.44627 1.5708)
      PhysicalOffsetFrame tibia_l_offset: socket_parent=/bodyset/tibia_l
          translation=(-0.008794056 -0.003842645 0.001614046) orientation=(1.644916 -1.447355 1.5708)
      SpatialTransform: axes_held_at_zero=translation3
        TransformAxis rotation1: coordinates=knee_angle_l axis=(-1 0 0) LinearFunction(coefficients=1 0)
        TransformAxis rotation2: coordinates=knee_angle_l axis=(0 0 1)
          SimmSpline: x=(0 0.174533 0.349066 0.523599 0.698132 0.872665 1.0472 1.22173 1.39626 1.5708 1.74533 1.91986 2.0944)
              y=(0 0.0126809 0.0226969 0.0296054 0.0332049 0.0335354 0.0308779 0.0257548 0.0189295 0.011407 0.00443314 -0.00050475 -0.0016782)
        TransformAxis rotation3: coordinates=knee_angle_l axis=(0 1 0)
          SimmSpline: x=(0 0.174533 0.349066 0.523599 0.698132 0.872665 1.0472 1.22173 1.39626 1.5708 1.74533 1.91986 2.0944)
              y=(0 -0.059461 -0.109399 -0.150618 -0.18392 -0.210107 -0.229983 -0.24435 -0.254012 -0.25977 -0.262428 -0.262788 -0.261654)
        TransformAxis translation1: coordinates=knee_angle_l axis=(0 1 0)
          MultiplierFunction: scale=0.9264671
            SimmSpline: x=(0 0.174533 0.349066 0.523599 0.698132 0.872665 1.0472 1.22173 1.39626 1.5708 1.74533 1.91986 2.0944)
                y=(0 0.000479 0.000835 0.001086 0.001251 0.001346 0.001391 0.001403 0.0014 0.0014 0.001421 0.001481 0.001599)
        TransformAxis translation2: coordinates=knee_angle_l axis=(0 0 1)
          MultiplierFunction: scale=0.9264671
            SimmSpline: x=(0 0.174533 0.349066 0.523599 0.698132 0.872665 1.0472 1.22173 1.39626 1.5708 1.74533 1.91986 2.0944)
                y=(0 -0.000988 -0.001899 -0.002734 -0.003492 -0.004173 -0.004777 -0.005305 -0.005756 -0.00613 -0.006427 -0.006648 -0.006792)
    CustomJoint patellofemoral_l: socket_parent_frame=femur_l_offset socket_child_frame=patella_l_offset
      Coordinate knee_angle_l_beta: default_value=0 range=(-99999.9 99999.9) clamped=false
      PhysicalOffsetFrame femur_l_offset: socket_parent=/bodyset/femur_l
          translation=(-0.007495119 -0.3779615 0.002547784)
      PhysicalOffsetFrame patella_l_offset: socket_parent=/bodyset/patella_l translation=(0 0 0)
      SpatialTransform: axes_held_at_zero=(rotation2 rotation3)
        TransformAxis rotation1: coordinates=knee_angle_l_beta axis=(0 0 1)
          SimmSpline: x=(0 0.174533 0.349066 0.523599 0.698132 0.872665 1.0472 1.22173 1.39626 1.5708 1.74533 1.91986 2.0944)
              y=(0.00113686 -0.00629212 -0.105582 -0.253683 -0.414245 -0.579047 -0.747244 -0.91799 -1.09044 -1.26379 -1.43763 -1.61186 -1.78634)
        TransformAxis translation1: coordinates=knee_angle_l_beta axis=(1 0 0)
          MultiplierFunction: scale=0.9264671
            SimmSpline: x=(0 0.174533 0.349066 0.523599 0.698132 0.872665 1.0472 1.22173 1.39626 1.5708 1.74533 1.91986 2.0944)
                y=(0.0524 0.0488 0.0437 0.0371 0.0296 0.0216 0.0136 0.0057 -0.0019 -0.0088 -0.0148 -0.0196 -0.0227)
        TransformAxis translation2: coordinates=knee_angle_l_beta axis=(0 1 0)
          MultiplierFunction: scale=0.9264671
            SimmSpline: x=(0 0.174533 0.349066 0.523599 0.698132 0.872665 1.0472 1.22173 1.39626 1.5708 1.74533 1.91986 2.0944)
                y=(-0.0108 -0.019 -0.0263 -0.0322 -0.0367 -0.0395 -0.0408 -0.0404 -0.0384 -0.0349 -0.0301 -0.0245 -0.0187)
        TransformAxis translation3: axis=(0 0 1) MultiplierFunction(scale=0.9264671, Constant(value=-0.00275))
    PinJoint ankle_l: socket_parent_frame=tibia_l_offset socket_child_frame=talus_l_offset
      Coordinate ankle_angle_l: default_value=0 range=(-0.6981317 0.5235988) clamped=true
      PhysicalOffsetFrame tibia_l_offset: socket_parent=/bodyset/tibia_l translation=(-0.01092458 -0.435204 0)
          orientation=(-0.193226 0.115727 0.0186622)
      PhysicalOffsetFrame talus_l_offset: socket_parent=/bodyset/talus_l translation=(0 0 0)
          orientation=(-0.175895 0.105208 0.0186622)
    PinJoint subtalar_l: socket_parent_frame=talus_l_offset socket_child_frame=calcn_l_offset
      Coordinate subtalar_angle_l: default_value=0 range=(-0.3490659 0.3490659) clamped=true
      PhysicalOffsetFrame talus_l_offset: socket_parent=/bodyset/talus_l translation=(-0.0477362 -0.041153 -0.00775212)
          orientation=(1.76819 -0.9259347 1.8196)
      PhysicalOffsetFrame calcn_l_offset: socket_parent=/bodyset/calcn_l
          translation=(8.221625e-5 0.0002314427 7.16779e-5) orientation=(1.774683 -0.8855137 1.8196)
    PinJoint mtp_l: socket_parent_frame=calcn_l_offset socket_child_frame=toes_l_offset
      Coordinate mtp_angle_l: default_value=0 range=(-0.5235988 0.5235988) clamped=true
      PhysicalOffsetFrame calcn_l_offset: socket_parent=/bodyset/calcn_l
          translation=(0.1750099 -0.001957605 -0.001057107) orientation=(-3.14159 -0.619901 0)
      PhysicalOffsetFrame toes_l_offset: socket_parent=/bodyset/toes_l translation=(0 0 0)
          orientation=(-3.14159 -0.619901 0)
    CustomJoint back: socket_parent_frame=pelvis_offset socket_child_frame=torso_offset
      Coordinate lumbar_extension: default_value=0 range=(-1.570796 1.570796) clamped=true
      Coordinate lumbar_bending: default_value=0 range=(-1.570796 1.570796) clamped=true
      Coordinate lumbar_rotation: default_value=0 range=(-1.570796 1.570796) clamped=true
      PhysicalOffsetFrame pelvis_offset: socket_parent=/bodyset/pelvis translation=(-0.1248068 0.0815 0)
      PhysicalOffsetFrame torso_offset: socket_parent=/bodyset/torso translation=(0 0 0)
      SpatialTransform: axes_held_at_zero=(translation1 translation2 translation3)
        TransformAxis rotation1: coordinates=lumbar_extension axis=(0 0 1) LinearFunction(coefficients=1 0)
        TransformAxis rotation2: coordinates=lumbar_bending axis=(1 0 0) LinearFunction(coefficients=1 0)
        TransformAxis rotation3: coordinates=lumbar_rotation axis=(0 1 0) LinearFunction(coefficients=1 0)
    CustomJoint acromial_r: socket_parent_frame=torso_offset socket_child_frame=humerus_r_offset
      Coordinate arm_flex_r: default_value=0 range=(-1.570796 1.570796) clamped=true
      Coordinate arm_add_r: default_value=0 range=(-2.094395 1.570796) clamped=true
      Coordinate arm_rot_r: default_value=0 range=(-1.570796 1.570796) clamped=true
      PhysicalOffsetFrame torso_offset: socket_parent=/bodyset/torso translation=(0.003322946 0.3610604 0.1914368)
      PhysicalOffsetFrame humerus_r_offset: socket_parent=/bodyset/humerus_r translation=(0 0 0)
      SpatialTransform: axes_held_at_zero=(translation1 translation2 translation3)
        TransformAxis rotation1: coordinates=arm_flex_r axis=(0 0 1) LinearFunction(coefficients=1 0)
        TransformAxis rotation2: coordinates=arm_add_r axis=(1 0 0) LinearFunction(coefficients=1 0)
        TransformAxis rotation3: coordinates=arm_rot_r axis=(0 1 0) LinearFunction(coefficients=1 0)
    PinJoint elbow_r: socket_parent_frame=humerus_r_offset socket_child_frame=ulna_r_offset
      Coordinate elbow_flex_r: default_value=0 range=(0 2.618) clamped=true
      PhysicalOffsetFrame humerus_r_offset: socket_parent=/bodyset/humerus_r translation=(0.013144 -0.286273 -0.009595)
          orientation=(-0.0228627 0.228018 0.0051689)
      PhysicalOffsetFrame ulna_r_offset: socket_parent=/bodyset/ulna_r translation=(0 0 0)
          orientation=(-0.0228627 0.228018 0.0051689)
    PinJoint radioulnar_r: socket_parent_frame=ulna_r_offset socket_child_frame=radius_r_offset
      Coordinate pro_sup_r: default_value=0 range=(0 1.570796) clamped=true
      PhysicalOffsetFrame ulna_r_offset: socket_parent=/bodyset/ulna_r translation=(-0.00705376 -0.01363881 0.02734997)
          orientation=(-1.56884 0.056428 1.53614)
      PhysicalOffsetFrame radius_r_offset: socket_parent=/bodyset/radius_r translation=(0 0 0)
          orientation=(-1.56884 0.056428 1.53614)
    UniversalJoint radius_hand_r: socket_parent_frame=radius_r_offset socket_child_frame=hand_r_offset
      Coordinate wrist_flex_r: default_value=0 range=(-1.22173 1.22173) clamped=true locked=true
      Coordinate wrist_dev_r: default_value=0 range=(-0.4363323 0.6108652) clamped=true locked=true
      PhysicalOffsetFrame radius_r_offset: socket_parent=/bodyset/radius_r
          translation=(-0.009224309 -0.2472968 0.0142711) orientation=(-1.5708 0 -1.5708)
      PhysicalOffsetFrame hand_r_offset: socket_parent=/bodyset/hand_r translation=(0 0 0)
          orientation=(-1.5708 0 -1.5708)
    CustomJoint acromial_l: socket_parent_frame=torso_offset socket_child_frame=humerus_l_offset
      Coordinate arm_flex_l: default_value=0 range=(-1.570796 1.570796) clamped=true
      Coordinate arm_add_l: default_value=0 range=(-2.094395 1.570796) clamped=true
      Coordinate arm_rot_l: default_value=0 range=(-1.570796 1.570796) clamped=true
      PhysicalOffsetFrame torso_offset: socket_parent=/bodyset/torso translation=(0.003322946 0.3610604 -0.1914368)
      PhysicalOffsetFrame humerus_l_offset: socket_parent=/bodyset/humerus_l translation=(0 0 0)
      SpatialTransform: axes_held_at_zero=(translation1 translation2 translation3)
        TransformAxis rotation1: coordinates=arm_flex_l axis=(0 0 1) LinearFunction(coefficients=1 0)
        TransformAxis rotation2: coordinates=arm_add_l axis=(-1 0 0) LinearFunction(coefficients=1 0)
        TransformAxis rotation3: coordinates=arm_rot_l axis=(0 -1 0) LinearFunction(coefficients=1 0)
    PinJoint elbow_l: socket_parent_frame=humerus_l_offset socket_child_frame=ulna_l_offset
      Coordinate elbow_flex_l: default_value=0 range=(0 2.618) clamped=true
      PhysicalOffsetFrame humerus_l_offset: socket_parent=/bodyset/humerus_l translation=(0.013144 -0.286273 0.009595)
          orientation=(0.0228627 -0.228018 0.0051689)
      PhysicalOffsetFrame ulna_l_offset: socket_parent=/bodyset/ulna_l translation=(0 0 0)
          orientation=(0.0228627 -0.228018 0.0051689)
    PinJoint radioulnar_l: socket_parent_frame=ulna_l_offset socket_child_frame=radius_l_offset
      Coordinate pro_sup_l: default_value=0 range=(0 1.570796) clamped=true
      PhysicalOffsetFrame ulna_l_offset: socket_parent=/bodyset/ulna_l
          translation=(-0.00705376 -0.01363881 -0.02734997) orientation=(1.56884 -0.056428 1.53614)
      PhysicalOffsetFrame radius_l_offset: socket_parent=/bodyset/radius_l translation=(0 0 0)
          orientation=(1.56884 -0.056428 1.53614)
    UniversalJoint radius_hand_l: socket_parent_frame=radius_l_offset socket_child_frame=hand_l_offset
      Coordinate wrist_flex_l: default_value=0 range=(-1.22173 1.22173) clamped=true locked=true
      Coordinate wrist_dev_l: default_value=0 range=(-0.4363323 0.6108652) clamped=true locked=true
      PhysicalOffsetFrame radius_l_offset: socket_parent=/bodyset/radius_l
          translation=(-0.009224309 -0.2472968 -0.0142711) orientation=(1.5708 0 1.5708)
      PhysicalOffsetFrame hand_l_offset: socket_parent=/bodyset/hand_l translation=(0 0 0)
          orientation=(1.5708 0 1.5708)
    WeldJoint calcn_l_markerPlate_jnt: socket_parent_frame=calcn_l_offset socket_child_frame=calcn_l_markerPlate_offset
      PhysicalOffsetFrame calcn_l_offset: socket_parent=/bodyset/calcn_l
          translation=(0.08227883 0.01507135 -0.02107221)
      PhysicalOffsetFrame calcn_l_markerPlate_offset: socket_parent=/bodyset/calcn_l_markerPlate translation=(0 0 0)
    WeldJoint calcn_r_markerPlate_jnt: socket_parent_frame=calcn_r_offset socket_child_frame=calcn_r_markerPlate_offset
      PhysicalOffsetFrame calcn_r_offset: socket_parent=/bodyset/calcn_r translation=(0.08301579 0.0217425 0.01924059)
      PhysicalOffsetFrame calcn_r_markerPlate_offset: socket_parent=/bodyset/calcn_r_markerPlate translation=(0 0 0)
    WeldJoint femur_l_markerPlate_jnt: socket_parent_frame=femur_l_offset socket_child_frame=femur_l_markerPlate_offset
      PhysicalOffsetFrame femur_l_offset: socket_parent=/bodyset/femur_l
          translation=(-0.003675058 -0.2884826 -0.02542557) orientation=(1.996067e-5 9.764964e-6 2.693906e-5)
      PhysicalOffsetFrame femur_l_markerPlate_offset: socket_parent=/bodyset/femur_l_markerPlate translation=(0 0 0)
    WeldJoint femur_r_markerPlate_jnt: socket_parent_frame=femur_r_offset socket_child_frame=femur_r_markerPlate_offset
      PhysicalOffsetFrame femur_r_offset: socket_parent=/bodyset/femur_r
          translation=(0.03991768 -0.3021945 0.008996187) orientation=(2.318714e-5 -5.97732e-5 -1.871268e-5)
      PhysicalOffsetFrame femur_r_markerPlate_offset: socket_parent=/bodyset/femur_r_markerPlate translation=(0 0 0)
    WeldJoint humerus_l_markerPlate_jnt: socket_parent_frame=humerus_l_offset
        socket_child_frame=humerus_l_markerPlate_offset
      PhysicalOffsetFrame humerus_l_offset: socket_parent=/bodyset/humerus_l
          translation=(-0.1064256 -0.1064256 -0.1064256)
      PhysicalOffsetFrame humerus_l_markerPlate_offset: socket_parent=/bodyset/humerus_l_markerPlate
          translation=(0 0 0)
    WeldJoint humerus_r_markerPlate_jnt: socket_parent_frame=humerus_r_offset
        socket_child_frame=humerus_r_markerPlate_offset
      PhysicalOffsetFrame humerus_r_offset: socket_parent=/bodyset/humerus_r
          translation=(-0.0764259 -0.0764259 -0.0764259)
      PhysicalOffsetFrame humerus_r_markerPlate_offset: socket_parent=/bodyset/humerus_r_markerPlate
          translation=(0 0 0)
    WeldJoint pelvis_markerPlate_jnt: socket_parent_frame=pelvis_offset socket_child_frame=pelvis_markerPlate_offset
      PhysicalOffsetFrame pelvis_offset: socket_parent=/bodyset/pelvis translation=(-0.08072524 0.02934915 0.004724622)
          orientation=(1.405901e-5 0.0001401145 2.394246e-5)
      PhysicalOffsetFrame pelvis_markerPlate_offset: socket_parent=/bodyset/pelvis_markerPlate translation=(0 0 0)
    WeldJoint radius_l_markerPlate_jnt: socket_parent_frame=radius_l_offset
        socket_child_frame=radius_l_markerPlate_offset
      PhysicalOffsetFrame radius_l_offset: socket_parent=/bodyset/radius_l
          translation=(-0.1034315 -0.1034315 -0.1034315)
      PhysicalOffsetFrame radius_l_markerPlate_offset: socket_parent=/bodyset/radius_l_markerPlate translation=(0 0 0)
    WeldJoint radius_r_markerPlate_jnt: socket_parent_frame=radius_r_offset
        socket_child_frame=radius_r_markerPlate_offset
      PhysicalOffsetFrame radius_r_offset: socket_parent=/bodyset/radius_r
          translation=(-0.0935063 -0.0935063 -0.0935063)
      PhysicalOffsetFrame radius_r_markerPlate_offset: socket_parent=/bodyset/radius_r_markerPlate translation=(0 0 0)
    WeldJoint tibia_l_markerPlate_jnt: socket_parent_frame=tibia_l_offset socket_child_frame=tibia_l_markerPlate_offset
      PhysicalOffsetFrame tibia_l_offset: socket_parent=/bodyset/tibia_l
          translation=(0.004929224 -0.2875589 -0.03005489) orientation=(-0.0006848774 4.641355e-5 2.176819e-5)
      PhysicalOffsetFrame tibia_l_markerPlate_offset: socket_parent=/bodyset/tibia_l_markerPlate translation=(0 0 0)
    WeldJoint tibia_r_markerPlate_jnt: socket_parent_frame=tibia_r_offset socket_child_frame=tibia_r_markerPlate_offset
      PhysicalOffsetFrame tibia_r_offset: socket_parent=/bodyset/tibia_r translation=(0.02245814 -0.2795298 0.02583193)
          orientation=(-0.0006108767 -0.0004082104 -0.0001384705)
      PhysicalOffsetFrame tibia_r_markerPlate_offset: socket_parent=/bodyset/tibia_r_markerPlate translation=(0 0 0)
    WeldJoint toes_l_markerPlate_jnt: socket_parent_frame=toes_l_offset socket_child_frame=toes_l_markerPlate_offset
      PhysicalOffsetFrame toes_l_offset: socket_parent=/bodyset/toes_l
          translation=(0.05117377 0.004256453 -0.0003404967)
      PhysicalOffsetFrame toes_l_markerPlate_offset: socket_parent=/bodyset/toes_l_markerPlate translation=(0 0 0)
    WeldJoint toes_r_markerPlate_jnt: socket_parent_frame=toes_r_offset socket_child_frame=toes_r_markerPlate_offset
      PhysicalOffsetFrame toes_r_offset: socket_parent=/bodyset/toes_r translation=(0.04584096 0.00542706 -0.002933517)
      PhysicalOffsetFrame toes_r_markerPlate_offset: socket_parent=/bodyset/toes_r_markerPlate translation=(0 0 0)
    WeldJoint torso_markerPlate_jnt: socket_parent_frame=torso_offset socket_child_frame=torso_markerPlate_offset
      PhysicalOffsetFrame torso_offset: socket_parent=/bodyset/torso translation=(-0.02286475 0.3493719 0.00460733)
          orientation=(1.273349e-5 1.568031e-5 1.306172e-5)
      PhysicalOffsetFrame torso_markerPlate_offset: socket_parent=/bodyset/torso_markerPlate translation=(0 0 0)
  ConstraintSet:
    CoordinateCouplerConstraint patellofemoral_knee_angle_r_con: independent_coordinate_names=knee_angle_r
        dependent_coordinate_name=knee_angle_r_beta scale_factor=1
        coupled_coordinates_function=LinearFunction(coefficients=1 0)
    CoordinateCouplerConstraint patellofemoral_knee_angle_l_con: independent_coordinate_names=knee_angle_l
        dependent_coordinate_name=knee_angle_l_beta scale_factor=1
        coupled_coordinates_function=LinearFunction(coefficients=1 0)
  ForceSet:
    Millard2012EquilibriumMuscle [values shared by the 40 below unless stated]: fiber_damping=0.01
        default_activation=0.01 minimum_activation=0.01
      ActiveForceLengthCurve: min_norm_active_fiber_length=0.25 transition_norm_fiber_length=0.77
          max_norm_active_fiber_length=1.9 shallow_ascending_slope=0.75 minimum_value=0
      ForceVelocityCurve: concentric_slope_at_vmax=0 concentric_slope_near_vmax=0.25 isometric_slope=5
          eccentric_slope_at_vmax=0 eccentric_slope_near_vmax=0.15 max_eccentric_velocity_force_multiplier=1.4
      FiberForceLengthCurve: strain_at_zero_force=0 strain_at_one_norm_force=0.7
      TendonForceLengthCurve
    Millard2012EquilibriumMuscle addbrev_l: max_isometric_force=625.8197 optimal_fiber_length=0.1022927
        tendon_slack_length=0.03517272 pennation_angle_at_optimal=0.1147809 [radians] muscle_volume=0.00012543
        ignore_tendon_compliance=true
      PathPoint P1: pelvis (-0.0236724 -0.094 -0.01671551)
      PathPoint P2: femur_l (-0.001852934 -0.1093231 -0.02306903)
      PathWrap: wrap_object=AB_at_femshaft_l method=hybrid
    Millard2012EquilibriumMuscle addlong_l: max_isometric_force=916.8 optimal_fiber_length=0.1025816
        tendon_slack_length=0.1249555 pennation_angle_at_optimal=0.1377704 muscle_volume=0.00019284
      PathPoint P1: pelvis (-0.009394595 -0.0889 -0.02049278)
      PathPoint P2: femur_l (0.01043202 -0.2217684 -0.01466597)
      PathWrap: wrap_object=AL_at_femshaft_l method=hybrid
    Millard2012EquilibriumMuscle addmagDist_l: max_isometric_force=597.2951 optimal_fiber_length=0.1632866
        tendon_slack_length=0.08051973 pennation_angle_at_optimal=0.194705 muscle_volume=0.00016809
        ignore_tendon_compliance=true
      PathPoint P1: pelvis (-0.09176462 -0.12767 -0.04322152)
      PathPoint P2: femur_l (0.01042275 -0.2431976 -0.01788081)
      PathWrap: wrap_object=AMdist_at_femshaft_l method=hybrid
    Millard2012EquilibriumMuscle addmagIsch_l: max_isometric_force=597.2951 optimal_fiber_length=0.1436481
        tendon_slack_length=0.1989582 pennation_angle_at_optimal=0.1680443 muscle_volume=0.00016809
      PathPoint P1: pelvis (-0.1110744 -0.12976 -0.04527297)
      PathPoint P2: femur_l (0.004456307 -0.3594414 0.03032327)
      PathWrap: wrap_object=AMisch_at_condyles_l method=hybrid
    Millard2012EquilibriumMuscle addmagMid_l: max_isometric_force=597.2951 optimal_fiber_length=0.1293667
        tendon_slack_length=0.0438059 pennation_angle_at_optimal=0.2073076 muscle_volume=0.00016809
        ignore_tendon_compliance=true
      PathPoint P1: pelvis (-0.06526641 -0.12075 -0.03097796)
      PathPoint P2: femur_l (0.00224205 -0.1504583 -0.02707137)
      PathWrap: wrap_object=AMmid_at_femshaft_l method=hybrid
    Millard2012EquilibriumMuscle addmagProx_l: max_isometric_force=597.2951 optimal_fiber_length=0.1074937
        tendon_slack_length=0.0410472 pennation_angle_at_optimal=0.3114833 muscle_volume=0.00016809
        ignore_tendon_compliance=true
      PathPoint P1: pelvis (-0.03839638 -0.10755 -0.01481602)
      PathPoint P2: femur_l (-0.01414715 -0.07306119 -0.02966548)
      PathWrap: wrap_object=AMprox_at_femshaft_l method=hybrid
    Millard2012EquilibriumMuscle bflh_l: max_isometric_force=1313.184 optimal_fiber_length=0.09170989
        tendon_slack_length=0.3055994 pennation_angle_at_optimal=0.1759182 muscle_volume=0.00024915
      PathPoint P1: pelvis (-0.1288968 -0.1191 -0.06360575)
      PathPoint P2: tibia_l (-0.03663493 -0.03804814 -0.02750337)
      PathPoint P3: tibia_l (-0.03119948 -0.04946259 -0.03293882)
    Millard2012EquilibriumMuscle bfsh_l: max_isometric_force=557.1148 optimal_fiber_length=0.1053633
        tendon_slack_length=0.1010812 pennation_angle_at_optimal=0.2642232 muscle_volume=0.00011946
        ignore_tendon_compliance=true
      PathPoint P1: femur_l (0.004632335 -0.1955772 -0.02167933)
      PathPoint P2: tibia_l (-0.0327214 -0.04554906 -0.03456946)
      PathWrap: wrap_object=BF_at_gastroc_l method=hybrid
    Millard2012EquilibriumMuscle edl_l: max_isometric_force=603.4982 optimal_fiber_length=0.07252254
        tendon_slack_length=0.3860284 pennation_angle_at_optimal=0.2182582 muscle_volume=0.00012287
      PathPoint P1: tibia_l (-0.01739344 -0.1257763 -0.02228534)
      PathPoint P2: tibia_l (0.01782827 -0.4087458 -0.01217541)
      PathPoint P3: calcn_l (0.08995195 0.03523689 -0.000783042)
      PathPoint P4: calcn_l (0.1581745 0.005383414 -0.01272443)
      PathPoint P5: toes_l (0.0002936407 0.004600372 -0.01497568)
      PathPoint P6: toes_l (0.04336095 -0.000391521 -0.02447006)
    Millard2012EquilibriumMuscle ehl_l: appliesForce=false max_isometric_force=285.8675 optimal_fiber_length=0.07788363
        tendon_slack_length=0.3402674 pennation_angle_at_optimal=0.1972681
      PathPoint P1: tibia_l (-0.01521926 -0.1684989 -0.020546)
      PathPoint P2: tibia_l (0.007718337 -0.3162344 -0.01782827)
      PathPoint P3: tibia_l (0.0217418 -0.4014623 0.003043851)
      PathPoint P4: calcn_l (0.09494384 0.03807542 0.02065273)
      PathPoint P5: calcn_l (0.1265592 0.030245 0.02515522)
      PathPoint P6: calcn_l (0.1697243 0.01360535 0.02740647)
      PathPoint P7: toes_l (0.02916831 0.00401309 0.02398066)
      PathPoint P8: toes_l (0.05510658 0.003327928 0.01820573)
    Millard2012EquilibriumMuscle fdl_l: max_isometric_force=423.177 optimal_fiber_length=0.04611481
        tendon_slack_length=0.3916377 pennation_angle_at_optimal=0.2248391 muscle_volume=0.00003669
      PathPoint P1: tibia_l (-0.002500306 -0.1991548 0.001956762)
      PathPoint P2: tibia_l (-0.01913278 -0.3962442 0.01347991)
      PathPoint P3: calcn_l (0.04267579 0.03083228 0.02740647)
      PathPoint P4: calcn_l (0.06929922 0.01722692 0.02574251)
      PathPoint P5: calcn_l (0.1622855 -0.0079283 -0.01135411)
      PathPoint P6: toes_l (-0.001859725 -0.007634659 -0.0143884)
      PathPoint P7: toes_l (0.02789587 -0.006949498 -0.02104425)
      PathPoint P8: toes_l (0.04316519 -0.005872815 -0.02368702)
    Millard2012EquilibriumMuscle fhl_l: appliesForce=false max_isometric_force=907.8393 optimal_fiber_length=0.05419994
        tendon_slack_length=0.3644249 pennation_angle_at_optimal=0.2580255
      PathPoint P1: tibia_l (-0.03369978 -0.2351375 -0.0217418)
      PathPoint P2: tibia_l (-0.02630757 -0.3990707 0.008261882)
      PathPoint P3: calcn_l (0.03660721 0.02701495 0.02358914)
      PathPoint P4: calcn_l (0.1015997 0.006655857 0.02505734)
      PathPoint P5: calcn_l (0.1689413 -0.005187653 0.02632979)
      PathPoint P6: toes_l (0.01517144 -0.006264336 0.02593827)
      PathPoint P7: toes_l (0.0550087 -0.009983785 0.01771632)
    Millard2012EquilibriumMuscle gaslat_l: max_isometric_force=1575.059 optimal_fiber_length=0.06339645
        tendon_slack_length=0.4054679 pennation_angle_at_optimal=0.2102268 muscle_volume=0.00018004
      PathPoint P1: femur_l (-0.002779401 -0.3533545 -0.02566314)
      PathPoint P2: calcn_l (0.004306731 0.03034288 0.005187653)
      PathWrap shank: wrap_object=GasLat_at_shank_l method=hybrid
      PathWrap condyles: wrap_object=Gastroc_at_condyles_l method=hybrid
    Millard2012EquilibriumMuscle gasmed_l: max_isometric_force=3115.515 optimal_fiber_length=0.05482747
        tendon_slack_length=0.4286393 pennation_angle_at_optimal=0.1656816 muscle_volume=0.00030888
      PathPoint P1: femur_l (0.007411737 -0.3509457 0.01927052)
      PathPoint P2: calcn_l (0.004306731 0.03034288 0.005187653)
      PathWrap shank: wrap_object=GasMed_at_shank_l method=hybrid
      PathWrap condyles: wrap_object=Gastroc_at_condyles_l method=hybrid
    Millard2012EquilibriumMuscle glmax1_l: max_isometric_force=983.7836 optimal_fiber_length=0.1489799
        tendon_slack_length=0.0494987 pennation_angle_at_optimal=0.3540118 muscle_volume=0.00030035
        ignore_tendon_compliance=true
      PathPoint P1: pelvis (-0.1525692 0.0345 -0.06110928)
      PathPoint P2: pelvis (-0.1557916 -0.0242 -0.08455441)
      PathPoint P3: femur_l (-0.04113514 -0.03020283 -0.02797931)
      PathPoint P4: femur_l (-0.02566314 -0.05243804 -0.04354395)
      PathWrap: wrap_object=Gmax1_at_pelvis_l method=hybrid
    Millard2012EquilibriumMuscle glmax2_l: max_isometric_force=1406.046 optimal_fiber_length=0.1600494
        tendon_slack_length=0.06920571 pennation_angle_at_optimal=0.3673821 muscle_volume=0.00042834
        ignore_tendon_compliance=true
      PathPoint P1: pelvis (-0.163228 0.0087 -0.05014652)
      PathPoint P2: pelvis (-0.1665744 -0.0609 -0.08824484)
      PathPoint P3: femur_l (-0.04169102 -0.05410568 -0.02334697)
      PathPoint P4: femur_l (-0.01445289 -0.09412905 -0.03881897)
      PathWrap: wrap_object=Gmax2_at_pelvis_l method=hybrid
    Millard2012EquilibriumMuscle glmax3_l: max_isometric_force=947.7541 optimal_fiber_length=0.1702211
        tendon_slack_length=0.0710613 pennation_angle_at_optimal=0.3824161 muscle_volume=0.00028926
        ignore_tendon_compliance=true
      PathPoint P1: pelvis (-0.161121 -0.0525 -0.009768802)
      PathPoint P2: pelvis (-0.1577747 -0.1263 -0.04721588)
      PathPoint P3: femur_l (-0.02603372 -0.1042275 -0.00870879)
      PathPoint P4: femur_l (-0.005558802 -0.1314657 -0.0380778)
      PathWrap: wrap_object=Gmax3_at_pelvis_l method=hybrid
    Millard2012EquilibriumMuscle glmed1_l: max_isometric_force=1093.467 optimal_fiber_length=0.07226623
        tendon_slack_length=0.05525578 pennation_angle_at_optimal=0.3165559 muscle_volume=0.00015529
        ignore_tendon_compliance=true
      PathPoint P1: pelvis (-0.05515297 0.0245 -0.1272115)
      PathPoint P2: femur_l (-0.02019698 -0.01083966 -0.05141892)
    Millard2012EquilibriumMuscle glmed2_l: max_isometric_force=765.0917 optimal_fiber_length=0.07227849
        tendon_slack_length=0.06460391 pennation_angle_at_optimal=0.3165559 muscle_volume=0.00010836
        ignore_tendon_compliance=true
      PathPoint P1: pelvis (-0.1053484 0.0316 -0.07326601)
      PathPoint P2: femur_l (-0.02390285 -0.005373509 -0.04882481)
    Millard2012EquilibriumMuscle glmed3_l: max_isometric_force=871.1993 optimal_fiber_length=0.07553761
        tendon_slack_length=0.04680522 pennation_angle_at_optimal=0.3165559 muscle_volume=0.00012372
        ignore_tendon_compliance=true
      PathPoint P1: pelvis (-0.142778 -0.0073 -0.05709322)
      PathPoint P2: femur_l (-0.02862783 -0.004354395 -0.04799099)
    Millard2012EquilibriumMuscle glmin1_l: max_isometric_force=374.0459 optimal_fiber_length=0.06602497
        tendon_slack_length=0.01566907 pennation_angle_at_optimal=0.1745329 muscle_volume=0.000038397
        ignore_tendon_compliance=true
      PathPoint P1: pelvis (-0.05750781 -0.0149 -0.113101)
      PathPoint P2: femur_l (-0.006670563 -0.009635258 -0.05188216)
    Millard2012EquilibriumMuscle glmin2_l: max_isometric_force=394.8197 optimal_fiber_length=0.05387839
        tendon_slack_length=0.02511027 pennation_angle_at_optimal=0 muscle_volume=0.000040957
        ignore_tendon_compliance=true
      PathPoint P1: pelvis (-0.07634658 -0.0142 -0.1053945)
      PathPoint P2: femur_l (-0.008894084 -0.009635258 -0.05188216)
    Millard2012EquilibriumMuscle glmin3_l: max_isometric_force=446.7738 optimal_fiber_length=0.03713203
        tendon_slack_length=0.0497105 pennation_angle_at_optimal=0.01745329 muscle_volume=0.000046076
      PathPoint P1: pelvis (-0.09778807 -0.0155 -0.08661671)
      PathPoint P2: femur_l (-0.01250731 -0.007689677 -0.05095569)
    Millard2012EquilibriumMuscle grac_l: appliesForce=false max_isometric_force=281.3115 optimal_fiber_length=0.216117
        tendon_slack_length=0.1631918 pennation_angle_at_optimal=0.1720016 ignore_tendon_compliance=true
      PathPoint P1: pelvis (-0.05869763 -0.12932 -0.02665797)
      PathPoint P2: tibia_l (-0.02002419 -0.05169112 0.03218873)
      PathPoint P3: tibia_l (0.00193502 -0.07568319 0.01709992)
      PathWrap: wrap_object=GR_at_condyles_l method=hybrid
    Millard2012EquilibriumMuscle iliacus_l: max_isometric_force=1021.141 optimal_fiber_length=0.1100053
        tendon_slack_length=0.09919122 pennation_angle_at_optimal=0.279914 muscle_volume=0.00021161
        ignore_tendon_compliance=true
      PathPoint P1: pelvis (-0.07498325 0.0309 -0.09150111)
      PathPoint P2: pelvis (-0.0167318 -0.0557 -0.08205794)
      PathPoint P3: femur_l (-0.002130874 -0.05234539 -0.01287789)
      PathPoint P4: femur_l (-0.0113029 -0.05901595 -0.01815875)
      PathWrap: wrap_object=IL_at_brim_l method=hybrid range=(2 3)
    Millard2012EquilibriumMuscle perbrev_l: max_isometric_force=521.2016 optimal_fiber_length=0.04840581
        tendon_slack_length=0.1572949 pennation_angle_at_optimal=0.2052361 muscle_volume=0.000045223
      PathPoint P1: tibia_l (-0.02641628 -0.2752511 -0.02728595)
      PathPoint P2: tibia_l (-0.03685234 -0.4232041 -0.02706854)
      PathPoint P3: tibia_l (-0.03098206 -0.4352707 -0.02772079)
      PathPoint P4: calcn_l (0.0461016 0.02642767 -0.0228061)
      PathPoint P5: calcn_l (0.06626493 0.02143577 -0.03357292)
    Millard2012EquilibriumMuscle perlong_l: max_isometric_force=1115.371 optimal_fiber_length=0.05356112
        tendon_slack_length=0.3502779 pennation_angle_at_optimal=0.2479525 muscle_volume=0.000097272
      PathPoint P1: tibia_l (-0.0217418 -0.1492574 -0.03065593)
      PathPoint P2: tibia_l (-0.03446075 -0.423965 -0.02576403)
      PathPoint P3: tibia_l (-0.02956884 -0.4363578 -0.02609015)
      PathPoint P4: calcn_l (0.04287155 0.02251246 -0.02163153)
      PathPoint P5: calcn_l (0.06665645 0.01037531 -0.02779799)
      PathPoint P6: calcn_l (0.08339397 0.006753737 -0.01154987)
      PathPoint P7: calcn_l (0.1177499 0.008319821 0.01800997)
    Millard2012EquilibriumMuscle piri_l: appliesForce=false max_isometric_force=1029.787
        optimal_fiber_length=0.02738815 tendon_slack_length=0.1210411 pennation_angle_at_optimal=0.1745329
      PathPoint P1: pelvis (-0.1261826 -0.00653 -0.01466406)
      PathPoint P2: pelvis (-0.1264428 -0.03066 -0.06612393)
      PathPoint P3: femur_l (-0.01371171 -0.003335281 -0.04048661)
    Millard2012EquilibriumMuscle psoas_l: max_isometric_force=1426.79 optimal_fiber_length=0.1194187
        tendon_slack_length=0.1016879 pennation_angle_at_optimal=0.2155251 muscle_volume=0.00032424
        ignore_tendon_compliance=true
      PathPoint P1: pelvis (-0.07510719 0.062 -0.04233147)
      PathPoint P2: pelvis (-0.02540755 -0.0654 -0.07120371)
      PathPoint P3: femur_l (-0.01222937 -0.04326601 -0.004261749)
      PathPoint P4: femur_l (-0.02177198 -0.04854687 -0.00815291)
      PathWrap: wrap_object=PS_at_brim_l method=hybrid range=(2 3)
    Millard2012EquilibriumMuscle recfem_l: max_isometric_force=2191.741 optimal_fiber_length=0.0718876
        tendon_slack_length=0.4247842 pennation_angle_at_optimal=0.2170149 muscle_volume=0.00032339
      PathPoint P1: pelvis (-0.02974542 -0.0388 -0.1012699)
      PathPoint P2: patella_l (0.01 0.049 -0.0007)
      PathPoint P3: patella_l (0.0121 0.0437 0.001)
      PathPoint P4: patella_l (0.005 0.00247 -3e-5)
      PathPoint P5: tibia_l (0.03543913 -0.06861711 0.0005109322)
      PathWrap: wrap_object=KnExt_at_fem_l method=hybrid
    Millard2012EquilibriumMuscle sart_l: appliesForce=false max_isometric_force=249.4131 optimal_fiber_length=0.3896408
        tendon_slack_length=0.1198893 pennation_angle_at_optimal=0.02613542 ignore_tendon_compliance=true
      PathPoint P1: pelvis (-0.02416815 -0.0156 -0.1146206)
      PathPoint P2: femur_l (-0.002779401 -0.3305634 0.03900426)
      PathPoint P3: tibia_l (-0.02728595 -0.0435923 0.03967878)
      PathPoint P4: tibia_l (-0.01728473 -0.06511668 0.02869917)
      PathPoint P5: tibia_l (0.01478442 -0.08805427 0.002826433)
    Millard2012EquilibriumMuscle semimem_l: max_isometric_force=2200.987 optimal_fiber_length=0.06458867
        tendon_slack_length=0.325364 pennation_angle_at_optimal=0.2545615 muscle_volume=0.00029523
      PathPoint P1: pelvis (-0.122328 -0.114 -0.06664494)
      PathPoint P2: tibia_l (-0.0315256 -0.04533164 0.02130696)
      PathWrap: wrap_object=SM_at_condyles_l method=hybrid
    Millard2012EquilibriumMuscle semiten_l: max_isometric_force=591.2951 optimal_fiber_length=0.1838167
        tendon_slack_length=0.2354368 pennation_angle_at_optimal=0.241295 muscle_volume=0.00022185
      PathPoint P1: pelvis (-0.1286489 -0.1253 -0.05589925)
      PathPoint P2: tibia_l (-0.0339172 -0.05522416 0.02489436)
      PathPoint P3: tibia_l (0.002065471 -0.08403204 0.01271895)
      PathWrap: wrap_object=ST_at_condyles_l method=hybrid
    Millard2012EquilibriumMuscle soleus_l: max_isometric_force=6194.843 optimal_fiber_length=0.0475822
        tendon_slack_length=0.2992876 pennation_angle_at_optimal=0.3814289 muscle_volume=0.00052988
      PathPoint P1: tibia_l (-0.008261882 -0.09957742 -0.01065348)
      PathPoint P2: calcn_l (0.004306731 0.03034288 0.005187653)
    Millard2012EquilibriumMuscle tfl_l: appliesForce=false max_isometric_force=411.2066 optimal_fiber_length=0.09038066
        tendon_slack_length=0.4276404 pennation_angle_at_optimal=0.05235988
      PathPoint P1: pelvis (-0.03854511 0.0214 -0.1347009)
      PathPoint P2: femur_l (0.02723813 -0.09218347 -0.05531008)
      PathPoint P3: femur_l (0.009913198 -0.3752192 -0.03001753)
      PathPoint P4: tibia_l (0.01174057 -0.04457068 -0.03761331)
    Millard2012EquilibriumMuscle tibant_l: max_isometric_force=1227.452 optimal_fiber_length=0.07289221
        tendon_slack_length=0.2566286 pennation_angle_at_optimal=0.1951828 muscle_volume=0.00016297
      PathPoint P1: tibia_l (0.01674118 -0.1426262 -0.01761085)
      PathPoint P2: tibia_l (0.02728595 -0.2071993 -0.01391475)
      PathPoint P3: tibia_l (0.02532919 -0.3977662 0.01434959)
      PathPoint P4: calcn_l (0.1141284 0.01742268 0.02985348)
    Millard2012EquilibriumMuscle tibpost_l: max_isometric_force=1730.154 optimal_fiber_length=0.04046212
        tendon_slack_length=0.300554 pennation_angle_at_optimal=0.2264891 muscle_volume=0.00012714
      PathPoint P1: tibia_l (-0.004457068 -0.1417565 -0.01119702)
      PathPoint P2: tibia_l (-0.01782827 -0.3973313 0.01902407)
      PathPoint P3: calcn_l (0.04081606 0.032692 0.02799375)
      PathPoint P4: calcn_l (0.07556355 0.01556296 0.02750435)
    Millard2012EquilibriumMuscle vasint_l: max_isometric_force=1697.361 optimal_fiber_length=0.0948144
        tendon_slack_length=0.1930764 pennation_angle_at_optimal=0.06309973 muscle_volume=0.00032765
      PathPoint P1: femur_l (0.02686754 -0.1782523 -0.02872048)
      PathPoint P2: femur_l (0.03103665 -0.1930757 -0.02640431)
      PathPoint P3: patella_l (0.0058 0.048 0.0006)
      PathPoint P4: patella_l (0.005 0.00247 0.00039)
      PathPoint P5: tibia_l (0.03540651 -0.06870407 -0.0004674486)
      PathWrap: wrap_object=KnExt_at_fem_l method=hybrid
    Millard2012EquilibriumMuscle vaslat_l: max_isometric_force=5148.767 optimal_fiber_length=0.09479414
        tendon_slack_length=0.2103794 pennation_angle_at_optimal=0.2528673 muscle_volume=0.00099491
      PathPoint P1: femur_l (0.004447042 -0.171767 -0.0323337)
      PathPoint P2: femur_l (0.02492196 -0.2400476 -0.0378925)
      PathPoint P3: patella_l (0.0103 0.0423 -0.0141)
      PathPoint P4: patella_l (0.005 0.00247 -0.00733)
      PathPoint P5: tibia_l (0.0353739 -0.06889975 -0.005555029)
      PathWrap: wrap_object=KnExt_at_fem_l method=hybrid
    Millard2012EquilibriumMuscle vasmed_l: max_isometric_force=2747.823 optimal_fiber_length=0.09267009
        tendon_slack_length=0.1913755 pennation_angle_at_optimal=0.4222225 muscle_volume=0.00051708
      PathPoint P1: femur_l (0.01297054 -0.1944654 -0.01741758)
      PathPoint P2: femur_l (0.03298223 -0.2565387 -0.0008338204)
      PathPoint P3: patella_l (0.0063 0.0445 0.017)
      PathPoint P4: patella_l (0.005 0.00247 0.0085)
      PathPoint P5: tibia_l (0.03467816 -0.0691063 0.007370469)
      PathWrap: wrap_object=KnExt_at_fem_l method=hybrid
    CoordinateActuator lumbar_ext: coordinate=lumbar_extension optimal_force=10
    CoordinateActuator lumbar_bend: coordinate=lumbar_bending optimal_force=10
    CoordinateActuator lumbar_rot: coordinate=lumbar_rotation optimal_force=10
    CoordinateActuator shoulder_flex_r: coordinate=arm_flex_r optimal_force=10
    CoordinateActuator shoulder_add_r: coordinate=arm_add_r optimal_force=10
    CoordinateActuator shoulder_rot_r: coordinate=arm_rot_r optimal_force=10
    CoordinateActuator elbow_flex_r: coordinate=elbow_flex_r optimal_force=10
    CoordinateActuator pro_sup_r: coordinate=pro_sup_r optimal_force=10
    CoordinateActuator wrist_flex_r: coordinate=wrist_flex_r optimal_force=10
    CoordinateActuator wrist_dev_r: coordinate=wrist_dev_r optimal_force=10
    CoordinateActuator shoulder_flex_l: coordinate=arm_flex_l optimal_force=10
    CoordinateActuator shoulder_add_l: coordinate=arm_add_l optimal_force=10
    CoordinateActuator shoulder_rot_l: coordinate=arm_rot_l optimal_force=10
    CoordinateActuator elbow_flex_l: coordinate=elbow_flex_l optimal_force=10
    CoordinateActuator pro_sup_l: coordinate=pro_sup_l optimal_force=10
    CoordinateActuator wrist_flex_l: coordinate=wrist_flex_l optimal_force=10
    CoordinateActuator wrist_dev_l: coordinate=wrist_dev_l optimal_force=10
    ObjectGroup LGlutMax: members=(glmax1_l glmax2_l glmax3_l)
    ObjectGroup LGlutMed: members=(glmed1_l glmed2_l glmed3_l glmin1_l glmin2_l glmin3_l)
    ObjectGroup LSemiMemb: members=(semimem_l semiten_l)
    ObjectGroup LBicFemLong: members=(bflh_l bfsh_l)
    ObjectGroup LVastLat: members=vaslat_l
    ObjectGroup LGasMed: members=(gaslat_l gasmed_l)
    ObjectGroup LSol: members=soleus_l
    ObjectGroup LTibAnt: members=tibant_l
    ObjectGroup AdductorActivationGroupL: members=(addbrev_l addlong_l addmagDist_l addmagIsch_l addmagMid_l addmagProx_l)
    ObjectGroup GluteusMaxActivationGroupL: members=(glmax1_l glmax2_l glmax3_l)
    ObjectGroup GluteusMedActivationGroupL: members=(glmed1_l glmed2_l glmed3_l)
    ObjectGroup GluteusMinActivationGroupL: members=(glmin1_l glmin2_l glmin3_l)
    ObjectGroup IliopsoasActivationGroupL: members=(iliacus_l psoas_l)
    ObjectGroup HamstringActivationGroupL: members=(semimem_l semiten_l)
    ObjectGroup BicepsFemActivationGroupL: members=(bflh_l bfsh_l)
    ObjectGroup PeroneusActivationGroupL: members=(perbrev_l perlong_l)
    ObjectGroup AdductorFiberLengthGroupL: members=(addbrev_l addlong_l addmagDist_l addmagIsch_l addmagMid_l addmagProx_l)
    ObjectGroup GluteusMaxFiberLengthGroupL: members=(glmax1_l glmax2_l glmax3_l)
    ObjectGroup GluteusMedFiberLengthGroupL: members=(glmed1_l glmed2_l glmed3_l)
    ObjectGroup GluteusMinFiberLengthGroupL: members=(glmin1_l glmin2_l glmin3_l)
    ObjectGroup QuadricepFiberLengthGroupL: members=(vasint_l vaslat_l vasmed_l)
    ObjectGroup HamstringFiberLengthGroupL: members=(semimem_l semiten_l bflh_l)
    ObjectGroup PeroneusFiberLengthGroupL: members=(perbrev_l perlong_l)
    ObjectGroup IliopsoasFiberLengthGroupL: members=(iliacus_l psoas_l)
    ObjectGroup GastrocFiberLengthGroupL: members=(gaslat_l gasmed_l soleus_l)
    ObjectGroup TibialisAnteriorFiberLengthGroupL: members=(tibant_l edl_l)
    ObjectGroup TibialisPosteriorFiberLengthGroupL: members=(tibpost_l fdl_l)
    ObjectGroup BicFemLongCollectedEmgChannelL: members=(bflh_l bfsh_l)
    ObjectGroup GasMedCollectedEmgChannelL: members=(gaslat_l gasmed_l)
    ObjectGroup GlutMaxCollectedEmgChannelL: members=(glmax1_l glmax2_l glmax3_l)
    ObjectGroup GlutMedCollectedEmgChannelL: members=(glmed1_l glmed2_l glmed3_l)
    ObjectGroup SemiMembCollectedEmgChannelL: members=(semimem_l semiten_l)
    ObjectGroup SolCollectedEmgChannelL: members=soleus_l
    ObjectGroup TibAntCollectedEmgChannelL: members=tibant_l
    ObjectGroup VastLatCollectedEmgChannelL: members=vaslat_l
    ObjectGroup AddLongMissingEmgChannelL: members=(addbrev_l addlong_l addmagDist_l addmagIsch_l addmagMid_l addmagProx_l)
    ObjectGroup ExtDigLongMissingEmgChannelL: members=edl_l
    ObjectGroup FlexDigLongMissingEmgChannelL: members=fdl_l
    ObjectGroup IliopsoasMissingEmgChannelL: members=(iliacus_l psoas_l)
    ObjectGroup PeroneusLongMissingEmgChannelL: members=(perbrev_l perlong_l)
    ObjectGroup RecFemMissingEmgChannelL: members=recfem_l
    ObjectGroup TibPostMissingEmgChannelL: members=tibpost_l
    ObjectGroup VastMedMissingEmgChannelL: members=(vasint_l vasmed_l)
  MarkerSet:
    Marker R.Shoulder: torso_markerPlate (-0.00194838 0.07469758 0.1728029)
    Marker L.Shoulder: torso_markerPlate (-0.00060318 0.07586458 -0.1650221)
    Marker Neck: torso_markerPlate (-0.03550188 0.1299576 -0.01274507)
    Marker Lumbar: torso_markerPlate (-0.06500488 -0.3080523 0.002968428)
    Marker Chest: torso_markerPlate (0.1030583 0.02753258 0.001995788)
    Marker R.Elbow: humerus_r_markerPlate (0.0972024 -0.2227861 0.1255837)
    Marker R.Wrist: radius_r_markerPlate (0.0498132 -0.1558667 0.1060535)
    Marker L.Elbow: humerus_l_markerPlate (0.1308815 -0.1924814 0.06159997)
    Marker L.Wrist: radius_l_markerPlate (0.057858 -0.1479215 0.0900635)
    Marker R.ASIS: pelvis_markerPlate (0.07055611 -0.03220948 0.1381383)
    Marker L.ASIS: pelvis_markerPlate (0.07216868 -0.02384722 -0.1406077)
    Marker Sacral: pelvis_markerPlate (-0.1427248 0.05605669 0.002469367)
    Marker R.Thigh.Superior: femur_r_markerPlate (0.0574388 0.1592334 0.000562252)
    Marker R.Thigh.Inferior: femur_r_markerPlate (0.0324503 -0.0041086 -0.02149301)
    Marker R.Thigh.Lateral: femur_r_markerPlate (-0.0319365 0.0542394 0.06138955)
    Marker R.Knee.Lateral: femur_r_markerPlate (-0.0192685 -0.0964576 0.03467435)
    Marker R.Knee.Medial: femur_r_markerPlate (-0.0386841 -0.1129066 -0.07513315)
    Marker R.Shank.Superior: tibia_r_markerPlate (0.01149665 0.1910152 -0.0124191)
    Marker R.Shank.Inferior: tibia_r_markerPlate (0.02351775 -0.00959406 -0.0088621)
    Marker R.Shank.Lateral: tibia_r_markerPlate (-0.03351205 0.07700894 0.0565647)
    Marker R.Ankle.Lateral: tibia_r_markerPlate (-0.007619084 -0.1433961 0.0273361)
    Marker R.Ankle.Medial: tibia_r_markerPlate (0.006116746 -0.1150341 -0.0626196)
    Marker R.Heel: calcn_r_markerPlate (-0.09096742 -0.01245691 -0.01948752)
    Marker R.Midfoot.Superior: calcn_r_markerPlate (0.08416621 0.0416855 -0.0128412)
    Marker R.Midfoot.Lateral: calcn_r_markerPlate (0.00680121 -0.02922859 0.03232871)
    Marker R.Toe.Lateral: toes_r_markerPlate (-0.04358528 -0.01532582 0.05974362)
    Marker R.Toe: toes_r_markerPlate (0.06900504 0.01293024 -0.0003927333)
    Marker R.Toe.Medial: toes_r_markerPlate (-0.02541976 0.00239558 -0.05935088)
    Marker L.Thigh.Superior: femur_l_markerPlate (0.05690657 0.1591392 0.01516052)
    Marker L.Thigh.Inferior: femur_l_markerPlate (0.02473767 -0.0330178 0.01485112)
    Marker L.Thigh.Lateral: femur_l_markerPlate (-0.03699243 0.0534902 -0.05843478)
    Marker L.Knee.Lateral: femur_l_markerPlate (-0.0191843 -0.0859358 -0.03701398)
    Marker L.Knee.Medial: femur_l_markerPlate (-0.02546751 -0.0936758 0.06543712)
    Marker L.Shank.Superior: tibia_l_markerPlate (0.01339531 0.2083607 0.0082267)
    Marker L.Shank.Lateral: tibia_l_markerPlate (-0.04030079 0.08057108 -0.0588316)
    Marker L.Shank.Inferior: tibia_l_markerPlate (0.02629641 -0.02087692 0.0151737)
    Marker L.Ankle.Lateral: tibia_l_markerPlate (-0.003327148 -0.1451769 -0.0266081)
    Marker L.Ankle.Medial: tibia_l_markerPlate (0.003936212 -0.1228779 0.0620393)
    Marker L.Heel: calcn_l_markerPlate (-0.08518074 -0.02222462 0.02387337)
    Marker L.Midfoot.Superior: calcn_l_markerPlate (0.07650017 0.04619885 0.008830913)
    Marker L.Midfoot.Lateral: calcn_l_markerPlate (0.00868057 -0.02397423 -0.03270429)
    Marker L.Toe.Lateral: toes_l_markerPlate (-0.03832417 -0.0105136 -0.0597424)
    Marker L.Toe: toes_l_markerPlate (0.06791923 0.01074145 0.002555907)
    Marker L.Toe.Medial: toes_l_markerPlate (-0.02959507 -0.0002278433 0.0571865)
