# OpenSim document version 40000
JointModelPersonalizationTool:
  results_directory: ./
  input_model_file: Patient3.osim
  output_model_file: /Patient3Calibrated.osim
  accuracy: 1e-6
  diffMinChange: 1e-4
  optimalityTolerance: 1e-10
  functionTolerance: 1e-12
  stepTolerance: 1e-5
  maxFunctionEvaluations: 3e2
  TaskSet:
    Task ankle_calibration: marker_file_name=r_ankle_markers.trc
      parent_frame: translation=(true true true) orientation=(true true true) translation_bounds=0.03
          orientation_bounds=0.5 [radians]
      child_frame: translation=(false false false) orientation=(false false false) translation_bounds=0.03
          orientation_bounds=0.5 [radians]
      parent_frame: translation=(true true true) orientation=(true true false) translation_bounds=0.03
          orientation_bounds=0.5
      child_frame: translation=(false false false) orientation=(false false false) translation_bounds=0.03
          orientation_bounds=0.5
    Task knee_calibration: marker_file_name=r_knee_markers.trc
      parent_frame: translation=(true true true) orientation=(true true false) translation_bounds=0.03
          orientation_bounds=0.5
      child_frame: translation=(false false false) orientation=(true true false) translation_bounds=0.03
          orientation_bounds=0.5
    Task hip_calibration: marker_file_name=gait_markers.trc
      parent_frame: translation=(true true true) orientation=(false false false) translation_bounds=0.03
          orientation_bounds=0.5
      child_frame: translation=(false false false) orientation=(false false false) translation_bounds=0.03
          orientation_bounds=0.5
